Simulations: Version=6
  DataStore
  Simulation Truth
    Clock: StartDate=1996-01-01; EndDate=1996-12-30
    Summary SummaryFile
    Weather: FileName=../Met/Weather.met
    Zone Field: Area=1; Slope=0
      Report: EventNames=[Clock].EndOfDay
        VariableNames:
          [Clock].Today
          [Clock].Today.DayOfYear
          [Wheat].Zadok.Stage
          [Wheat].Phenology.CurrentStageName
          [Wheat].Leaf.CoverTotal
          [Wheat].Leaf.CoverGreen
          [Wheat].Leaf.CoverSen
          [Wheat].Stem.Height
          [Wheat].Stem.Width
          [Wheat].Root.RootDepth
          [Wheat].Biomass
          [Wheat].AboveGround.Wt
          [Wheat].AboveGroundLive.Wt
          [Wheat].AboveGroundDead.Wt
          [Wheat].AboveGround.N
          [Wheat].AboveGroundLive.N
          [Wheat].AboveGroundDead.N
          [Wheat].AboveGround.NConc
          [Wheat].AboveGroundLive.NConc
          [Wheat].AboveGroundDead.NConc
          [Wheat].Total.Wt
          [Wheat].TotalLive.Wt
          [Wheat].TotalDead.Wt
          [Wheat].Total.N
          [Wheat].TotalLive.N
          [Wheat].TotalDead.N
          [Wheat].Total.NConc
          [Wheat].TotalLive.NConc
          [Wheat].TotalDead.NConc
          [Wheat].Grain.Wt
          [Wheat].Grain.Live.Wt
          [Wheat].Grain.Dead.Wt
          [Wheat].Grain.N
          [Wheat].Grain.Live.N
          [Wheat].Grain.Dead.N
          [Wheat].Grain.NConc
          [Wheat].Grain.Live.NConc
          [Wheat].Grain.Dead.NConc
          [Wheat].Grain.Yield
          [Wheat].Grain.Protein
          [Wheat].Grain.Size
          [Wheat].Leaf.LAITotal
          [Wheat].Leaf.LAI
          [Wheat].Leaf.SLAI
          [Wheat].Leaf.Live.Wt
          [Wheat].Leaf.Dead.Wt
          [Wheat].Leaf.Live.N
          [Wheat].Leaf.Dead.N
          [Wheat].Leaf.Live.NConc
          [Wheat].Leaf.Dead.NConc
          [Wheat].Root.Live.Wt
          [Wheat].Root.Dead.Wt
          [Wheat].Root.Live.N
          [Wheat].Root.Dead.N
          [Wheat].Root.Live.Nconc
          [Wheat].Root.Dead.Nconc
          [Wheat].Pod.Live.Wt
          [Wheat].Pod.Dead.Wt
          [Wheat].Pod.Live.N
          [Wheat].Pod.Dead.N
          [Wheat].Pod.Live.NConc
          [Wheat].Pod.Dead.NConc
          [Wheat].Stem.Live.Wt
          [Wheat].Stem.Dead.Wt
          [Wheat].Stem.Live.N
          [Wheat].Stem.Dead.N
          [Wheat].Stem.Live.NConc
          [Wheat].Stem.Dead.NConc
          [Soil].SoilWater.SW
          [Soil].SoilWater.SWmm
          [Soil].SoilNitrogen.NO3
          [Soil].SoilNitrogen.NO3ppm
          [Soil].SoilNitrogen.NH4
          [Soil].SoilNitrogen.NH4ppm
          [Soil].CERESSoilTemperature.Value
      Fertiliser
      Soil: ASCOrder=Vertosol; ASCSubOrder=Black; SoilType=Clay; Site=Norwin; NearestTown=Norwin; Region=Darling Downs and Granite Belt; State=Queensland; Country=Australia; NaturalVegetation=Qld. Bluegrass, possible Qld. Blue gum; ApsoilNumber=900; Latitude=-27.581836; Longitude=151.320206; LocationAccuracy=+/- 20m
        DataSource=CSIRO Sustainable Ecosystems, Toowoomba; Characteriesd as part of the GRDC funded project"Doing it better, doing it smarter, managing soil water in Australian agriculture' 2011
        Comments=OC, CLL for all crops estimated-based on Bongeen Mywybilla Soil No1
        Water
          Thickness  BD   AirDry  LL15  DUL   SAT   KS
          150        1.3  0.08    0.1   0.36  0.46  20
          150        1.3  0.09    0.11  0.35  0.45  20
          300        1.4  0.1     0.12  0.34  0.44  20
          300        1.4  0.11    0.13  0.33  0.43  20
          300        1.5  0.12    0.14  0.32  0.42  20
          300        1.5  0.12    0.14  0.32  0.42  20
          300        1.5  0.12    0.14  0.32  0.42  20
          SoilCrop WheatSoil: LL=[0.1, 0.11, 0.12, 0.13, 0.14, 0.14, 0.14]; KL=[0.06, 0.06, 0.06, 0.04, 0.04, 0.02, 0.01]; XF=[1, 1, 1, 1, 1, 1, 1]
        SoilWater: SummerDate=1-Nov; SummerU=5; SummerCona=5; WinterDate=1-Apr; WinterU=5; WinterCona=5; DiffusConst=40; DiffusSlope=16; Salb=0.12; CN2Bare=73; CNRed=20; CNCov=0.8; max_pond=0; Thickness=[150, 150, 300, 300, 300, 300, 300]; SWCON=[0.3, 0.3, 0.3, 0.3, 0.3, 0.3, 0.3]; residueinterception=0
        SoilNitrogen: fom_type=[default, manure, mucuna, lablab, shemp, stable]; fract_carb=[0.2, 0.3, 0.54, 0.57, 0.45, 0]; fract_cell=[0.7, 0.3, 0.37, 0.37, 0.47, 0.1]; fract_lign=[0.1, 0.4, 0.09, 0.06, 0.08, 0.9]; wfpsN2N2O_x=[22, 88]; wfpsN2N2O_y=[0.1, 1]
        SoilOrganicMatter: RootCN=40; RootWt=1000; SoilCN=12; EnrACoeff=7.4; EnrBCoeff=0.2; OCUnits=Total
          Thickness  OC    FBiom  FInert
          150        1.2   0.04   0.4
          150        0.96  0.02   0.6
          300        0.6   0.02   0.8
          300        0.3   0.02   1
          300        0.18  0.01   1
          300        0.12  0.01   1
          300        0.12  0.01   1
        Analysis: Thickness=[150, 150, 300, 300, 300, 300, 300]; PH=[8, 8, 8, 8, 8, 8, 8]; PHUnits=Water; BoronUnits=HotWater
        InitialWater: PercentMethod=EvenlyDistributed; FractionFull=0.5; RelativeTo=LL15
        Sample InitialN: NO3Units=ppm; NH4Units=ppm; SWUnits=Volumetric; OCUnits=Total; PHUnits=Water
          Thickness  NO3  NH4
          150        1    0.1
          150        1    0.1
          300        1    0.1
          300        1    0.1
          300        1    0.1
          300        1    0.1
          300        1    0.1
        CERESSoilTemperature
      SurfaceOrganicMatter: PoolName=wheat_stubble; type=wheat; mass=500; standing_fraction=0; cnr=100; CriticalResidueWeight=2000; OptimumDecompTemp=20; MaxCumulativeEOS=20; CNRatioDecompCoeff=0.277; CNRatioDecompThreshold=25; TotalLeachRain=25; MinRainToLeach=10; CriticalMinimumOrganicC=0.004; DefaultCPRatio=0; DefaultStandingFraction=0; StandingExtinctCoeff=0.5; FractionFaecesAdded=0.5
        Pools:
          {PoolName=wheat_stubble, ResidueType=wheat, Mass=500, CNRatio=100, StandingFraction=0}
        ResidueTypes: LoadFromResource=ResidueTypes
      Plant15 Wheat: AutoHarvest=true; CropType=Wheat
      MicroClimate: a_interception=0; b_interception=1; c_interception=0; d_interception=0; soil_albedo=0.3; sun_angle=15; soil_heat_flux_fraction=0.4; night_interception_fraction=0.5; refheight=2; albedo=0.15; emissivity=0.96; RadIntTotal=0
      Manager SowingFertiliser
        Amount = 160
        CropName = wheat
```csharp
using System;
using Models.Core;
using Models.PMF;
namespace Models
{
	[Serializable]
	public class Script : Model
	{
		[Link] Clock Clock;
		[Link] Fertiliser Fertiliser;
		[Link] Summary Summary;
		
		
		[Description("Amount of fertiliser to be applied (kg/ha)")]
		public double Amount { get; set; }
		
		[Description("Crop to be fertilised")]
		public string CropName { get; set; }
		
		
		

		[EventSubscribe("Sowing")]
		private void OnSowing(object sender, EventArgs e)
		{
			Model crop = sender as Model;
			if (crop.Name.ToLower() == CropName.ToLower())
				Fertiliser.Apply(Amount: Amount, Type: Fertiliser.Types.NO3N);
		}
		
	}
}
```
      Manager SowingRule
        StartDate = 10-may
        EndDate = 10-may
        MinESW = 0
        MinRain = 0
        RainDays = 7
        CultivarName = Truth
        SowingDepth = 30
        RowSpacing = 250
        Population = 120
```csharp
using System;
using Models.Core;
using Models.PMF.OldPlant;
using Models.Soils;
using Models.Utilities;
using APSIM.Shared.Utilities;

namespace Models
{
	[Serializable]
	public class Script : Model
	{
		[Link] Clock Clock;
		[Link] Fertiliser Fertiliser;
		[Link] Summary Summary;
		[Link] Plant15 Wheat;
		[Link] Soil Soil;
		Accumulator accumulatedRain;
		
		[Description("Start of sowing window (d-mmm)")]
		public string StartDate { get; set; }
		[Description("End of sowing window (d-mmm)")]
		public string EndDate { get; set; }
		[Description("Minimum extractable soil water for sowing (mm)")]
		public double MinESW { get; set; }
		[Description("Accumulated rainfall required for sowing (mm)")]
		public double MinRain { get; set; }
		[Description("Duration of rainfall accumulation (d)")]
		public int RainDays { get; set; }
		[Description("Cultivar to be sown")]
		public string CultivarName { get; set; }
		[Description("Sowing depth (mm)")]
		public double SowingDepth { get; set; }
		[Description("Row spacing (mm)")]
		public double RowSpacing { get; set; }
		[Description("Plant population (/m2)")]
		public double Population { get; set; }
		
		
		[EventSubscribe("Commencing")]
		private void OnSimulationCommencing(object sender, EventArgs e)
		{
			accumulatedRain = new Accumulator(this, "[Weather].Rain", RainDays);
		}
		

		[EventSubscribe("DoManagement")]
		private void OnDoManagement(object sender, EventArgs e)
		{
			accumulatedRain.Update();
			
			if (DateUtilities.WithinDates(StartDate, Clock.Today, EndDate) &&
			    Wheat.plant_status == "out" &&
			    Soil.SoilWater.ESW > MinESW &&
			    accumulatedRain.Sum > MinRain)
			{
				Wheat.Sow(population: Population, cultivar: CultivarName, depth: SowingDepth, rowSpacing: RowSpacing);	
			}
		
		}
		
	}
}
```
      SoluteManager
    Control: DAOption=OpenLoop; EnsembleSize=3; AddModelError=false; FixPhenology=false; DoYPheno=[131, 132, 136, 137, 202, 247, 255, 288, 290, 291, 0]
      OpenLoop
      InitialConditions: InitialDate=1996-01-01; InitialSW=[0.25, 0.25, 0.25, 0.25, 0.25, 0.25, 0.25]; InitialSWError=[0.1, 0.09, 0.08, 0.07, 0.06, 0.06, 0.06]
      StateVariables: ModelError=[0, 0, 0, 0, 0, 0, 0, 0, 0, 0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]; ModelErrorOption=[0, 0, 0, 0, 0, 0, 0, 0, 0, 0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]
        StateNames=[LAI, SW1, SW2, SW3, SW4, SW5, SW6, SW7, LeafWt, StemWt, GrainWt, PodWt, RootWt, LeafN, StemN, GrainN, PodN, RootN, Height, RootDepth, SoilNO3_1, SoilNO3_2, SoilNO3_3, SoilNO3_4, SoilNO3_5, SoilNO3_6, SoilNO3_7, SoilNH4_1, SoilNH4_2, SoilNH4_3, SoilNH4_4, SoilNH4_5, SoilNH4_6, SoilNH4_7]
      Observations
        ObsIndex=[0, 1, 2, 3, 4, 5, 6, 7, 8, 9, 13, 14, 16, 20, 21, 22, 23, 24, 25, 26, 27, 28, 29, 30, 31, 32, 33]
        StateNamesObs=[LAI, SW1, SW2, SW3, SW4, SW5, SW6, SW7, LeafWt, StemWt, LeafN, StemN, PodN, SoilNO3_1, SoilNO3_2, SoilNO3_3, SoilNO3_4, SoilNO3_5, SoilNO3_6, SoilNO3_7, SoilNH4_1, SoilNH4_2, SoilNH4_3, SoilNH4_4, SoilNH4_5, SoilNH4_6, SoilNH4_7]
        ObsError=[0.4, 0.03, 0.03, 0.03, 0.03, 0.03, 0.03, 0.03, 0.05, 0.05, 0.05, 0.05, 0.05, 0.05, 0.05, 0.05, 0.05, 0.05, 0.05, 0.05, 0.05, 0.05, 0.05, 0.05, 0.05, 0.05, 0.05]
        ObsErrorOption=[0, 0, 0, 0, 0, 0, 0, 0, 1, 1, 1, 1, 1, 1, 1, 1, 1, 1, 1, 1, 1, 1, 1, 1, 1, 1, 1]
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