Simulations: Version=6
  DataStore
  Simulation Truth
    Clock: StartDate=1996-01-01; EndDate=1996-12-30
    Summary SummaryFile
    Weather: FileName=../Met/Weather.met
    Zone Field: Area=1; Slope=0
      Report: EventNames=[Clock].EndOfDay
        VariableNames:
          [Clock].Today
          [Clock].Today.DayOfYear
          [Wheat].Zadok.Stage
          [Wheat].Phenology.CurrentStageName
          [Wheat].Leaf.CoverTotal
          [Wheat].Leaf.CoverGreen
          [Wheat].Leaf.CoverSen
          [Wheat].Stem.Height
          [Wheat].Stem.Width
          [Wheat].Root.RootDepth
          [Wheat].Biomass
          [Wheat].AboveGround.Wt
          [Wheat].AboveGroundLive.Wt
          [Wheat].AboveGroundDead.Wt
          [Wheat].AboveGround.N
          [Wheat].AboveGroundLive.N
          [Wheat].AboveGroundDead.N
          [Wheat].AboveGround.NConc
          [Wheat].AboveGroundLive.NConc
          [Wheat].AboveGroundDead.NConc
          [Wheat].Total.Wt
          [Wheat].TotalLive.Wt
          [Wheat].TotalDead.Wt
          [Wheat].Total.N
          [Wheat].TotalLive.N
          [Wheat].TotalDead.N
          [Wheat].Total.NConc
          [Wheat].TotalLive.NConc
          [Wheat].TotalDead.NConc
          [Wheat].Grain.Wt
          [Wheat].Grain.Live.Wt
          [Wheat].Grain.Dead.Wt
          [Wheat].Grain.N
          [Wheat].Grain.Live.N
          [Wheat].Grain.Dead.N
          [Wheat].Grain.NConc
          [Wheat].Grain.Live.NConc
          [Wheat].Grain.Dead.NConc
          [Wheat].Grain.Yield
          [Wheat].Grain.Protein
          [Wheat].Grain.Size
          [Wheat].Leaf.LAITotal
          [Wheat].Leaf.LAI
          [Wheat].Leaf.SLAI
          [Wheat].Leaf.Live.Wt
          [Wheat].Leaf.Dead.Wt
          [Wheat].Leaf.Live.N
          [Wheat].Leaf.Dead.N
          [Wheat].Leaf.Live.NConc
          [Wheat].Leaf.Dead.NConc
          [Wheat].Root.Live.Wt
          [Wheat].Root.Dead.Wt
          [Wheat].Root.Live.N
          [Wheat].Root.Dead.N
          [Wheat].Root.Live.Nconc
          [Wheat].Root.Dead.Nconc
          [Wheat].Pod.Live.Wt
          [Wheat].Pod.Dead.Wt
          [Wheat].Pod.Live.N
          [Wheat].Pod.Dead.N
          [Wheat].Pod.Live.NConc
          [Wheat].Pod.Dead.NConc
          [Wheat].Stem.Live.Wt
          [Wheat].Stem.Dead.Wt
          [Wheat].Stem.Live.N
          [Wheat].Stem.Dead.N
          [Wheat].Stem.Live.NConc
          [Wheat].Stem.Dead.NConc
          [Soil].SoilWater.SW
          [Soil].SoilWater.SWmm
          [Soil].SoilNitrogen.NO3
          [Soil].SoilNitrogen.NO3ppm
          [Soil].SoilNitrogen.NH4
          [Soil].SoilNitrogen.NH4ppm
          [Soil].CERESSoilTemperature.Value
      Fertiliser
      Soil: ASCOrder=Vertosol; ASCSubOrder=Black; SoilType=Clay; Site=Norwin; NearestTown=Norwin; Region=Darling Downs and Granite Belt; State=Queensland; Country=Australia; NaturalVegetation=Qld. Bluegrass, possible Qld. Blue gum; ApsoilNumber=900; Latitude=-27.581836; Longitude=151.320206; LocationAccuracy=+/- 20m
        DataSource=CSIRO Sustainable Ecosystems, Toowoomba; Characteriesd as part of the GRDC funded project"Doing it better, doing it smarter, managing soil water in Australian agriculture' 2011
        Comments=OC, CLL for all crops estimated-based on Bongeen Mywybilla Soil No1
        Water
          Thickness  BD   AirDry  LL15  DUL   SAT   KS
          150        1.3  0.08    0.1   0.36  0.46  20
          150        1.3  0.09    0.11  0.35  0.45  20
          300        1.4  0.1     0.12  0.34  0.44  20
          300        1.4  0.11    0.13  0.33  0.43  20
          300        1.5  0.12    0.14  0.32  0.42  20
          300        1.5  0.12    0.14  0.32  0.42  20
          300        1.5  0.12    0.14  0.32  0.42  20
          SoilCrop WheatSoil: LL=[0.1, 0.11, 0.12, 0.13, 0.14, 0.14, 0.14]; KL=[0.06, 0.06, 0.06, 0.04, 0.04, 0.02, 0.01]; XF=[1, 1, 1, 1, 1, 1, 1]
        SoilWater: SummerDate=1-Nov; SummerU=5; SummerCona=5; WinterDate=1-Apr; WinterU=5; WinterCona=5; DiffusConst=40; DiffusSlope=16; Salb=0.12; CN2Bare=73; CNRed=20; CNCov=0.8; max_pond=0; Thickness=[150, 150, 300, 300, 300, 300, 300]; SWCON=[0.3, 0.3, 0.3, 0.3, 0.3, 0.3, 0.3]; residueinterception=0
        SoilNitrogen: fom_type=[default, manure, mucuna, lablab, shemp, stable]; fract_carb=[0.2, 0.3, 0.54, 0.57, 0.45, 0]; fract_cell=[0.7, 0.3, 0.37, 0.37, 0.47, 0.1]; fract_lign=[0.1, 0.4, 0.09, 0.06, 0.08, 0.9]; wfpsN2N2O_x=[22, 88]; wfpsN2N2O_y=[0.1, 1]
        SoilOrganicMatter: RootCN=40; RootWt=1000; SoilCN=12; EnrACoeff=7.4; EnrBCoeff=0.2; OCUnits=Total
          Thickness  OC    FBiom  FInert
          150        1.2   0.04   0.4
          150        0.96  0.02   0.6
          300        0.6   0.02   0.8
          300        0.3   0.02   1
          300        0.18  0.01   1
          300        0.12  0.01   1
          300        0.12  0.01   1
        Analysis: Thickness=[150, 150, 300, 300, 300, 300, 300]; PH=[8, 8, 8, 8, 8, 8, 8]; PHUnits=Water; BoronUnits=HotWater
        InitialWater: PercentMethod=EvenlyDistributed; FractionFull=0.5; RelativeTo=LL15
        Sample InitialN: NO3Units=ppm; NH4Units=ppm; SWUnits=Volumetric; OCUnits=Total; PHUnits=Water
          Thickness  NO3  NH4
          150        1    0.1
          150        1    0.1
          300        1    0.1
          300        1    0.1
          300        1    0.1
          300        1    0.1
          300        1    0.1
        CERESSoilTemperature
      SurfaceOrganicMatter: PoolName=wheat_stubble; type=wheat; mass=500; standing_fraction=0; cnr=100; CriticalResidueWeight=2000; OptimumDecompTemp=20; MaxCumulativeEOS=20; CNRatioDecompCoeff=0.277; CNRatioDecompThreshold=25; TotalLeachRain=25; MinRainToLeach=10; CriticalMinimumOrganicC=0.004; DefaultCPRatio=0; DefaultStandingFraction=0; StandingExtinctCoeff=0.5; FractionFaecesAdded=0.5
        Pools:
          {PoolName=wheat_stubble, ResidueType=wheat, Mass=500, CNRatio=100, StandingFraction=0}
        ResidueTypes: LoadFromResource=ResidueTypes
      Plant15 Wheat: AutoHarvest=true; CropType=Wheat
      MicroClimate: a_interception=0; b_interception=1; c_interception=0; d_interception=0; soil_albedo=0.3; sun_angle=15; soil_heat_flux_fraction=0.4; night_interception_fraction=0.5; refheight=2; albedo=0.15; emissivity=0.96; RadIntTotal=0
      Manager SowingFertiliser
        Amount = 160
        CropName = wheat
```csharp
using System;
using Models.Core;
using Models.PMF;
namespace Models
{
	[Serializable]
	public class Script : Model
	{
		[Link] Clock Clock;
		[Link] Fertiliser Fertiliser;
		[Link] Summary Summary;
		
		
		[Description("Amount of fertiliser to be applied (kg/ha)")]
		public double Amount { get; set; }
		
		[Description("Crop to be fertilised")]
		public string CropName { get; set; }
		
		
		

		[EventSubscribe("Sowing")]
		private void OnSowing(object sender, EventArgs e)
		{
			Model crop = sender as Model;
			if (crop.Name.ToLower() == CropName.ToLower())
				Fertiliser.Apply(Amount: Amount, Type: Fertiliser.Types.NO3N);
		}
		
	}
}
```
      Manager SowingRule
        StartDate = 10-may
        EndDate = 10-may
        MinESW = 0
        MinRain = 0
        RainDays = 7
        CultivarName = Truth
        SowingDepth = 30
        RowSpacing = 250
        Population = 120
```csharp
using System;
using Models.Core;
using Models.PMF.OldPlant;
using Models.Soils;
using Models.Utilities;
using APSIM.Shared.Utilities;

namespace Models
{
	[Serializable]
	public class Script : Model
	{
		[Link] Clock Clock;
		[Link] Fertiliser Fertiliser;
		[Link] Summary Summary;
		[Link] Plant15 Wheat;
		[Link] Soil Soil;
		Accumulator accumulatedRain;
		
		[Description("Start of sowing window (d-mmm)")]
		public string StartDate { get; set; }
		[Description("End of sowing window (d-mmm)")]
		public string EndDate { get; set; }
		[Description("Minimum extractable soil water for sowing (mm)")]
		public double MinESW { get; set; }
		[Description("Accumulated rainfall required for sowing (mm)")]
		public double MinRain { get; set; }
		[Description("Duration of rainfall accumulation (d)")]
		public int RainDays { get; set; }
		[Description("Cultivar to be sown")]
		public string CultivarName { get; set; }
		[Description("Sowing depth (mm)")]
		public double SowingDepth { get; set; }
		[Description("Row spacing (mm)")]
		public double RowSpacing { get; set; }
		[Description("Plant population (/m2)")]
		public double Population { get; set; }
		
		
		[EventSubscribe("Commencing")]
		private void OnSimulationCommencing(object sender, EventArgs e)
		{
			accumulatedRain = new Accumulator(this, "[Weather].Rain", RainDays);
		}
		

		[EventSubscribe("DoManagement")]
		private void OnDoManagement(object sender, EventArgs e)
		{
			accumulatedRain.Update();
			
			if (DateUtilities.WithinDates(StartDate, Clock.Today, EndDate) &&
			    Wheat.plant_status == "out" &&
			    Soil.SoilWater.ESW > MinESW &&
			    accumulatedRain.Sum > MinRain)
			{
				Wheat.Sow(population: Population, cultivar: CultivarName, depth: SowingDepth, rowSpacing: RowSpacing);	
			}
		
		}
		
	}
}
```
      SoluteManager
    Control: DAOption=OpenLoop; EnsembleSize=50; AddModelError=false; FixPhenology=false; DoYPheno=[131, 132, 136, 137, 202, 247, 255, 288, 290, 291, 0]
      OpenLoop
      InitialConditions: InitialDate=1996-01-01; InitialSW=[0.25, 0.25, 0.25, 0.25, 0.25, 0.25, 0.25]; InitialSWError=[0.1, 0.09, 0.08, 0.07, 0.06, 0.06, 0.06]
      StateVariables: ModelError=[0, 0, 0, 0, 0, 0, 0, 0, 0, 0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]; ModelErrorOption=[0, 0, 0, 0, 0, 0, 0, 0, 0, 0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]
        StateNames=[LAI, SW1, SW2, SW3, SW4, SW5, SW6, SW7, LeafWt, StemWt, GrainWt, PodWt, RootWt, LeafN, StemN, GrainN, PodN, RootN, Height, RootDepth, SoilNO3_1, SoilNO3_2, SoilNO3_3, SoilNO3_4, SoilNO3_5, SoilNO3_6, SoilNO3_7, SoilNH4_1, SoilNH4_2, SoilNH4_3, SoilNH4_4, SoilNH4_5, SoilNH4_6, SoilNH4_7]
      Observations: ObsIndex=[0, 1, 2, 3, 4, 5, 6, 7, 8, 9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]; ObsErrorOption=[0, 0, 0, 0, 0, 0, 0, 0, 1, 1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]
        StateNamesObs=[LAI, SW1, SW2, SW3, SW4, SW5, SW6, SW7, LeafWt, StemWt, GrainWt, PodWt, RootWt, LeafN, StemN, GrainN, PodN, RootN, Height, RootDepth, SoilNO3_1, SoilNO3_2, SoilNO3_3, SoilNO3_4, SoilNO3_5, SoilNO3_6, SoilNO3_7, SoilNH4_1, SoilNH4_2, SoilNH4_3, SoilNH4_4, SoilNH4_5, SoilNH4_6, SoilNH4_7]
        ObsError=[0.4, 0.03, 0.03, 0.03, 0.03, 0.03, 0.03, 0.03, 0.05, 0.05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]
  Simulation Ensemble0
    Clock: StartDate=1996-01-01; EndDate=1996-12-30
    Summary SummaryFile
    Weather: FileName=../Met/Weather_Ensemble0.met
    Zone Field: Area=1; Slope=0
      Report: same as Truth.Field.Report
      Fertiliser
      Soil: ASCOrder=Vertosol; ASCSubOrder=Black; SoilType=Clay; Site=Norwin; NearestTown=Norwin; Region=Darling Downs and Granite Belt; State=Queensland; Country=Australia; NaturalVegetation=Qld. Bluegrass, possible Qld. Blue gum; ApsoilNumber=900; Latitude=-27.581836; Longitude=151.320206; LocationAccuracy=+/- 20m
        DataSource=CSIRO Sustainable Ecosystems, Toowoomba; Characteriesd as part of the GRDC funded project"Doing it better, doing it smarter, managing soil water in Australian agriculture' 2011
        Comments=OC, CLL for all crops estimated-based on Bongeen Mywybilla Soil No1
        Water
          Thickness  BD   AirDry     LL15       DUL       SAT       KS
          150        1.3  0.0600848  0.0800848  0.393747  0.493747  20
          150        1.3  0.0745541  0.0945541  0.347659  0.447659  20
          300        1.4  0.102896   0.122896   0.344927  0.444927  20
          300        1.4  0.110513   0.130513   0.339569  0.439569  20
          300        1.5  0.161861   0.181861   0.336908  0.436908  20
          300        1.5  0.109579   0.129579   0.305731  0.405731  20
          300        1.5  0.127707   0.147707   0.356979  0.456979  20
          SoilCrop WheatSoil
            LL=[0.0800848, 0.0945541, 0.122896, 0.130513, 0.181861, 0.129579, 0.147707]
            KL=[0.06, 0.06, 0.06, 0.04, 0.04, 0.02, 0.01]
            XF=[1, 1, 1, 1, 1, 1, 1]
        SoilWater: same as Truth.Field.Soil.SoilWater
        SoilNitrogen: fom_type=[default, manure, mucuna, lablab, shemp, stable]; fract_carb=[0.2, 0.3, 0.54, 0.57, 0.45, 0]; fract_cell=[0.7, 0.3, 0.37, 0.37, 0.47, 0.1]; fract_lign=[0.1, 0.4, 0.09, 0.06, 0.08, 0.9]; wfpsN2N2O_x=[22, 88]; wfpsN2N2O_y=[0.1, 1]
        SoilOrganicMatter: same as Truth.Field.Soil.SoilOrganicMatter
        Analysis: Thickness=[150, 150, 300, 300, 300, 300, 300]; PH=[8, 8, 8, 8, 8, 8, 8]; PHUnits=Water; BoronUnits=HotWater
        InitialWater: PercentMethod=EvenlyDistributed; FractionFull=0.5; RelativeTo=LL15
        Sample InitialN: same as Truth.Field.Soil.InitialN
        CERESSoilTemperature
      SurfaceOrganicMatter: same as Truth.Field.SurfaceOrganicMatter
      Plant15 Wheat: AutoHarvest=true; CropType=Wheat
      MicroClimate: a_interception=0; b_interception=1; c_interception=0; d_interception=0; soil_albedo=0.3; sun_angle=15; soil_heat_flux_fraction=0.4; night_interception_fraction=0.5; refheight=2; albedo=0.15; emissivity=0.96; RadIntTotal=0
      Manager SowingFertiliser: same as Truth.Field.SowingFertiliser
      Manager SowingRule
        StartDate = 10-may
        EndDate = 10-may
        MinESW = 0
        MinRain = 0
        RainDays = 7
        CultivarName = Custom0
        SowingDepth = 30
        RowSpacing = 250
        Population = 120
        script: same as in Truth.Field.SowingRule
      SoluteManager
    Control: DAOption=OpenLoop; EnsembleSize=50; AddModelError=false; FixPhenology=false; DoYPheno=[131, 132, 136, 137, 202, 247, 255, 288, 290, 291, 0]
      OpenLoop
      InitialConditions: InitialDate=1996-01-01; InitialSWError=[0.1, 0.09, 0.08, 0.07, 0.06, 0.06, 0.06]
        InitialSW=[0.278771, 0.290089, 0.324087, 0.317859, 0.287743, 0.280627, 0.246658]
      StateVariables: same as Truth.Control.StateVariables
      Observations: same as Truth.Control.Observations
  Simulation Ensemble1
    Clock: StartDate=1996-01-01; EndDate=1996-12-30
    Summary SummaryFile
    Weather: FileName=../Met/Weather_Ensemble1.met
    Zone Field: Area=1; Slope=0
      Report: same as Truth.Field.Report
      Fertiliser
      Soil: ASCOrder=Vertosol; ASCSubOrder=Black; SoilType=Clay; Site=Norwin; NearestTown=Norwin; Region=Darling Downs and Granite Belt; State=Queensland; Country=Australia; NaturalVegetation=Qld. Bluegrass, possible Qld. Blue gum; ApsoilNumber=900; Latitude=-27.581836; Longitude=151.320206; LocationAccuracy=+/- 20m
        DataSource=CSIRO Sustainable Ecosystems, Toowoomba; Characteriesd as part of the GRDC funded project"Doing it better, doing it smarter, managing soil water in Australian agriculture' 2011
        Comments=OC, CLL for all crops estimated-based on Bongeen Mywybilla Soil No1
        Water
          Thickness  BD   AirDry     LL15       DUL       SAT       KS
          150        1.3  0.0592763  0.0792763  0.442218  0.542218  20
          150        1.3  0.046469   0.066469   0.384327  0.484327  20
          300        1.4  0.0854749  0.105475   0.380411  0.480411  20
          300        1.4  0.0901156  0.110116   0.334238  0.434238  20
          300        1.5  0.118591   0.138591   0.33274   0.43274   20
          300        1.5  0.133823   0.153823   0.26055   0.36055   20
          300        1.5  0.151311   0.171311   0.33005   0.43005   20
          SoilCrop WheatSoil
            LL=[0.0792763, 0.066469, 0.105475, 0.110116, 0.138591, 0.153823, 0.171311]
            KL=[0.06, 0.06, 0.06, 0.04, 0.04, 0.02, 0.01]
            XF=[1, 1, 1, 1, 1, 1, 1]
        SoilWater: same as Truth.Field.Soil.SoilWater
        SoilNitrogen: fom_type=[default, manure, mucuna, lablab, shemp, stable]; fract_carb=[0.2, 0.3, 0.54, 0.57, 0.45, 0]; fract_cell=[0.7, 0.3, 0.37, 0.37, 0.47, 0.1]; fract_lign=[0.1, 0.4, 0.09, 0.06, 0.08, 0.9]; wfpsN2N2O_x=[22, 88]; wfpsN2N2O_y=[0.1, 1]
        SoilOrganicMatter: same as Truth.Field.Soil.SoilOrganicMatter
        Analysis: Thickness=[150, 150, 300, 300, 300, 300, 300]; PH=[8, 8, 8, 8, 8, 8, 8]; PHUnits=Water; BoronUnits=HotWater
        InitialWater: PercentMethod=EvenlyDistributed; FractionFull=0.5; RelativeTo=LL15
        Sample InitialN: same as Truth.Field.Soil.InitialN
        CERESSoilTemperature
      SurfaceOrganicMatter: same as Truth.Field.SurfaceOrganicMatter
      Plant15 Wheat: AutoHarvest=true; CropType=Wheat
      MicroClimate: a_interception=0; b_interception=1; c_interception=0; d_interception=0; soil_albedo=0.3; sun_angle=15; soil_heat_flux_fraction=0.4; night_interception_fraction=0.5; refheight=2; albedo=0.15; emissivity=0.96; RadIntTotal=0
      Manager SowingFertiliser: same as Truth.Field.SowingFertiliser
      Manager SowingRule
        StartDate = 10-may
        EndDate = 10-may
        MinESW = 0
        MinRain = 0
        RainDays = 7
        CultivarName = Custom1
        SowingDepth = 30
        RowSpacing = 250
        Population = 120
        script: same as in Truth.Field.SowingRule
      SoluteManager
    Control: DAOption=OpenLoop; EnsembleSize=50; AddModelError=false; FixPhenology=false; DoYPheno=[131, 132, 136, 137, 202, 247, 255, 288, 290, 291, 0]
      OpenLoop
      InitialConditions: InitialDate=1996-01-01; InitialSWError=[0.1, 0.09, 0.08, 0.07, 0.06, 0.06, 0.06]
        InitialSW=[0.374159, 0.379136, 0.356738, 0.329391, 0.327178, 0.338965, 0.333494]
      StateVariables: same as Truth.Control.StateVariables
      Observations: same as Truth.Control.Observations
  Simulation Ensemble2
    Clock: StartDate=1996-01-01; EndDate=1996-12-30
    Summary SummaryFile
    Weather: FileName=../Met/Weather_Ensemble2.met
    Zone Field: Area=1; Slope=0
      Report: same as Truth.Field.Report
      Fertiliser
      Soil: ASCOrder=Vertosol; ASCSubOrder=Black; SoilType=Clay; Site=Norwin; NearestTown=Norwin; Region=Darling Downs and Granite Belt; State=Queensland; Country=Australia; NaturalVegetation=Qld. Bluegrass, possible Qld. Blue gum; ApsoilNumber=900; Latitude=-27.581836; Longitude=151.320206; LocationAccuracy=+/- 20m
        DataSource=CSIRO Sustainable Ecosystems, Toowoomba; Characteriesd as part of the GRDC funded project"Doing it better, doing it smarter, managing soil water in Australian agriculture' 2011
        Comments=OC, CLL for all crops estimated-based on Bongeen Mywybilla Soil No1
        Water
          Thickness  BD   AirDry     LL15       DUL       SAT       KS
          150        1.3  0.073916   0.093916   0.390426  0.490426  20
          150        1.3  0.0245551  0.0445551  0.380133  0.480133  20
          300        1.4  0.0835306  0.103531   0.415297  0.515297  20
          300        1.4  0.0683869  0.0883869  0.352191  0.452191  20
          300        1.5  0.110289   0.130289   0.364652  0.464652  20
          300        1.5  0.0971849  0.117185   0.330561  0.430561  20
          300        1.5  0.11396    0.13396    0.297725  0.397725  20
          SoilCrop WheatSoil
            LL=[0.093916, 0.0445551, 0.103531, 0.0883869, 0.130289, 0.117185, 0.13396]
            KL=[0.06, 0.06, 0.06, 0.04, 0.04, 0.02, 0.01]
            XF=[1, 1, 1, 1, 1, 1, 1]
        SoilWater: same as Truth.Field.Soil.SoilWater
        SoilNitrogen: fom_type=[default, manure, mucuna, lablab, shemp, stable]; fract_carb=[0.2, 0.3, 0.54, 0.57, 0.45, 0]; fract_cell=[0.7, 0.3, 0.37, 0.37, 0.47, 0.1]; fract_lign=[0.1, 0.4, 0.09, 0.06, 0.08, 0.9]; wfpsN2N2O_x=[22, 88]; wfpsN2N2O_y=[0.1, 1]
        SoilOrganicMatter: same as Truth.Field.Soil.SoilOrganicMatter
        Analysis: Thickness=[150, 150, 300, 300, 300, 300, 300]; PH=[8, 8, 8, 8, 8, 8, 8]; PHUnits=Water; BoronUnits=HotWater
        InitialWater: PercentMethod=EvenlyDistributed; FractionFull=0.5; RelativeTo=LL15
        Sample InitialN: same as Truth.Field.Soil.InitialN
        CERESSoilTemperature
      SurfaceOrganicMatter: same as Truth.Field.SurfaceOrganicMatter
      Plant15 Wheat: AutoHarvest=true; CropType=Wheat
      MicroClimate: a_interception=0; b_interception=1; c_interception=0; d_interception=0; soil_albedo=0.3; sun_angle=15; soil_heat_flux_fraction=0.4; night_interception_fraction=0.5; refheight=2; albedo=0.15; emissivity=0.96; RadIntTotal=0
      Manager SowingFertiliser: same as Truth.Field.SowingFertiliser
      Manager SowingRule
        StartDate = 10-may
        EndDate = 10-may
        MinESW = 0
        MinRain = 0
        RainDays = 7
        CultivarName = Custom2
        SowingDepth = 30
        RowSpacing = 250
        Population = 120
        script: same as in Truth.Field.SowingRule
      SoluteManager
    Control: DAOption=OpenLoop; EnsembleSize=50; AddModelError=false; FixPhenology=false; DoYPheno=[131, 132, 136, 137, 202, 247, 255, 288, 290, 291, 0]
      OpenLoop
      InitialConditions: InitialDate=1996-01-01; InitialSWError=[0.1, 0.09, 0.08, 0.07, 0.06, 0.06, 0.06]
        InitialSW=[0.278557, 0.329773, 0.36456, 0.416931, 0.390682, 0.400527, 0.380853]
      StateVariables: same as Truth.Control.StateVariables
      Observations: same as Truth.Control.Observations
  Simulation Ensemble3
    Clock: StartDate=1996-01-01; EndDate=1996-12-30
    Summary SummaryFile
    Weather: FileName=../Met/Weather_Ensemble3.met
    Zone Field: Area=1; Slope=0
      Report: same as Truth.Field.Report
      Fertiliser
      Soil: ASCOrder=Vertosol; ASCSubOrder=Black; SoilType=Clay; Site=Norwin; NearestTown=Norwin; Region=Darling Downs and Granite Belt; State=Queensland; Country=Australia; NaturalVegetation=Qld. Bluegrass, possible Qld. Blue gum; ApsoilNumber=900; Latitude=-27.581836; Longitude=151.320206; LocationAccuracy=+/- 20m
        DataSource=CSIRO Sustainable Ecosystems, Toowoomba; Characteriesd as part of the GRDC funded project"Doing it better, doing it smarter, managing soil water in Australian agriculture' 2011
        Comments=OC, CLL for all crops estimated-based on Bongeen Mywybilla Soil No1
        Water
          Thickness  BD   AirDry     LL15       DUL       SAT       KS
          150        1.3  0.0939972  0.113997   0.319779  0.419779  20
          150        1.3  0.115166   0.135166   0.355327  0.455327  20
          300        1.4  0.0969209  0.116921   0.426066  0.526066  20
          300        1.4  0.0655575  0.0855575  0.381276  0.481276  20
          300        1.5  0.14765    0.16765    0.389001  0.489001  20
          300        1.5  0.0811146  0.101115   0.346765  0.446765  20
          300        1.5  0.107536   0.127536   0.290079  0.390079  20
          SoilCrop WheatSoil
            LL=[0.113997, 0.135166, 0.116921, 0.0855575, 0.16765, 0.101115, 0.127536]
            KL=[0.06, 0.06, 0.06, 0.04, 0.04, 0.02, 0.01]
            XF=[1, 1, 1, 1, 1, 1, 1]
        SoilWater: same as Truth.Field.Soil.SoilWater
        SoilNitrogen: fom_type=[default, manure, mucuna, lablab, shemp, stable]; fract_carb=[0.2, 0.3, 0.54, 0.57, 0.45, 0]; fract_cell=[0.7, 0.3, 0.37, 0.37, 0.47, 0.1]; fract_lign=[0.1, 0.4, 0.09, 0.06, 0.08, 0.9]; wfpsN2N2O_x=[22, 88]; wfpsN2N2O_y=[0.1, 1]
        SoilOrganicMatter: same as Truth.Field.Soil.SoilOrganicMatter
        Analysis: Thickness=[150, 150, 300, 300, 300, 300, 300]; PH=[8, 8, 8, 8, 8, 8, 8]; PHUnits=Water; BoronUnits=HotWater
        InitialWater: PercentMethod=EvenlyDistributed; FractionFull=0.5; RelativeTo=LL15
        Sample InitialN: same as Truth.Field.Soil.InitialN
        CERESSoilTemperature
      SurfaceOrganicMatter: same as Truth.Field.SurfaceOrganicMatter
      Plant15 Wheat: AutoHarvest=true; CropType=Wheat
      MicroClimate: a_interception=0; b_interception=1; c_interception=0; d_interception=0; soil_albedo=0.3; sun_angle=15; soil_heat_flux_fraction=0.4; night_interception_fraction=0.5; refheight=2; albedo=0.15; emissivity=0.96; RadIntTotal=0
      Manager SowingFertiliser: same as Truth.Field.SowingFertiliser
      Manager SowingRule
        StartDate = 10-may
        EndDate = 10-may
        MinESW = 0
        MinRain = 0
        RainDays = 7
        CultivarName = Custom3
        SowingDepth = 30
        RowSpacing = 250
        Population = 120
        script: same as in Truth.Field.SowingRule
      SoluteManager
    Control: DAOption=OpenLoop; EnsembleSize=50; AddModelError=false; FixPhenology=false; DoYPheno=[131, 132, 136, 137, 202, 247, 255, 288, 290, 291, 0]
      OpenLoop
      InitialConditions: InitialDate=1996-01-01; InitialSWError=[0.1, 0.09, 0.08, 0.07, 0.06, 0.06, 0.06]
        InitialSW=[0.322424, 0.246612, 0.258995, 0.214849, 0.201603, 0.235661, 0.277666]
      StateVariables: same as Truth.Control.StateVariables
      Observations: same as Truth.Control.Observations
  Simulation Ensemble4
    Clock: StartDate=1996-01-01; EndDate=1996-12-30
    Summary SummaryFile
    Weather: FileName=../Met/Weather_Ensemble4.met
    Zone Field: Area=1; Slope=0
      Report: same as Truth.Field.Report
      Fertiliser
      Soil: ASCOrder=Vertosol; ASCSubOrder=Black; SoilType=Clay; Site=Norwin; NearestTown=Norwin; Region=Darling Downs and Granite Belt; State=Queensland; Country=Australia; NaturalVegetation=Qld. Bluegrass, possible Qld. Blue gum; ApsoilNumber=900; Latitude=-27.581836; Longitude=151.320206; LocationAccuracy=+/- 20m
        DataSource=CSIRO Sustainable Ecosystems, Toowoomba; Characteriesd as part of the GRDC funded project"Doing it better, doing it smarter, managing soil water in Australian agriculture' 2011
        Comments=OC, CLL for all crops estimated-based on Bongeen Mywybilla Soil No1
        Water
          Thickness  BD   AirDry     LL15       DUL       SAT       KS
          150        1.3  0.0724251  0.0924251  0.376381  0.476381  20
          150        1.3  0.104911   0.124911   0.330386  0.430386  20
          300        1.4  0.112894   0.132894   0.358737  0.458737  20
          300        1.4  0.0761776  0.0961776  0.332761  0.432761  20
          300        1.5  0.118498   0.138498   0.378082  0.478082  20
          300        1.5  0.0857112  0.105711   0.370485  0.470485  20
          300        1.5  0.136072   0.156072   0.382195  0.482195  20
          SoilCrop WheatSoil
            LL=[0.0924251, 0.124911, 0.132894, 0.0961776, 0.138498, 0.105711, 0.156072]
            KL=[0.06, 0.06, 0.06, 0.04, 0.04, 0.02, 0.01]
            XF=[1, 1, 1, 1, 1, 1, 1]
        SoilWater: same as Truth.Field.Soil.SoilWater
        SoilNitrogen: fom_type=[default, manure, mucuna, lablab, shemp, stable]; fract_carb=[0.2, 0.3, 0.54, 0.57, 0.45, 0]; fract_cell=[0.7, 0.3, 0.37, 0.37, 0.47, 0.1]; fract_lign=[0.1, 0.4, 0.09, 0.06, 0.08, 0.9]; wfpsN2N2O_x=[22, 88]; wfpsN2N2O_y=[0.1, 1]
        SoilOrganicMatter: same as Truth.Field.Soil.SoilOrganicMatter
        Analysis: Thickness=[150, 150, 300, 300, 300, 300, 300]; PH=[8, 8, 8, 8, 8, 8, 8]; PHUnits=Water; BoronUnits=HotWater
        InitialWater: PercentMethod=EvenlyDistributed; FractionFull=0.5; RelativeTo=LL15
        Sample InitialN: same as Truth.Field.Soil.InitialN
        CERESSoilTemperature
      SurfaceOrganicMatter: same as Truth.Field.SurfaceOrganicMatter
      Plant15 Wheat: AutoHarvest=true; CropType=Wheat
      MicroClimate: a_interception=0; b_interception=1; c_interception=0; d_interception=0; soil_albedo=0.3; sun_angle=15; soil_heat_flux_fraction=0.4; night_interception_fraction=0.5; refheight=2; albedo=0.15; emissivity=0.96; RadIntTotal=0
      Manager SowingFertiliser: same as Truth.Field.SowingFertiliser
      Manager SowingRule
        StartDate = 10-may
        EndDate = 10-may
        MinESW = 0
        MinRain = 0
        RainDays = 7
        CultivarName = Custom4
        SowingDepth = 30
        RowSpacing = 250
        Population = 120
        script: same as in Truth.Field.SowingRule
      SoluteManager
    Control: DAOption=OpenLoop; EnsembleSize=50; AddModelError=false; FixPhenology=false; DoYPheno=[131, 132, 136, 137, 202, 247, 255, 288, 290, 291, 0]
      OpenLoop
      InitialConditions: InitialDate=1996-01-01; InitialSWError=[0.1, 0.09, 0.08, 0.07, 0.06, 0.06, 0.06]
        InitialSW=[0.420772, 0.383347, 0.380194, 0.368398, 0.340088, 0.326222, 0.323071]
      StateVariables: same as Truth.Control.StateVariables
      Observations: same as Truth.Control.Observations
  Simulation Ensemble5
    Clock: StartDate=1996-01-01; EndDate=1996-12-30
    Summary SummaryFile
    Weather: FileName=../Met/Weather_Ensemble5.met
    Zone Field: Area=1; Slope=0
      Report: same as Truth.Field.Report
      Fertiliser
      Soil: ASCOrder=Vertosol; ASCSubOrder=Black; SoilType=Clay; Site=Norwin; NearestTown=Norwin; Region=Darling Downs and Granite Belt; State=Queensland; Country=Australia; NaturalVegetation=Qld. Bluegrass, possible Qld. Blue gum; ApsoilNumber=900; Latitude=-27.581836; Longitude=151.320206; LocationAccuracy=+/- 20m
        DataSource=CSIRO Sustainable Ecosystems, Toowoomba; Characteriesd as part of the GRDC funded project"Doing it better, doing it smarter, managing soil water in Australian agriculture' 2011
        Comments=OC, CLL for all crops estimated-based on Bongeen Mywybilla Soil No1
        Water
          Thickness  BD   AirDry     LL15       DUL       SAT       KS
          150        1.3  0.0446209  0.0646209  0.389197  0.489197  20
          150        1.3  0.0763258  0.0963258  0.33262   0.43262   20
          300        1.4  0.0940137  0.114014   0.342889  0.442889  20
          300        1.4  0.112811   0.132811   0.314514  0.414514  20
          300        1.5  0.130694   0.150694   0.337196  0.437196  20
          300        1.5  0.0882937  0.108294   0.322381  0.422381  20
          300        1.5  0.118512   0.138512   0.362999  0.462999  20
          SoilCrop WheatSoil
            LL=[0.0646209, 0.0963258, 0.114014, 0.132811, 0.150694, 0.108294, 0.138512]
            KL=[0.06, 0.06, 0.06, 0.04, 0.04, 0.02, 0.01]
            XF=[1, 1, 1, 1, 1, 1, 1]
        SoilWater: same as Truth.Field.Soil.SoilWater
        SoilNitrogen: fom_type=[default, manure, mucuna, lablab, shemp, stable]; fract_carb=[0.2, 0.3, 0.54, 0.57, 0.45, 0]; fract_cell=[0.7, 0.3, 0.37, 0.37, 0.47, 0.1]; fract_lign=[0.1, 0.4, 0.09, 0.06, 0.08, 0.9]; wfpsN2N2O_x=[22, 88]; wfpsN2N2O_y=[0.1, 1]
        SoilOrganicMatter: same as Truth.Field.Soil.SoilOrganicMatter
        Analysis: Thickness=[150, 150, 300, 300, 300, 300, 300]; PH=[8, 8, 8, 8, 8, 8, 8]; PHUnits=Water; BoronUnits=HotWater
        InitialWater: PercentMethod=EvenlyDistributed; FractionFull=0.5; RelativeTo=LL15
        Sample InitialN: same as Truth.Field.Soil.InitialN
        CERESSoilTemperature
      SurfaceOrganicMatter: same as Truth.Field.SurfaceOrganicMatter
      Plant15 Wheat: AutoHarvest=true; CropType=Wheat
      MicroClimate: a_interception=0; b_interception=1; c_interception=0; d_interception=0; soil_albedo=0.3; sun_angle=15; soil_heat_flux_fraction=0.4; night_interception_fraction=0.5; refheight=2; albedo=0.15; emissivity=0.96; RadIntTotal=0
      Manager SowingFertiliser: same as Truth.Field.SowingFertiliser
      Manager SowingRule
        StartDate = 10-may
        EndDate = 10-may
        MinESW = 0
        MinRain = 0
        RainDays = 7
        CultivarName = Custom5
        SowingDepth = 30
        RowSpacing = 250
        Population = 120
        script: same as in Truth.Field.SowingRule
      SoluteManager
    Control: DAOption=OpenLoop; EnsembleSize=50; AddModelError=false; FixPhenology=false; DoYPheno=[131, 132, 136, 137, 202, 247, 255, 288, 290, 291, 0]
      OpenLoop
      InitialConditions: InitialDate=1996-01-01; InitialSWError=[0.1, 0.09, 0.08, 0.07, 0.06, 0.06, 0.06]
        InitialSW=[0.288291, 0.249888, 0.287407, 0.290017, 0.268012, 0.261092, 0.279266]
      StateVariables: same as Truth.Control.StateVariables
      Observations: same as Truth.Control.Observations
  Simulation Ensemble6
    Clock: StartDate=1996-01-01; EndDate=1996-12-30
    Summary SummaryFile
    Weather: FileName=../Met/Weather_Ensemble6.met
    Zone Field: Area=1; Slope=0
      Report: same as Truth.Field.Report
      Fertiliser
      Soil: ASCOrder=Vertosol; ASCSubOrder=Black; SoilType=Clay; Site=Norwin; NearestTown=Norwin; Region=Darling Downs and Granite Belt; State=Queensland; Country=Australia; NaturalVegetation=Qld. Bluegrass, possible Qld. Blue gum; ApsoilNumber=900; Latitude=-27.581836; Longitude=151.320206; LocationAccuracy=+/- 20m
        DataSource=CSIRO Sustainable Ecosystems, Toowoomba; Characteriesd as part of the GRDC funded project"Doing it better, doing it smarter, managing soil water in Australian agriculture' 2011
        Comments=OC, CLL for all crops estimated-based on Bongeen Mywybilla Soil No1
        Water
          Thickness  BD   AirDry     LL15       DUL       SAT       KS
          150        1.3  0.0539206  0.0739206  0.407903  0.507903  20
          150        1.3  0.0973112  0.117311   0.404862  0.504862  20
          300        1.4  0.0687273  0.0887273  0.369064  0.469064  20
          300        1.4  0.0976436  0.117644   0.323631  0.423631  20
          300        1.5  0.113588   0.133588   0.337938  0.437938  20
          300        1.5  0.114342   0.134342   0.309793  0.409793  20
          300        1.5  0.127606   0.147606   0.304093  0.404093  20
          SoilCrop WheatSoil
            LL=[0.0739206, 0.117311, 0.0887273, 0.117644, 0.133588, 0.134342, 0.147606]
            KL=[0.06, 0.06, 0.06, 0.04, 0.04, 0.02, 0.01]
            XF=[1, 1, 1, 1, 1, 1, 1]
        SoilWater: same as Truth.Field.Soil.SoilWater
        SoilNitrogen: fom_type=[default, manure, mucuna, lablab, shemp, stable]; fract_carb=[0.2, 0.3, 0.54, 0.57, 0.45, 0]; fract_cell=[0.7, 0.3, 0.37, 0.37, 0.47, 0.1]; fract_lign=[0.1, 0.4, 0.09, 0.06, 0.08, 0.9]; wfpsN2N2O_x=[22, 88]; wfpsN2N2O_y=[0.1, 1]
        SoilOrganicMatter: same as Truth.Field.Soil.SoilOrganicMatter
        Analysis: Thickness=[150, 150, 300, 300, 300, 300, 300]; PH=[8, 8, 8, 8, 8, 8, 8]; PHUnits=Water; BoronUnits=HotWater
        InitialWater: PercentMethod=EvenlyDistributed; FractionFull=0.5; RelativeTo=LL15
        Sample InitialN: same as Truth.Field.Soil.InitialN
        CERESSoilTemperature
      SurfaceOrganicMatter: same as Truth.Field.SurfaceOrganicMatter
      Plant15 Wheat: AutoHarvest=true; CropType=Wheat
      MicroClimate: a_interception=0; b_interception=1; c_interception=0; d_interception=0; soil_albedo=0.3; sun_angle=15; soil_heat_flux_fraction=0.4; night_interception_fraction=0.5; refheight=2; albedo=0.15; emissivity=0.96; RadIntTotal=0
      Manager SowingFertiliser: same as Truth.Field.SowingFertiliser
      Manager SowingRule
        StartDate = 10-may
        EndDate = 10-may
        MinESW = 0
        MinRain = 0
        RainDays = 7
        CultivarName = Custom6
        SowingDepth = 30
        RowSpacing = 250
        Population = 120
        script: same as in Truth.Field.SowingRule
      SoluteManager
    Control: DAOption=OpenLoop; EnsembleSize=50; AddModelError=false; FixPhenology=false; DoYPheno=[131, 132, 136, 137, 202, 247, 255, 288, 290, 291, 0]
      OpenLoop
      InitialConditions: InitialDate=1996-01-01; InitialSWError=[0.1, 0.09, 0.08, 0.07, 0.06, 0.06, 0.06]
        InitialSW=[0.385447, 0.38296, 0.354148, 0.37902, 0.380828, 0.354439, 0.34926]
      StateVariables: same as Truth.Control.StateVariables
      Observations: same as Truth.Control.Observations
  Simulation Ensemble7
    Clock: StartDate=1996-01-01; EndDate=1996-12-30
    Summary SummaryFile
    Weather: FileName=../Met/Weather_Ensemble7.met
    Zone Field: Area=1; Slope=0
      Report: same as Truth.Field.Report
      Fertiliser
      Soil: ASCOrder=Vertosol; ASCSubOrder=Black; SoilType=Clay; Site=Norwin; NearestTown=Norwin; Region=Darling Downs and Granite Belt; State=Queensland; Country=Australia; NaturalVegetation=Qld. Bluegrass, possible Qld. Blue gum; ApsoilNumber=900; Latitude=-27.581836; Longitude=151.320206; LocationAccuracy=+/- 20m
        DataSource=CSIRO Sustainable Ecosystems, Toowoomba; Characteriesd as part of the GRDC funded project"Doing it better, doing it smarter, managing soil water in Australian agriculture' 2011
        Comments=OC, CLL for all crops estimated-based on Bongeen Mywybilla Soil No1
        Water
          Thickness  BD   AirDry     LL15       DUL       SAT       KS
          150        1.3  0.0513147  0.0713147  0.407069  0.507069  20
          150        1.3  0.0641978  0.0841978  0.38112   0.48112   20
          300        1.4  0.0809374  0.100937   0.383796  0.483796  20
          300        1.4  0.109938   0.129938   0.365203  0.465203  20
          300        1.5  0.123837   0.143837   0.344543  0.444543  20
          300        1.5  0.0771762  0.0971762  0.323438  0.423438  20
          300        1.5  0.145801   0.165801   0.324611  0.424611  20
          SoilCrop WheatSoil
            LL=[0.0713147, 0.0841978, 0.100937, 0.129938, 0.143837, 0.0971762, 0.165801]
            KL=[0.06, 0.06, 0.06, 0.04, 0.04, 0.02, 0.01]
            XF=[1, 1, 1, 1, 1, 1, 1]
        SoilWater: same as Truth.Field.Soil.SoilWater
        SoilNitrogen: fom_type=[default, manure, mucuna, lablab, shemp, stable]; fract_carb=[0.2, 0.3, 0.54, 0.57, 0.45, 0]; fract_cell=[0.7, 0.3, 0.37, 0.37, 0.47, 0.1]; fract_lign=[0.1, 0.4, 0.09, 0.06, 0.08, 0.9]; wfpsN2N2O_x=[22, 88]; wfpsN2N2O_y=[0.1, 1]
        SoilOrganicMatter: same as Truth.Field.Soil.SoilOrganicMatter
        Analysis: Thickness=[150, 150, 300, 300, 300, 300, 300]; PH=[8, 8, 8, 8, 8, 8, 8]; PHUnits=Water; BoronUnits=HotWater
        InitialWater: PercentMethod=EvenlyDistributed; FractionFull=0.5; RelativeTo=LL15
        Sample InitialN: same as Truth.Field.Soil.InitialN
        CERESSoilTemperature
      SurfaceOrganicMatter: same as Truth.Field.SurfaceOrganicMatter
      Plant15 Wheat: AutoHarvest=true; CropType=Wheat
      MicroClimate: a_interception=0; b_interception=1; c_interception=0; d_interception=0; soil_albedo=0.3; sun_angle=15; soil_heat_flux_fraction=0.4; night_interception_fraction=0.5; refheight=2; albedo=0.15; emissivity=0.96; RadIntTotal=0
      Manager SowingFertiliser: same as Truth.Field.SowingFertiliser
      Manager SowingRule
        StartDate = 10-may
        EndDate = 10-may
        MinESW = 0
        MinRain = 0
        RainDays = 7
        CultivarName = Custom7
        SowingDepth = 30
        RowSpacing = 250
        Population = 120
        script: same as in Truth.Field.SowingRule
      SoluteManager
    Control: DAOption=OpenLoop; EnsembleSize=50; AddModelError=false; FixPhenology=false; DoYPheno=[131, 132, 136, 137, 202, 247, 255, 288, 290, 291, 0]
      OpenLoop
      InitialConditions: InitialDate=1996-01-01; InitialSWError=[0.1, 0.09, 0.08, 0.07, 0.06, 0.06, 0.06]
        InitialSW=[0.300545, 0.238554, 0.237604, 0.228507, 0.208951, 0.216636, 0.251726]
      StateVariables: same as Truth.Control.StateVariables
      Observations: same as Truth.Control.Observations
  Simulation Ensemble8
    Clock: StartDate=1996-01-01; EndDate=1996-12-30
    Summary SummaryFile
    Weather: FileName=../Met/Weather_Ensemble8.met
    Zone Field: Area=1; Slope=0
      Report: same as Truth.Field.Report
      Fertiliser
      Soil: ASCOrder=Vertosol; ASCSubOrder=Black; SoilType=Clay; Site=Norwin; NearestTown=Norwin; Region=Darling Downs and Granite Belt; State=Queensland; Country=Australia; NaturalVegetation=Qld. Bluegrass, possible Qld. Blue gum; ApsoilNumber=900; Latitude=-27.581836; Longitude=151.320206; LocationAccuracy=+/- 20m
        DataSource=CSIRO Sustainable Ecosystems, Toowoomba; Characteriesd as part of the GRDC funded project"Doing it better, doing it smarter, managing soil water in Australian agriculture' 2011
        Comments=OC, CLL for all crops estimated-based on Bongeen Mywybilla Soil No1
        Water
          Thickness  BD   AirDry     LL15       DUL       SAT       KS
          150        1.3  0.0574618  0.0774618  0.355855  0.455855  20
          150        1.3  0.0938541  0.113854   0.331559  0.431559  20
          300        1.4  0.0750108  0.0950108  0.378951  0.478951  20
          300        1.4  0.0800472  0.100047   0.351465  0.451465  20
          300        1.5  0.106857   0.126857   0.358412  0.458412  20
          300        1.5  0.113728   0.133728   0.362368  0.462368  20
          300        1.5  0.12022    0.14022    0.400779  0.500779  20
          SoilCrop WheatSoil
            LL=[0.0774618, 0.113854, 0.0950108, 0.100047, 0.126857, 0.133728, 0.14022]
            KL=[0.06, 0.06, 0.06, 0.04, 0.04, 0.02, 0.01]
            XF=[1, 1, 1, 1, 1, 1, 1]
        SoilWater: same as Truth.Field.Soil.SoilWater
        SoilNitrogen: fom_type=[default, manure, mucuna, lablab, shemp, stable]; fract_carb=[0.2, 0.3, 0.54, 0.57, 0.45, 0]; fract_cell=[0.7, 0.3, 0.37, 0.37, 0.47, 0.1]; fract_lign=[0.1, 0.4, 0.09, 0.06, 0.08, 0.9]; wfpsN2N2O_x=[22, 88]; wfpsN2N2O_y=[0.1, 1]
        SoilOrganicMatter: same as Truth.Field.Soil.SoilOrganicMatter
        Analysis: Thickness=[150, 150, 300, 300, 300, 300, 300]; PH=[8, 8, 8, 8, 8, 8, 8]; PHUnits=Water; BoronUnits=HotWater
        InitialWater: PercentMethod=EvenlyDistributed; FractionFull=0.5; RelativeTo=LL15
        Sample InitialN: same as Truth.Field.Soil.InitialN
        CERESSoilTemperature
      SurfaceOrganicMatter: same as Truth.Field.SurfaceOrganicMatter
      Plant15 Wheat: AutoHarvest=true; CropType=Wheat
      MicroClimate: a_interception=0; b_interception=1; c_interception=0; d_interception=0; soil_albedo=0.3; sun_angle=15; soil_heat_flux_fraction=0.4; night_interception_fraction=0.5; refheight=2; albedo=0.15; emissivity=0.96; RadIntTotal=0
      Manager SowingFertiliser: same as Truth.Field.SowingFertiliser
      Manager SowingRule
        StartDate = 10-may
        EndDate = 10-may
        MinESW = 0
        MinRain = 0
        RainDays = 7
        CultivarName = Custom8
        SowingDepth = 30
        RowSpacing = 250
        Population = 120
        script: same as in Truth.Field.SowingRule
      SoluteManager
    Control: DAOption=OpenLoop; EnsembleSize=50; AddModelError=false; FixPhenology=false; DoYPheno=[131, 132, 136, 137, 202, 247, 255, 288, 290, 291, 0]
      OpenLoop
      InitialConditions: InitialDate=1996-01-01; InitialSWError=[0.1, 0.09, 0.08, 0.07, 0.06, 0.06, 0.06]
        InitialSW=[0.392551, 0.307557, 0.275101, 0.268715, 0.282698, 0.303806, 0.337341]
      StateVariables: same as Truth.Control.StateVariables
      Observations: same as Truth.Control.Observations
  Simulation Ensemble9
    Clock: StartDate=1996-01-01; EndDate=1996-12-30
    Summary SummaryFile
    Weather: FileName=../Met/Weather_Ensemble9.met
    Zone Field: Area=1; Slope=0
      Report: same as Truth.Field.Report
      Fertiliser
      Soil: ASCOrder=Vertosol; ASCSubOrder=Black; SoilType=Clay; Site=Norwin; NearestTown=Norwin; Region=Darling Downs and Granite Belt; State=Queensland; Country=Australia; NaturalVegetation=Qld. Bluegrass, possible Qld. Blue gum; ApsoilNumber=900; Latitude=-27.581836; Longitude=151.320206; LocationAccuracy=+/- 20m
        DataSource=CSIRO Sustainable Ecosystems, Toowoomba; Characteriesd as part of the GRDC funded project"Doing it better, doing it smarter, managing soil water in Australian agriculture' 2011
        Comments=OC, CLL for all crops estimated-based on Bongeen Mywybilla Soil No1
        Water
          Thickness  BD   AirDry     LL15       DUL       SAT       KS
          150        1.3  0.0808054  0.100805   0.371951  0.471951  20
          150        1.3  0.113521   0.133521   0.361805  0.461805  20
          300        1.4  0.082861   0.102861   0.349103  0.449103  20
          300        1.4  0.0439175  0.0639175  0.309466  0.409466  20
          300        1.5  0.0991546  0.119155   0.351569  0.451569  20
          300        1.5  0.0874843  0.107484   0.402489  0.502489  20
          300        1.5  0.118493   0.138493   0.351817  0.451817  20
          SoilCrop WheatSoil
            LL=[0.100805, 0.133521, 0.102861, 0.0639175, 0.119155, 0.107484, 0.138493]
            KL=[0.06, 0.06, 0.06, 0.04, 0.04, 0.02, 0.01]
            XF=[1, 1, 1, 1, 1, 1, 1]
        SoilWater: same as Truth.Field.Soil.SoilWater
        SoilNitrogen: fom_type=[default, manure, mucuna, lablab, shemp, stable]; fract_carb=[0.2, 0.3, 0.54, 0.57, 0.45, 0]; fract_cell=[0.7, 0.3, 0.37, 0.37, 0.47, 0.1]; fract_lign=[0.1, 0.4, 0.09, 0.06, 0.08, 0.9]; wfpsN2N2O_x=[22, 88]; wfpsN2N2O_y=[0.1, 1]
        SoilOrganicMatter: same as Truth.Field.Soil.SoilOrganicMatter
        Analysis: Thickness=[150, 150, 300, 300, 300, 300, 300]; PH=[8, 8, 8, 8, 8, 8, 8]; PHUnits=Water; BoronUnits=HotWater
        InitialWater: PercentMethod=EvenlyDistributed; FractionFull=0.5; RelativeTo=LL15
        Sample InitialN: same as Truth.Field.Soil.InitialN
        CERESSoilTemperature
      SurfaceOrganicMatter: same as Truth.Field.SurfaceOrganicMatter
      Plant15 Wheat: AutoHarvest=true; CropType=Wheat
      MicroClimate: a_interception=0; b_interception=1; c_interception=0; d_interception=0; soil_albedo=0.3; sun_angle=15; soil_heat_flux_fraction=0.4; night_interception_fraction=0.5; refheight=2; albedo=0.15; emissivity=0.96; RadIntTotal=0
      Manager SowingFertiliser: same as Truth.Field.SowingFertiliser
      Manager SowingRule
        StartDate = 10-may
        EndDate = 10-may
        MinESW = 0
        MinRain = 0
        RainDays = 7
        CultivarName = Custom9
        SowingDepth = 30
        RowSpacing = 250
        Population = 120
        script: same as in Truth.Field.SowingRule
      SoluteManager
    Control: DAOption=OpenLoop; EnsembleSize=50; AddModelError=false; FixPhenology=false; DoYPheno=[131, 132, 136, 137, 202, 247, 255, 288, 290, 291, 0]
      OpenLoop
      InitialConditions: InitialDate=1996-01-01; InitialSWError=[0.1, 0.09, 0.08, 0.07, 0.06, 0.06, 0.06]
        InitialSW=[0.170563, 0.185306, 0.219049, 0.242854, 0.250778, 0.256857, 0.266167]
      StateVariables: same as Truth.Control.StateVariables
      Observations: same as Truth.Control.Observations
  Simulation Ensemble10
    Clock: StartDate=1996-01-01; EndDate=1996-12-30
    Summary SummaryFile
    Weather: FileName=../Met/Weather_Ensemble10.met
    Zone Field: Area=1; Slope=0
      Report: same as Truth.Field.Report
      Fertiliser
      Soil: ASCOrder=Vertosol; ASCSubOrder=Black; SoilType=Clay; Site=Norwin; NearestTown=Norwin; Region=Darling Downs and Granite Belt; State=Queensland; Country=Australia; NaturalVegetation=Qld. Bluegrass, possible Qld. Blue gum; ApsoilNumber=900; Latitude=-27.581836; Longitude=151.320206; LocationAccuracy=+/- 20m
        DataSource=CSIRO Sustainable Ecosystems, Toowoomba; Characteriesd as part of the GRDC funded project"Doing it better, doing it smarter, managing soil water in Australian agriculture' 2011
        Comments=OC, CLL for all crops estimated-based on Bongeen Mywybilla Soil No1
        Water
          Thickness  BD   AirDry     LL15       DUL       SAT       KS
          150        1.3  0.0686992  0.0886992  0.406981  0.506981  20
          150        1.3  0.0849558  0.104956   0.358166  0.458166  20
          300        1.4  0.104317   0.124317   0.358954  0.458954  20
          300        1.4  0.132182   0.152182   0.279244  0.379244  20
          300        1.5  0.107399   0.127399   0.323806  0.423806  20
          300        1.5  0.0681969  0.0881969  0.299225  0.399225  20
          300        1.5  0.103606   0.123606   0.345312  0.445312  20
          SoilCrop WheatSoil
            LL=[0.0886992, 0.104956, 0.124317, 0.152182, 0.127399, 0.0881969, 0.123606]
            KL=[0.06, 0.06, 0.06, 0.04, 0.04, 0.02, 0.01]
            XF=[1, 1, 1, 1, 1, 1, 1]
        SoilWater: same as Truth.Field.Soil.SoilWater
        SoilNitrogen: fom_type=[default, manure, mucuna, lablab, shemp, stable]; fract_carb=[0.2, 0.3, 0.54, 0.57, 0.45, 0]; fract_cell=[0.7, 0.3, 0.37, 0.37, 0.47, 0.1]; fract_lign=[0.1, 0.4, 0.09, 0.06, 0.08, 0.9]; wfpsN2N2O_x=[22, 88]; wfpsN2N2O_y=[0.1, 1]
        SoilOrganicMatter: same as Truth.Field.Soil.SoilOrganicMatter
        Analysis: Thickness=[150, 150, 300, 300, 300, 300, 300]; PH=[8, 8, 8, 8, 8, 8, 8]; PHUnits=Water; BoronUnits=HotWater
        InitialWater: PercentMethod=EvenlyDistributed; FractionFull=0.5; RelativeTo=LL15
        Sample InitialN: same as Truth.Field.Soil.InitialN
        CERESSoilTemperature
      SurfaceOrganicMatter: same as Truth.Field.SurfaceOrganicMatter
      Plant15 Wheat: AutoHarvest=true; CropType=Wheat
      MicroClimate: a_interception=0; b_interception=1; c_interception=0; d_interception=0; soil_albedo=0.3; sun_angle=15; soil_heat_flux_fraction=0.4; night_interception_fraction=0.5; refheight=2; albedo=0.15; emissivity=0.96; RadIntTotal=0
      Manager SowingFertiliser: same as Truth.Field.SowingFertiliser
      Manager SowingRule
        StartDate = 10-may
        EndDate = 10-may
        MinESW = 0
        MinRain = 0
        RainDays = 7
        CultivarName = Custom10
        SowingDepth = 30
        RowSpacing = 250
        Population = 120
        script: same as in Truth.Field.SowingRule
      SoluteManager
    Control: DAOption=OpenLoop; EnsembleSize=50; AddModelError=false; FixPhenology=false; DoYPheno=[131, 132, 136, 137, 202, 247, 255, 288, 290, 291, 0]
      OpenLoop
      InitialConditions: InitialDate=1996-01-01; InitialSWError=[0.1, 0.09, 0.08, 0.07, 0.06, 0.06, 0.06]
        InitialSW=[0.381173, 0.33094, 0.291601, 0.299405, 0.318069, 0.319121, 0.29467]
      StateVariables: same as Truth.Control.StateVariables
      Observations: same as Truth.Control.Observations
  Simulation Ensemble11
    Clock: StartDate=1996-01-01; EndDate=1996-12-30
    Summary SummaryFile
    Weather: FileName=../Met/Weather_Ensemble11.met
    Zone Field: Area=1; Slope=0
      Report: same as Truth.Field.Report
      Fertiliser
      Soil: ASCOrder=Vertosol; ASCSubOrder=Black; SoilType=Clay; Site=Norwin; NearestTown=Norwin; Region=Darling Downs and Granite Belt; State=Queensland; Country=Australia; NaturalVegetation=Qld. Bluegrass, possible Qld. Blue gum; ApsoilNumber=900; Latitude=-27.581836; Longitude=151.320206; LocationAccuracy=+/- 20m
        DataSource=CSIRO Sustainable Ecosystems, Toowoomba; Characteriesd as part of the GRDC funded project"Doing it better, doing it smarter, managing soil water in Australian agriculture' 2011
        Comments=OC, CLL for all crops estimated-based on Bongeen Mywybilla Soil No1
        Water
          Thickness  BD   AirDry     LL15       DUL       SAT       KS
          150        1.3  0.0464268  0.0664268  0.43409   0.53409   20
          150        1.3  0.0844396  0.10444    0.457752  0.557752  20
          300        1.4  0.0849378  0.104938   0.389276  0.489276  20
          300        1.4  0.141677   0.161677   0.343975  0.443975  20
          300        1.5  0.126301   0.146301   0.344201  0.444201  20
          300        1.5  0.106645   0.126645   0.286145  0.386145  20
          300        1.5  0.110854   0.130854   0.320703  0.420703  20
          SoilCrop WheatSoil
            LL=[0.0664268, 0.10444, 0.104938, 0.161677, 0.146301, 0.126645, 0.130854]
            KL=[0.06, 0.06, 0.06, 0.04, 0.04, 0.02, 0.01]
            XF=[1, 1, 1, 1, 1, 1, 1]
        SoilWater: same as Truth.Field.Soil.SoilWater
        SoilNitrogen: fom_type=[default, manure, mucuna, lablab, shemp, stable]; fract_carb=[0.2, 0.3, 0.54, 0.57, 0.45, 0]; fract_cell=[0.7, 0.3, 0.37, 0.37, 0.47, 0.1]; fract_lign=[0.1, 0.4, 0.09, 0.06, 0.08, 0.9]; wfpsN2N2O_x=[22, 88]; wfpsN2N2O_y=[0.1, 1]
        SoilOrganicMatter: same as Truth.Field.Soil.SoilOrganicMatter
        Analysis: Thickness=[150, 150, 300, 300, 300, 300, 300]; PH=[8, 8, 8, 8, 8, 8, 8]; PHUnits=Water; BoronUnits=HotWater
        InitialWater: PercentMethod=EvenlyDistributed; FractionFull=0.5; RelativeTo=LL15
        Sample InitialN: same as Truth.Field.Soil.InitialN
        CERESSoilTemperature
      SurfaceOrganicMatter: same as Truth.Field.SurfaceOrganicMatter
      Plant15 Wheat: AutoHarvest=true; CropType=Wheat
      MicroClimate: a_interception=0; b_interception=1; c_interception=0; d_interception=0; soil_albedo=0.3; sun_angle=15; soil_heat_flux_fraction=0.4; night_interception_fraction=0.5; refheight=2; albedo=0.15; emissivity=0.96; RadIntTotal=0
      Manager SowingFertiliser: same as Truth.Field.SowingFertiliser
      Manager SowingRule
        StartDate = 10-may
        EndDate = 10-may
        MinESW = 0
        MinRain = 0
        RainDays = 7
        CultivarName = Custom11
        SowingDepth = 30
        RowSpacing = 250
        Population = 120
        script: same as in Truth.Field.SowingRule
      SoluteManager
    Control: DAOption=OpenLoop; EnsembleSize=50; AddModelError=false; FixPhenology=false; DoYPheno=[131, 132, 136, 137, 202, 247, 255, 288, 290, 291, 0]
      OpenLoop
      InitialConditions: InitialDate=1996-01-01; InitialSWError=[0.1, 0.09, 0.08, 0.07, 0.06, 0.06, 0.06]
        InitialSW=[0.394407, 0.436777, 0.39467, 0.406985, 0.404018, 0.380489, 0.342269]
      StateVariables: same as Truth.Control.StateVariables
      Observations: same as Truth.Control.Observations
  Simulation Ensemble12
    Clock: StartDate=1996-01-01; EndDate=1996-12-30
    Summary SummaryFile
    Weather: FileName=../Met/Weather_Ensemble12.met
    Zone Field: Area=1; Slope=0
      Report: same as Truth.Field.Report
      Fertiliser
      Soil: ASCOrder=Vertosol; ASCSubOrder=Black; SoilType=Clay; Site=Norwin; NearestTown=Norwin; Region=Darling Downs and Granite Belt; State=Queensland; Country=Australia; NaturalVegetation=Qld. Bluegrass, possible Qld. Blue gum; ApsoilNumber=900; Latitude=-27.581836; Longitude=151.320206; LocationAccuracy=+/- 20m
        DataSource=CSIRO Sustainable Ecosystems, Toowoomba; Characteriesd as part of the GRDC funded project"Doing it better, doing it smarter, managing soil water in Australian agriculture' 2011
        Comments=OC, CLL for all crops estimated-based on Bongeen Mywybilla Soil No1
        Water
          Thickness  BD   AirDry     LL15       DUL       SAT       KS
          150        1.3  0.0358555  0.0558555  0.426001  0.526001  20
          150        1.3  0.0699428  0.0899428  0.370618  0.470618  20
          300        1.4  0.0667454  0.0867454  0.406239  0.506239  20
          300        1.4  0.101341   0.121341   0.360831  0.460831  20
          300        1.5  0.139082   0.159082   0.369445  0.469445  20
          300        1.5  0.139552   0.159552   0.338742  0.438742  20
          300        1.5  0.126847   0.146847   0.301035  0.401035  20
          SoilCrop WheatSoil
            LL=[0.0558555, 0.0899428, 0.0867454, 0.121341, 0.159082, 0.159552, 0.146847]
            KL=[0.06, 0.06, 0.06, 0.04, 0.04, 0.02, 0.01]
            XF=[1, 1, 1, 1, 1, 1, 1]
        SoilWater: same as Truth.Field.Soil.SoilWater
        SoilNitrogen: fom_type=[default, manure, mucuna, lablab, shemp, stable]; fract_carb=[0.2, 0.3, 0.54, 0.57, 0.45, 0]; fract_cell=[0.7, 0.3, 0.37, 0.37, 0.47, 0.1]; fract_lign=[0.1, 0.4, 0.09, 0.06, 0.08, 0.9]; wfpsN2N2O_x=[22, 88]; wfpsN2N2O_y=[0.1, 1]
        SoilOrganicMatter: same as Truth.Field.Soil.SoilOrganicMatter
        Analysis: Thickness=[150, 150, 300, 300, 300, 300, 300]; PH=[8, 8, 8, 8, 8, 8, 8]; PHUnits=Water; BoronUnits=HotWater
        InitialWater: PercentMethod=EvenlyDistributed; FractionFull=0.5; RelativeTo=LL15
        Sample InitialN: same as Truth.Field.Soil.InitialN
        CERESSoilTemperature
      SurfaceOrganicMatter: same as Truth.Field.SurfaceOrganicMatter
      Plant15 Wheat: AutoHarvest=true; CropType=Wheat
      MicroClimate: a_interception=0; b_interception=1; c_interception=0; d_interception=0; soil_albedo=0.3; sun_angle=15; soil_heat_flux_fraction=0.4; night_interception_fraction=0.5; refheight=2; albedo=0.15; emissivity=0.96; RadIntTotal=0
      Manager SowingFertiliser: same as Truth.Field.SowingFertiliser
      Manager SowingRule
        StartDate = 10-may
        EndDate = 10-may
        MinESW = 0
        MinRain = 0
        RainDays = 7
        CultivarName = Custom12
        SowingDepth = 30
        RowSpacing = 250
        Population = 120
        script: same as in Truth.Field.SowingRule
      SoluteManager
    Control: DAOption=OpenLoop; EnsembleSize=50; AddModelError=false; FixPhenology=false; DoYPheno=[131, 132, 136, 137, 202, 247, 255, 288, 290, 291, 0]
      OpenLoop
      InitialConditions: InitialDate=1996-01-01; InitialSWError=[0.1, 0.09, 0.08, 0.07, 0.06, 0.06, 0.06]
        InitialSW=[0.489339, 0.395983, 0.287901, 0.216385, 0.246317, 0.303957, 0.322485]
      StateVariables: same as Truth.Control.StateVariables
      Observations: same as Truth.Control.Observations
  Simulation Ensemble13
    Clock: StartDate=1996-01-01; EndDate=1996-12-30
    Summary SummaryFile
    Weather: FileName=../Met/Weather_Ensemble13.met
    Zone Field: Area=1; Slope=0
      Report: same as Truth.Field.Report
      Fertiliser
      Soil: ASCOrder=Vertosol; ASCSubOrder=Black; SoilType=Clay; Site=Norwin; NearestTown=Norwin; Region=Darling Downs and Granite Belt; State=Queensland; Country=Australia; NaturalVegetation=Qld. Bluegrass, possible Qld. Blue gum; ApsoilNumber=900; Latitude=-27.581836; Longitude=151.320206; LocationAccuracy=+/- 20m
        DataSource=CSIRO Sustainable Ecosystems, Toowoomba; Characteriesd as part of the GRDC funded project"Doing it better, doing it smarter, managing soil water in Australian agriculture' 2011
        Comments=OC, CLL for all crops estimated-based on Bongeen Mywybilla Soil No1
        Water
          Thickness  BD   AirDry     LL15       DUL       SAT       KS
          150        1.3  0.0528065  0.0728065  0.338514  0.438514  20
          150        1.3  0.0829645  0.102964   0.34976   0.44976   20
          300        1.4  0.0626075  0.0826075  0.385806  0.485806  20
          300        1.4  0.0891237  0.109124   0.348137  0.448137  20
          300        1.5  0.088279   0.108279   0.378199  0.478199  20
          300        1.5  0.109819   0.129819   0.351704  0.451704  20
          300        1.5  0.134612   0.154612   0.367697  0.467697  20
          SoilCrop WheatSoil
            LL=[0.0728065, 0.102964, 0.0826075, 0.109124, 0.108279, 0.129819, 0.154612]
            KL=[0.06, 0.06, 0.06, 0.04, 0.04, 0.02, 0.01]
            XF=[1, 1, 1, 1, 1, 1, 1]
        SoilWater: same as Truth.Field.Soil.SoilWater
        SoilNitrogen: fom_type=[default, manure, mucuna, lablab, shemp, stable]; fract_carb=[0.2, 0.3, 0.54, 0.57, 0.45, 0]; fract_cell=[0.7, 0.3, 0.37, 0.37, 0.47, 0.1]; fract_lign=[0.1, 0.4, 0.09, 0.06, 0.08, 0.9]; wfpsN2N2O_x=[22, 88]; wfpsN2N2O_y=[0.1, 1]
        SoilOrganicMatter: same as Truth.Field.Soil.SoilOrganicMatter
        Analysis: Thickness=[150, 150, 300, 300, 300, 300, 300]; PH=[8, 8, 8, 8, 8, 8, 8]; PHUnits=Water; BoronUnits=HotWater
        InitialWater: PercentMethod=EvenlyDistributed; FractionFull=0.5; RelativeTo=LL15
        Sample InitialN: same as Truth.Field.Soil.InitialN
        CERESSoilTemperature
      SurfaceOrganicMatter: same as Truth.Field.SurfaceOrganicMatter
      Plant15 Wheat: AutoHarvest=true; CropType=Wheat
      MicroClimate: a_interception=0; b_interception=1; c_interception=0; d_interception=0; soil_albedo=0.3; sun_angle=15; soil_heat_flux_fraction=0.4; night_interception_fraction=0.5; refheight=2; albedo=0.15; emissivity=0.96; RadIntTotal=0
      Manager SowingFertiliser: same as Truth.Field.SowingFertiliser
      Manager SowingRule
        StartDate = 10-may
        EndDate = 10-may
        MinESW = 0
        MinRain = 0
        RainDays = 7
        CultivarName = Custom13
        SowingDepth = 30
        RowSpacing = 250
        Population = 120
        script: same as in Truth.Field.SowingRule
      SoluteManager
    Control: DAOption=OpenLoop; EnsembleSize=50; AddModelError=false; FixPhenology=false; DoYPheno=[131, 132, 136, 137, 202, 247, 255, 288, 290, 291, 0]
      OpenLoop
      InitialConditions: InitialDate=1996-01-01; InitialSWError=[0.1, 0.09, 0.08, 0.07, 0.06, 0.06, 0.06]
        InitialSW=[0.374841, 0.387716, 0.396329, 0.428845, 0.40678, 0.36051, 0.327669]
      StateVariables: same as Truth.Control.StateVariables
      Observations: same as Truth.Control.Observations
  Simulation Ensemble14
    Clock: StartDate=1996-01-01; EndDate=1996-12-30
    Summary SummaryFile
    Weather: FileName=../Met/Weather_Ensemble14.met
    Zone Field: Area=1; Slope=0
      Report: same as Truth.Field.Report
      Fertiliser
      Soil: ASCOrder=Vertosol; ASCSubOrder=Black; SoilType=Clay; Site=Norwin; NearestTown=Norwin; Region=Darling Downs and Granite Belt; State=Queensland; Country=Australia; NaturalVegetation=Qld. Bluegrass, possible Qld. Blue gum; ApsoilNumber=900; Latitude=-27.581836; Longitude=151.320206; LocationAccuracy=+/- 20m
        DataSource=CSIRO Sustainable Ecosystems, Toowoomba; Characteriesd as part of the GRDC funded project"Doing it better, doing it smarter, managing soil water in Australian agriculture' 2011
        Comments=OC, CLL for all crops estimated-based on Bongeen Mywybilla Soil No1
        Water
          Thickness  BD   AirDry     LL15      DUL       SAT       KS
          150        1.3  0.0906491  0.110649  0.377598  0.477598  20
          150        1.3  0.0960499  0.11605   0.33655   0.43655   20
          300        1.4  0.084193   0.104193  0.329445  0.429445  20
          300        1.4  0.103247   0.123247  0.330947  0.430947  20
          300        1.5  0.0890088  0.109009  0.352264  0.452264  20
          300        1.5  0.0998336  0.119834  0.310311  0.410311  20
          300        1.5  0.0908356  0.110836  0.370026  0.470026  20
          SoilCrop WheatSoil
            LL=[0.110649, 0.11605, 0.104193, 0.123247, 0.109009, 0.119834, 0.110836]
            KL=[0.06, 0.06, 0.06, 0.04, 0.04, 0.02, 0.01]
            XF=[1, 1, 1, 1, 1, 1, 1]
        SoilWater: same as Truth.Field.Soil.SoilWater
        SoilNitrogen: fom_type=[default, manure, mucuna, lablab, shemp, stable]; fract_carb=[0.2, 0.3, 0.54, 0.57, 0.45, 0]; fract_cell=[0.7, 0.3, 0.37, 0.37, 0.47, 0.1]; fract_lign=[0.1, 0.4, 0.09, 0.06, 0.08, 0.9]; wfpsN2N2O_x=[22, 88]; wfpsN2N2O_y=[0.1, 1]
        SoilOrganicMatter: same as Truth.Field.Soil.SoilOrganicMatter
        Analysis: Thickness=[150, 150, 300, 300, 300, 300, 300]; PH=[8, 8, 8, 8, 8, 8, 8]; PHUnits=Water; BoronUnits=HotWater
        InitialWater: PercentMethod=EvenlyDistributed; FractionFull=0.5; RelativeTo=LL15
        Sample InitialN: same as Truth.Field.Soil.InitialN
        CERESSoilTemperature
      SurfaceOrganicMatter: same as Truth.Field.SurfaceOrganicMatter
      Plant15 Wheat: AutoHarvest=true; CropType=Wheat
      MicroClimate: a_interception=0; b_interception=1; c_interception=0; d_interception=0; soil_albedo=0.3; sun_angle=15; soil_heat_flux_fraction=0.4; night_interception_fraction=0.5; refheight=2; albedo=0.15; emissivity=0.96; RadIntTotal=0
      Manager SowingFertiliser: same as Truth.Field.SowingFertiliser
      Manager SowingRule
        StartDate = 10-may
        EndDate = 10-may
        MinESW = 0
        MinRain = 0
        RainDays = 7
        CultivarName = Custom14
        SowingDepth = 30
        RowSpacing = 250
        Population = 120
        script: same as in Truth.Field.SowingRule
      SoluteManager
    Control: DAOption=OpenLoop; EnsembleSize=50; AddModelError=false; FixPhenology=false; DoYPheno=[131, 132, 136, 137, 202, 247, 255, 288, 290, 291, 0]
      OpenLoop
      InitialConditions: InitialDate=1996-01-01; InitialSWError=[0.1, 0.09, 0.08, 0.07, 0.06, 0.06, 0.06]
        InitialSW=[0.302998, 0.296584, 0.312445, 0.278009, 0.253459, 0.193613, 0.195553]
      StateVariables: same as Truth.Control.StateVariables
      Observations: same as Truth.Control.Observations
  Simulation Ensemble15
    Clock: StartDate=1996-01-01; EndDate=1996-12-30
    Summary SummaryFile
    Weather: FileName=../Met/Weather_Ensemble15.met
    Zone Field: Area=1; Slope=0
      Report: same as Truth.Field.Report
      Fertiliser
      Soil: ASCOrder=Vertosol; ASCSubOrder=Black; SoilType=Clay; Site=Norwin; NearestTown=Norwin; Region=Darling Downs and Granite Belt; State=Queensland; Country=Australia; NaturalVegetation=Qld. Bluegrass, possible Qld. Blue gum; ApsoilNumber=900; Latitude=-27.581836; Longitude=151.320206; LocationAccuracy=+/- 20m
        DataSource=CSIRO Sustainable Ecosystems, Toowoomba; Characteriesd as part of the GRDC funded project"Doing it better, doing it smarter, managing soil water in Australian agriculture' 2011
        Comments=OC, CLL for all crops estimated-based on Bongeen Mywybilla Soil No1
        Water
          Thickness  BD   AirDry     LL15       DUL       SAT       KS
          150        1.3  0.0584827  0.0784827  0.389775  0.489775  20
          150        1.3  0.0998115  0.119812   0.394267  0.494267  20
          300        1.4  0.0934388  0.113439   0.369398  0.469398  20
          300        1.4  0.114009   0.134009   0.322829  0.422829  20
          300        1.5  0.111969   0.131969   0.368813  0.468813  20
          300        1.5  0.0928622  0.112862   0.324332  0.424332  20
          300        1.5  0.0950509  0.115051   0.341623  0.441623  20
          SoilCrop WheatSoil
            LL=[0.0784827, 0.119812, 0.113439, 0.134009, 0.131969, 0.112862, 0.115051]
            KL=[0.06, 0.06, 0.06, 0.04, 0.04, 0.02, 0.01]
            XF=[1, 1, 1, 1, 1, 1, 1]
        SoilWater: same as Truth.Field.Soil.SoilWater
        SoilNitrogen: fom_type=[default, manure, mucuna, lablab, shemp, stable]; fract_carb=[0.2, 0.3, 0.54, 0.57, 0.45, 0]; fract_cell=[0.7, 0.3, 0.37, 0.37, 0.47, 0.1]; fract_lign=[0.1, 0.4, 0.09, 0.06, 0.08, 0.9]; wfpsN2N2O_x=[22, 88]; wfpsN2N2O_y=[0.1, 1]
        SoilOrganicMatter: same as Truth.Field.Soil.SoilOrganicMatter
        Analysis: Thickness=[150, 150, 300, 300, 300, 300, 300]; PH=[8, 8, 8, 8, 8, 8, 8]; PHUnits=Water; BoronUnits=HotWater
        InitialWater: PercentMethod=EvenlyDistributed; FractionFull=0.5; RelativeTo=LL15
        Sample InitialN: same as Truth.Field.Soil.InitialN
        CERESSoilTemperature
      SurfaceOrganicMatter: same as Truth.Field.SurfaceOrganicMatter
      Plant15 Wheat: AutoHarvest=true; CropType=Wheat
      MicroClimate: a_interception=0; b_interception=1; c_interception=0; d_interception=0; soil_albedo=0.3; sun_angle=15; soil_heat_flux_fraction=0.4; night_interception_fraction=0.5; refheight=2; albedo=0.15; emissivity=0.96; RadIntTotal=0
      Manager SowingFertiliser: same as Truth.Field.SowingFertiliser
      Manager SowingRule
        StartDate = 10-may
        EndDate = 10-may
        MinESW = 0
        MinRain = 0
        RainDays = 7
        CultivarName = Custom15
        SowingDepth = 30
        RowSpacing = 250
        Population = 120
        script: same as in Truth.Field.SowingRule
      SoluteManager
    Control: DAOption=OpenLoop; EnsembleSize=50; AddModelError=false; FixPhenology=false; DoYPheno=[131, 132, 136, 137, 202, 247, 255, 288, 290, 291, 0]
      OpenLoop
      InitialConditions: InitialDate=1996-01-01; InitialSWError=[0.1, 0.09, 0.08, 0.07, 0.06, 0.06, 0.06]
        InitialSW=[0.414237, 0.442069, 0.384211, 0.370612, 0.372216, 0.37083, 0.34483]
      StateVariables: same as Truth.Control.StateVariables
      Observations: same as Truth.Control.Observations
  Simulation Ensemble16
    Clock: StartDate=1996-01-01; EndDate=1996-12-30
    Summary SummaryFile
    Weather: FileName=../Met/Weather_Ensemble16.met
    Zone Field: Area=1; Slope=0
      Report: same as Truth.Field.Report
      Fertiliser
      Soil: ASCOrder=Vertosol; ASCSubOrder=Black; SoilType=Clay; Site=Norwin; NearestTown=Norwin; Region=Darling Downs and Granite Belt; State=Queensland; Country=Australia; NaturalVegetation=Qld. Bluegrass, possible Qld. Blue gum; ApsoilNumber=900; Latitude=-27.581836; Longitude=151.320206; LocationAccuracy=+/- 20m
        DataSource=CSIRO Sustainable Ecosystems, Toowoomba; Characteriesd as part of the GRDC funded project"Doing it better, doing it smarter, managing soil water in Australian agriculture' 2011
        Comments=OC, CLL for all crops estimated-based on Bongeen Mywybilla Soil No1
        Water
          Thickness  BD   AirDry     LL15       DUL       SAT       KS
          150        1.3  0.0623578  0.0823578  0.377476  0.477476  20
          150        1.3  0.0840939  0.104094   0.346302  0.446302  20
          300        1.4  0.10292    0.12292    0.44649   0.54649   20
          300        1.4  0.114916   0.134916   0.343893  0.443893  20
          300        1.5  0.149083   0.169083   0.349923  0.449923  20
          300        1.5  0.1021     0.1221     0.319478  0.419478  20
          300        1.5  0.117785   0.137785   0.362081  0.462081  20
          SoilCrop WheatSoil
            LL=[0.0823578, 0.104094, 0.12292, 0.134916, 0.169083, 0.1221, 0.137785]
            KL=[0.06, 0.06, 0.06, 0.04, 0.04, 0.02, 0.01]
            XF=[1, 1, 1, 1, 1, 1, 1]
        SoilWater: same as Truth.Field.Soil.SoilWater
        SoilNitrogen: fom_type=[default, manure, mucuna, lablab, shemp, stable]; fract_carb=[0.2, 0.3, 0.54, 0.57, 0.45, 0]; fract_cell=[0.7, 0.3, 0.37, 0.37, 0.47, 0.1]; fract_lign=[0.1, 0.4, 0.09, 0.06, 0.08, 0.9]; wfpsN2N2O_x=[22, 88]; wfpsN2N2O_y=[0.1, 1]
        SoilOrganicMatter: same as Truth.Field.Soil.SoilOrganicMatter
        Analysis: Thickness=[150, 150, 300, 300, 300, 300, 300]; PH=[8, 8, 8, 8, 8, 8, 8]; PHUnits=Water; BoronUnits=HotWater
        InitialWater: PercentMethod=EvenlyDistributed; FractionFull=0.5; RelativeTo=LL15
        Sample InitialN: same as Truth.Field.Soil.InitialN
        CERESSoilTemperature
      SurfaceOrganicMatter: same as Truth.Field.SurfaceOrganicMatter
      Plant15 Wheat: AutoHarvest=true; CropType=Wheat
      MicroClimate: a_interception=0; b_interception=1; c_interception=0; d_interception=0; soil_albedo=0.3; sun_angle=15; soil_heat_flux_fraction=0.4; night_interception_fraction=0.5; refheight=2; albedo=0.15; emissivity=0.96; RadIntTotal=0
      Manager SowingFertiliser: same as Truth.Field.SowingFertiliser
      Manager SowingRule
        StartDate = 10-may
        EndDate = 10-may
        MinESW = 0
        MinRain = 0
        RainDays = 7
        CultivarName = Custom16
        SowingDepth = 30
        RowSpacing = 250
        Population = 120
        script: same as in Truth.Field.SowingRule
      SoluteManager
    Control: DAOption=OpenLoop; EnsembleSize=50; AddModelError=false; FixPhenology=false; DoYPheno=[131, 132, 136, 137, 202, 247, 255, 288, 290, 291, 0]
      OpenLoop
      InitialConditions: InitialDate=1996-01-01; InitialSWError=[0.1, 0.09, 0.08, 0.07, 0.06, 0.06, 0.06]
        InitialSW=[0.116743, 0.210472, 0.219297, 0.189243, 0.200487, 0.249048, 0.29016]
      StateVariables: same as Truth.Control.StateVariables
      Observations: same as Truth.Control.Observations
  Simulation Ensemble17
    Clock: StartDate=1996-01-01; EndDate=1996-12-30
    Summary SummaryFile
    Weather: FileName=../Met/Weather_Ensemble17.met
    Zone Field: Area=1; Slope=0
      Report: same as Truth.Field.Report
      Fertiliser
      Soil: ASCOrder=Vertosol; ASCSubOrder=Black; SoilType=Clay; Site=Norwin; NearestTown=Norwin; Region=Darling Downs and Granite Belt; State=Queensland; Country=Australia; NaturalVegetation=Qld. Bluegrass, possible Qld. Blue gum; ApsoilNumber=900; Latitude=-27.581836; Longitude=151.320206; LocationAccuracy=+/- 20m
        DataSource=CSIRO Sustainable Ecosystems, Toowoomba; Characteriesd as part of the GRDC funded project"Doing it better, doing it smarter, managing soil water in Australian agriculture' 2011
        Comments=OC, CLL for all crops estimated-based on Bongeen Mywybilla Soil No1
        Water
          Thickness  BD   AirDry     LL15       DUL       SAT       KS
          150        1.3  0.0570058  0.0770058  0.427213  0.527213  20
          150        1.3  0.0551784  0.0751784  0.363287  0.463287  20
          300        1.4  0.0291201  0.0491201  0.366284  0.466284  20
          300        1.4  0.0985795  0.118579   0.332243  0.432243  20
          300        1.5  0.118734   0.138734   0.402321  0.502321  20
          300        1.5  0.120197   0.140197   0.272914  0.372914  20
          300        1.5  0.145825   0.165825   0.341831  0.441831  20
          SoilCrop WheatSoil
            LL=[0.0770058, 0.0751784, 0.0491201, 0.118579, 0.138734, 0.140197, 0.165825]
            KL=[0.06, 0.06, 0.06, 0.04, 0.04, 0.02, 0.01]
            XF=[1, 1, 1, 1, 1, 1, 1]
        SoilWater: same as Truth.Field.Soil.SoilWater
        SoilNitrogen: fom_type=[default, manure, mucuna, lablab, shemp, stable]; fract_carb=[0.2, 0.3, 0.54, 0.57, 0.45, 0]; fract_cell=[0.7, 0.3, 0.37, 0.37, 0.47, 0.1]; fract_lign=[0.1, 0.4, 0.09, 0.06, 0.08, 0.9]; wfpsN2N2O_x=[22, 88]; wfpsN2N2O_y=[0.1, 1]
        SoilOrganicMatter: same as Truth.Field.Soil.SoilOrganicMatter
        Analysis: Thickness=[150, 150, 300, 300, 300, 300, 300]; PH=[8, 8, 8, 8, 8, 8, 8]; PHUnits=Water; BoronUnits=HotWater
        InitialWater: PercentMethod=EvenlyDistributed; FractionFull=0.5; RelativeTo=LL15
        Sample InitialN: same as Truth.Field.Soil.InitialN
        CERESSoilTemperature
      SurfaceOrganicMatter: same as Truth.Field.SurfaceOrganicMatter
      Plant15 Wheat: AutoHarvest=true; CropType=Wheat
      MicroClimate: a_interception=0; b_interception=1; c_interception=0; d_interception=0; soil_albedo=0.3; sun_angle=15; soil_heat_flux_fraction=0.4; night_interception_fraction=0.5; refheight=2; albedo=0.15; emissivity=0.96; RadIntTotal=0
      Manager SowingFertiliser: same as Truth.Field.SowingFertiliser
      Manager SowingRule
        StartDate = 10-may
        EndDate = 10-may
        MinESW = 0
        MinRain = 0
        RainDays = 7
        CultivarName = Custom17
        SowingDepth = 30
        RowSpacing = 250
        Population = 120
        script: same as in Truth.Field.SowingRule
      SoluteManager
    Control: DAOption=OpenLoop; EnsembleSize=50; AddModelError=false; FixPhenology=false; DoYPheno=[131, 132, 136, 137, 202, 247, 255, 288, 290, 291, 0]
      OpenLoop
      InitialConditions: InitialDate=1996-01-01; InitialSWError=[0.1, 0.09, 0.08, 0.07, 0.06, 0.06, 0.06]
        InitialSW=[0.463932, 0.434452, 0.346215, 0.271588, 0.282832, 0.332891, 0.337754]
      StateVariables: same as Truth.Control.StateVariables
      Observations: same as Truth.Control.Observations
  Simulation Ensemble18
    Clock: StartDate=1996-01-01; EndDate=1996-12-30
    Summary SummaryFile
    Weather: FileName=../Met/Weather_Ensemble18.met
    Zone Field: Area=1; Slope=0
      Report: same as Truth.Field.Report
      Fertiliser
      Soil: ASCOrder=Vertosol; ASCSubOrder=Black; SoilType=Clay; Site=Norwin; NearestTown=Norwin; Region=Darling Downs and Granite Belt; State=Queensland; Country=Australia; NaturalVegetation=Qld. Bluegrass, possible Qld. Blue gum; ApsoilNumber=900; Latitude=-27.581836; Longitude=151.320206; LocationAccuracy=+/- 20m
        DataSource=CSIRO Sustainable Ecosystems, Toowoomba; Characteriesd as part of the GRDC funded project"Doing it better, doing it smarter, managing soil water in Australian agriculture' 2011
        Comments=OC, CLL for all crops estimated-based on Bongeen Mywybilla Soil No1
        Water
          Thickness  BD   AirDry     LL15       DUL       SAT       KS
          150        1.3  0.0670745  0.0870745  0.366075  0.466075  20
          150        1.3  0.0919562  0.111956   0.385369  0.485369  20
          300        1.4  0.0813131  0.101313   0.406523  0.506523  20
          300        1.4  0.0741822  0.0941822  0.337135  0.437135  20
          300        1.5  0.066946   0.086946   0.352846  0.452846  20
          300        1.5  0.104385   0.124385   0.328876  0.428876  20
          300        1.5  0.112397   0.132397   0.307013  0.407013  20
          SoilCrop WheatSoil
            LL=[0.0870745, 0.111956, 0.101313, 0.0941822, 0.086946, 0.124385, 0.132397]
            KL=[0.06, 0.06, 0.06, 0.04, 0.04, 0.02, 0.01]
            XF=[1, 1, 1, 1, 1, 1, 1]
        SoilWater: same as Truth.Field.Soil.SoilWater
        SoilNitrogen: fom_type=[default, manure, mucuna, lablab, shemp, stable]; fract_carb=[0.2, 0.3, 0.54, 0.57, 0.45, 0]; fract_cell=[0.7, 0.3, 0.37, 0.37, 0.47, 0.1]; fract_lign=[0.1, 0.4, 0.09, 0.06, 0.08, 0.9]; wfpsN2N2O_x=[22, 88]; wfpsN2N2O_y=[0.1, 1]
        SoilOrganicMatter: same as Truth.Field.Soil.SoilOrganicMatter
        Analysis: Thickness=[150, 150, 300, 300, 300, 300, 300]; PH=[8, 8, 8, 8, 8, 8, 8]; PHUnits=Water; BoronUnits=HotWater
        InitialWater: PercentMethod=EvenlyDistributed; FractionFull=0.5; RelativeTo=LL15
        Sample InitialN: same as Truth.Field.Soil.InitialN
        CERESSoilTemperature
      SurfaceOrganicMatter: same as Truth.Field.SurfaceOrganicMatter
      Plant15 Wheat: AutoHarvest=true; CropType=Wheat
      MicroClimate: a_interception=0; b_interception=1; c_interception=0; d_interception=0; soil_albedo=0.3; sun_angle=15; soil_heat_flux_fraction=0.4; night_interception_fraction=0.5; refheight=2; albedo=0.15; emissivity=0.96; RadIntTotal=0
      Manager SowingFertiliser: same as Truth.Field.SowingFertiliser
      Manager SowingRule
        StartDate = 10-may
        EndDate = 10-may
        MinESW = 0
        MinRain = 0
        RainDays = 7
        CultivarName = Custom18
        SowingDepth = 30
        RowSpacing = 250
        Population = 120
        script: same as in Truth.Field.SowingRule
      SoluteManager
    Control: DAOption=OpenLoop; EnsembleSize=50; AddModelError=false; FixPhenology=false; DoYPheno=[131, 132, 136, 137, 202, 247, 255, 288, 290, 291, 0]
      OpenLoop
      InitialConditions: InitialDate=1996-01-01; InitialSWError=[0.1, 0.09, 0.08, 0.07, 0.06, 0.06, 0.06]
        InitialSW=[0.298915, 0.34626, 0.363427, 0.34475, 0.311989, 0.308044, 0.280817]
      StateVariables: same as Truth.Control.StateVariables
      Observations: same as Truth.Control.Observations
  Simulation Ensemble19
    Clock: StartDate=1996-01-01; EndDate=1996-12-30
    Summary SummaryFile
    Weather: FileName=../Met/Weather_Ensemble19.met
    Zone Field: Area=1; Slope=0
      Report: same as Truth.Field.Report
      Fertiliser
      Soil: ASCOrder=Vertosol; ASCSubOrder=Black; SoilType=Clay; Site=Norwin; NearestTown=Norwin; Region=Darling Downs and Granite Belt; State=Queensland; Country=Australia; NaturalVegetation=Qld. Bluegrass, possible Qld. Blue gum; ApsoilNumber=900; Latitude=-27.581836; Longitude=151.320206; LocationAccuracy=+/- 20m
        DataSource=CSIRO Sustainable Ecosystems, Toowoomba; Characteriesd as part of the GRDC funded project"Doing it better, doing it smarter, managing soil water in Australian agriculture' 2011
        Comments=OC, CLL for all crops estimated-based on Bongeen Mywybilla Soil No1
        Water
          Thickness  BD   AirDry     LL15       DUL       SAT       KS
          150        1.3  0.0878994  0.107899   0.322324  0.422324  20
          150        1.3  0.113053   0.133053   0.365519  0.465519  20
          300        1.4  0.090977   0.110977   0.428402  0.528402  20
          300        1.4  0.0617966  0.0817966  0.359106  0.459106  20
          300        1.5  0.105646   0.125646   0.38454   0.48454   20
          300        1.5  0.0845238  0.104524   0.338782  0.438782  20
          300        1.5  0.111758   0.131758   0.357211  0.457211  20
          SoilCrop WheatSoil
            LL=[0.107899, 0.133053, 0.110977, 0.0817966, 0.125646, 0.104524, 0.131758]
            KL=[0.06, 0.06, 0.06, 0.04, 0.04, 0.02, 0.01]
            XF=[1, 1, 1, 1, 1, 1, 1]
        SoilWater: same as Truth.Field.Soil.SoilWater
        SoilNitrogen: fom_type=[default, manure, mucuna, lablab, shemp, stable]; fract_carb=[0.2, 0.3, 0.54, 0.57, 0.45, 0]; fract_cell=[0.7, 0.3, 0.37, 0.37, 0.47, 0.1]; fract_lign=[0.1, 0.4, 0.09, 0.06, 0.08, 0.9]; wfpsN2N2O_x=[22, 88]; wfpsN2N2O_y=[0.1, 1]
        SoilOrganicMatter: same as Truth.Field.Soil.SoilOrganicMatter
        Analysis: Thickness=[150, 150, 300, 300, 300, 300, 300]; PH=[8, 8, 8, 8, 8, 8, 8]; PHUnits=Water; BoronUnits=HotWater
        InitialWater: PercentMethod=EvenlyDistributed; FractionFull=0.5; RelativeTo=LL15
        Sample InitialN: same as Truth.Field.Soil.InitialN
        CERESSoilTemperature
      SurfaceOrganicMatter: same as Truth.Field.SurfaceOrganicMatter
      Plant15 Wheat: AutoHarvest=true; CropType=Wheat
      MicroClimate: a_interception=0; b_interception=1; c_interception=0; d_interception=0; soil_albedo=0.3; sun_angle=15; soil_heat_flux_fraction=0.4; night_interception_fraction=0.5; refheight=2; albedo=0.15; emissivity=0.96; RadIntTotal=0
      Manager SowingFertiliser: same as Truth.Field.SowingFertiliser
      Manager SowingRule
        StartDate = 10-may
        EndDate = 10-may
        MinESW = 0
        MinRain = 0
        RainDays = 7
        CultivarName = Custom19
        SowingDepth = 30
        RowSpacing = 250
        Population = 120
        script: same as in Truth.Field.SowingRule
      SoluteManager
    Control: DAOption=OpenLoop; EnsembleSize=50; AddModelError=false; FixPhenology=false; DoYPheno=[131, 132, 136, 137, 202, 247, 255, 288, 290, 291, 0]
      OpenLoop
      InitialConditions: InitialDate=1996-01-01; InitialSWError=[0.1, 0.09, 0.08, 0.07, 0.06, 0.06, 0.06]
        InitialSW=[0.298948, 0.243927, 0.256802, 0.255571, 0.268542, 0.280809, 0.281797]
      StateVariables: same as Truth.Control.StateVariables
      Observations: same as Truth.Control.Observations
  Simulation Ensemble20
    Clock: StartDate=1996-01-01; EndDate=1996-12-30
    Summary SummaryFile
    Weather: FileName=../Met/Weather_Ensemble20.met
    Zone Field: Area=1; Slope=0
      Report: same as Truth.Field.Report
      Fertiliser
      Soil: ASCOrder=Vertosol; ASCSubOrder=Black; SoilType=Clay; Site=Norwin; NearestTown=Norwin; Region=Darling Downs and Granite Belt; State=Queensland; Country=Australia; NaturalVegetation=Qld. Bluegrass, possible Qld. Blue gum; ApsoilNumber=900; Latitude=-27.581836; Longitude=151.320206; LocationAccuracy=+/- 20m
        DataSource=CSIRO Sustainable Ecosystems, Toowoomba; Characteriesd as part of the GRDC funded project"Doing it better, doing it smarter, managing soil water in Australian agriculture' 2011
        Comments=OC, CLL for all crops estimated-based on Bongeen Mywybilla Soil No1
        Water
          Thickness  BD   AirDry     LL15       DUL       SAT       KS
          150        1.3  0.0615659  0.0815659  0.377699  0.477699  20
          150        1.3  0.11388    0.13388    0.336432  0.436432  20
          300        1.4  0.108665   0.128665   0.309884  0.409884  20
          300        1.4  0.129703   0.149703   0.341168  0.441168  20
          300        1.5  0.113608   0.133608   0.389228  0.489228  20
          300        1.5  0.0798538  0.0998538  0.343696  0.443696  20
          300        1.5  0.0865935  0.106594   0.381069  0.481069  20
          SoilCrop WheatSoil
            LL=[0.0815659, 0.13388, 0.128665, 0.149703, 0.133608, 0.0998538, 0.106594]
            KL=[0.06, 0.06, 0.06, 0.04, 0.04, 0.02, 0.01]
            XF=[1, 1, 1, 1, 1, 1, 1]
        SoilWater: same as Truth.Field.Soil.SoilWater
        SoilNitrogen: fom_type=[default, manure, mucuna, lablab, shemp, stable]; fract_carb=[0.2, 0.3, 0.54, 0.57, 0.45, 0]; fract_cell=[0.7, 0.3, 0.37, 0.37, 0.47, 0.1]; fract_lign=[0.1, 0.4, 0.09, 0.06, 0.08, 0.9]; wfpsN2N2O_x=[22, 88]; wfpsN2N2O_y=[0.1, 1]
        SoilOrganicMatter: same as Truth.Field.Soil.SoilOrganicMatter
        Analysis: Thickness=[150, 150, 300, 300, 300, 300, 300]; PH=[8, 8, 8, 8, 8, 8, 8]; PHUnits=Water; BoronUnits=HotWater
        InitialWater: PercentMethod=EvenlyDistributed; FractionFull=0.5; RelativeTo=LL15
        Sample InitialN: same as Truth.Field.Soil.InitialN
        CERESSoilTemperature
      SurfaceOrganicMatter: same as Truth.Field.SurfaceOrganicMatter
      Plant15 Wheat: AutoHarvest=true; CropType=Wheat
      MicroClimate: a_interception=0; b_interception=1; c_interception=0; d_interception=0; soil_albedo=0.3; sun_angle=15; soil_heat_flux_fraction=0.4; night_interception_fraction=0.5; refheight=2; albedo=0.15; emissivity=0.96; RadIntTotal=0
      Manager SowingFertiliser: same as Truth.Field.SowingFertiliser
      Manager SowingRule
        StartDate = 10-may
        EndDate = 10-may
        MinESW = 0
        MinRain = 0
        RainDays = 7
        CultivarName = Custom20
        SowingDepth = 30
        RowSpacing = 250
        Population = 120
        script: same as in Truth.Field.SowingRule
      SoluteManager
    Control: DAOption=OpenLoop; EnsembleSize=50; AddModelError=false; FixPhenology=false; DoYPheno=[131, 132, 136, 137, 202, 247, 255, 288, 290, 291, 0]
      OpenLoop
      InitialConditions: InitialDate=1996-01-01; InitialSWError=[0.1, 0.09, 0.08, 0.07, 0.06, 0.06, 0.06]
        InitialSW=[0.260501, 0.31277, 0.354965, 0.395165, 0.364366, 0.370833, 0.354261]
      StateVariables: same as Truth.Control.StateVariables
      Observations: same as Truth.Control.Observations
  Simulation Ensemble21
    Clock: StartDate=1996-01-01; EndDate=1996-12-30
    Summary SummaryFile
    Weather: FileName=../Met/Weather_Ensemble21.met
    Zone Field: Area=1; Slope=0
      Report: same as Truth.Field.Report
      Fertiliser
      Soil: ASCOrder=Vertosol; ASCSubOrder=Black; SoilType=Clay; Site=Norwin; NearestTown=Norwin; Region=Darling Downs and Granite Belt; State=Queensland; Country=Australia; NaturalVegetation=Qld. Bluegrass, possible Qld. Blue gum; ApsoilNumber=900; Latitude=-27.581836; Longitude=151.320206; LocationAccuracy=+/- 20m
        DataSource=CSIRO Sustainable Ecosystems, Toowoomba; Characteriesd as part of the GRDC funded project"Doing it better, doing it smarter, managing soil water in Australian agriculture' 2011
        Comments=OC, CLL for all crops estimated-based on Bongeen Mywybilla Soil No1
        Water
          Thickness  BD   AirDry     LL15       DUL       SAT       KS
          150        1.3  0.0460707  0.0660707  0.382674  0.482674  20
          150        1.3  0.0795423  0.0995423  0.389401  0.489401  20
          300        1.4  0.080186   0.100186   0.324343  0.424343  20
          300        1.4  0.122899   0.142899   0.317809  0.417809  20
          300        1.5  0.128083   0.148083   0.297557  0.397557  20
          300        1.5  0.135718   0.155718   0.328977  0.428977  20
          300        1.5  0.1147     0.1347     0.375765  0.475765  20
          SoilCrop WheatSoil
            LL=[0.0660707, 0.0995423, 0.100186, 0.142899, 0.148083, 0.155718, 0.1347]
            KL=[0.06, 0.06, 0.06, 0.04, 0.04, 0.02, 0.01]
            XF=[1, 1, 1, 1, 1, 1, 1]
        SoilWater: same as Truth.Field.Soil.SoilWater
        SoilNitrogen: fom_type=[default, manure, mucuna, lablab, shemp, stable]; fract_carb=[0.2, 0.3, 0.54, 0.57, 0.45, 0]; fract_cell=[0.7, 0.3, 0.37, 0.37, 0.47, 0.1]; fract_lign=[0.1, 0.4, 0.09, 0.06, 0.08, 0.9]; wfpsN2N2O_x=[22, 88]; wfpsN2N2O_y=[0.1, 1]
        SoilOrganicMatter: same as Truth.Field.Soil.SoilOrganicMatter
        Analysis: Thickness=[150, 150, 300, 300, 300, 300, 300]; PH=[8, 8, 8, 8, 8, 8, 8]; PHUnits=Water; BoronUnits=HotWater
        InitialWater: PercentMethod=EvenlyDistributed; FractionFull=0.5; RelativeTo=LL15
        Sample InitialN: same as Truth.Field.Soil.InitialN
        CERESSoilTemperature
      SurfaceOrganicMatter: same as Truth.Field.SurfaceOrganicMatter
      Plant15 Wheat: AutoHarvest=true; CropType=Wheat
      MicroClimate: a_interception=0; b_interception=1; c_interception=0; d_interception=0; soil_albedo=0.3; sun_angle=15; soil_heat_flux_fraction=0.4; night_interception_fraction=0.5; refheight=2; albedo=0.15; emissivity=0.96; RadIntTotal=0
      Manager SowingFertiliser: same as Truth.Field.SowingFertiliser
      Manager SowingRule
        StartDate = 10-may
        EndDate = 10-may
        MinESW = 0
        MinRain = 0
        RainDays = 7
        CultivarName = Custom21
        SowingDepth = 30
        RowSpacing = 250
        Population = 120
        script: same as in Truth.Field.SowingRule
      SoluteManager
    Control: DAOption=OpenLoop; EnsembleSize=50; AddModelError=false; FixPhenology=false; DoYPheno=[131, 132, 136, 137, 202, 247, 255, 288, 290, 291, 0]
      OpenLoop
      InitialConditions: InitialDate=1996-01-01; InitialSWError=[0.1, 0.09, 0.08, 0.07, 0.06, 0.06, 0.06]
        InitialSW=[0.350167, 0.295479, 0.287606, 0.240715, 0.230868, 0.264077, 0.295282]
      StateVariables: same as Truth.Control.StateVariables
      Observations: same as Truth.Control.Observations
  Simulation Ensemble22
    Clock: StartDate=1996-01-01; EndDate=1996-12-30
    Summary SummaryFile
    Weather: FileName=../Met/Weather_Ensemble22.met
    Zone Field: Area=1; Slope=0
      Report: same as Truth.Field.Report
      Fertiliser
      Soil: ASCOrder=Vertosol; ASCSubOrder=Black; SoilType=Clay; Site=Norwin; NearestTown=Norwin; Region=Darling Downs and Granite Belt; State=Queensland; Country=Australia; NaturalVegetation=Qld. Bluegrass, possible Qld. Blue gum; ApsoilNumber=900; Latitude=-27.581836; Longitude=151.320206; LocationAccuracy=+/- 20m
        DataSource=CSIRO Sustainable Ecosystems, Toowoomba; Characteriesd as part of the GRDC funded project"Doing it better, doing it smarter, managing soil water in Australian agriculture' 2011
        Comments=OC, CLL for all crops estimated-based on Bongeen Mywybilla Soil No1
        Water
          Thickness  BD   AirDry     LL15       DUL       SAT       KS
          150        1.3  0.0470061  0.0670061  0.403298  0.503298  20
          150        1.3  0.0677951  0.0877951  0.406288  0.506288  20
          300        1.4  0.0686374  0.0886374  0.364079  0.464079  20
          300        1.4  0.0847579  0.104758   0.315203  0.415203  20
          300        1.5  0.1318     0.1518     0.320109  0.420109  20
          300        1.5  0.12438    0.14438    0.31088   0.41088   20
          300        1.5  0.126288   0.146288   0.329701  0.429701  20
          SoilCrop WheatSoil
            LL=[0.0670061, 0.0877951, 0.0886374, 0.104758, 0.1518, 0.14438, 0.146288]
            KL=[0.06, 0.06, 0.06, 0.04, 0.04, 0.02, 0.01]
            XF=[1, 1, 1, 1, 1, 1, 1]
        SoilWater: same as Truth.Field.Soil.SoilWater
        SoilNitrogen: fom_type=[default, manure, mucuna, lablab, shemp, stable]; fract_carb=[0.2, 0.3, 0.54, 0.57, 0.45, 0]; fract_cell=[0.7, 0.3, 0.37, 0.37, 0.47, 0.1]; fract_lign=[0.1, 0.4, 0.09, 0.06, 0.08, 0.9]; wfpsN2N2O_x=[22, 88]; wfpsN2N2O_y=[0.1, 1]
        SoilOrganicMatter: same as Truth.Field.Soil.SoilOrganicMatter
        Analysis: Thickness=[150, 150, 300, 300, 300, 300, 300]; PH=[8, 8, 8, 8, 8, 8, 8]; PHUnits=Water; BoronUnits=HotWater
        InitialWater: PercentMethod=EvenlyDistributed; FractionFull=0.5; RelativeTo=LL15
        Sample InitialN: same as Truth.Field.Soil.InitialN
        CERESSoilTemperature
      SurfaceOrganicMatter: same as Truth.Field.SurfaceOrganicMatter
      Plant15 Wheat: AutoHarvest=true; CropType=Wheat
      MicroClimate: a_interception=0; b_interception=1; c_interception=0; d_interception=0; soil_albedo=0.3; sun_angle=15; soil_heat_flux_fraction=0.4; night_interception_fraction=0.5; refheight=2; albedo=0.15; emissivity=0.96; RadIntTotal=0
      Manager SowingFertiliser: same as Truth.Field.SowingFertiliser
      Manager SowingRule
        StartDate = 10-may
        EndDate = 10-may
        MinESW = 0
        MinRain = 0
        RainDays = 7
        CultivarName = Custom22
        SowingDepth = 30
        RowSpacing = 250
        Population = 120
        script: same as in Truth.Field.SowingRule
      SoluteManager
    Control: DAOption=OpenLoop; EnsembleSize=50; AddModelError=false; FixPhenology=false; DoYPheno=[131, 132, 136, 137, 202, 247, 255, 288, 290, 291, 0]
      OpenLoop
      InitialConditions: InitialDate=1996-01-01; InitialSWError=[0.1, 0.09, 0.08, 0.07, 0.06, 0.06, 0.06]
        InitialSW=[0.398153, 0.37902, 0.3707, 0.354843, 0.335773, 0.270407, 0.290063]
      StateVariables: same as Truth.Control.StateVariables
      Observations: same as Truth.Control.Observations
  Simulation Ensemble23
    Clock: StartDate=1996-01-01; EndDate=1996-12-30
    Summary SummaryFile
    Weather: FileName=../Met/Weather_Ensemble23.met
    Zone Field: Area=1; Slope=0
      Report: same as Truth.Field.Report
      Fertiliser
      Soil: ASCOrder=Vertosol; ASCSubOrder=Black; SoilType=Clay; Site=Norwin; NearestTown=Norwin; Region=Darling Downs and Granite Belt; State=Queensland; Country=Australia; NaturalVegetation=Qld. Bluegrass, possible Qld. Blue gum; ApsoilNumber=900; Latitude=-27.581836; Longitude=151.320206; LocationAccuracy=+/- 20m
        DataSource=CSIRO Sustainable Ecosystems, Toowoomba; Characteriesd as part of the GRDC funded project"Doing it better, doing it smarter, managing soil water in Australian agriculture' 2011
        Comments=OC, CLL for all crops estimated-based on Bongeen Mywybilla Soil No1
        Water
          Thickness  BD   AirDry     LL15       DUL       SAT       KS
          150        1.3  0.0721744  0.0921744  0.369272  0.469272  20
          150        1.3  0.0835476  0.103548   0.394286  0.494286  20
          300        1.4  0.0735983  0.0935983  0.380986  0.480986  20
          300        1.4  0.0895359  0.109536   0.380507  0.480507  20
          300        1.5  0.0920035  0.112004   0.385609  0.485609  20
          300        1.5  0.0910869  0.111087   0.314128  0.414128  20
          300        1.5  0.126586   0.146586   0.332117  0.432117  20
          SoilCrop WheatSoil
            LL=[0.0921744, 0.103548, 0.0935983, 0.109536, 0.112004, 0.111087, 0.146586]
            KL=[0.06, 0.06, 0.06, 0.04, 0.04, 0.02, 0.01]
            XF=[1, 1, 1, 1, 1, 1, 1]
        SoilWater: same as Truth.Field.Soil.SoilWater
        SoilNitrogen: fom_type=[default, manure, mucuna, lablab, shemp, stable]; fract_carb=[0.2, 0.3, 0.54, 0.57, 0.45, 0]; fract_cell=[0.7, 0.3, 0.37, 0.37, 0.47, 0.1]; fract_lign=[0.1, 0.4, 0.09, 0.06, 0.08, 0.9]; wfpsN2N2O_x=[22, 88]; wfpsN2N2O_y=[0.1, 1]
        SoilOrganicMatter: same as Truth.Field.Soil.SoilOrganicMatter
        Analysis: Thickness=[150, 150, 300, 300, 300, 300, 300]; PH=[8, 8, 8, 8, 8, 8, 8]; PHUnits=Water; BoronUnits=HotWater
        InitialWater: PercentMethod=EvenlyDistributed; FractionFull=0.5; RelativeTo=LL15
        Sample InitialN: same as Truth.Field.Soil.InitialN
        CERESSoilTemperature
      SurfaceOrganicMatter: same as Truth.Field.SurfaceOrganicMatter
      Plant15 Wheat: AutoHarvest=true; CropType=Wheat
      MicroClimate: a_interception=0; b_interception=1; c_interception=0; d_interception=0; soil_albedo=0.3; sun_angle=15; soil_heat_flux_fraction=0.4; night_interception_fraction=0.5; refheight=2; albedo=0.15; emissivity=0.96; RadIntTotal=0
      Manager SowingFertiliser: same as Truth.Field.SowingFertiliser
      Manager SowingRule
        StartDate = 10-may
        EndDate = 10-may
        MinESW = 0
        MinRain = 0
        RainDays = 7
        CultivarName = Custom23
        SowingDepth = 30
        RowSpacing = 250
        Population = 120
        script: same as in Truth.Field.SowingRule
      SoluteManager
    Control: DAOption=OpenLoop; EnsembleSize=50; AddModelError=false; FixPhenology=false; DoYPheno=[131, 132, 136, 137, 202, 247, 255, 288, 290, 291, 0]
      OpenLoop
      InitialConditions: InitialDate=1996-01-01; InitialSWError=[0.1, 0.09, 0.08, 0.07, 0.06, 0.06, 0.06]
        InitialSW=[0.309647, 0.268708, 0.295747, 0.291297, 0.271314, 0.268689, 0.28478]
      StateVariables: same as Truth.Control.StateVariables
      Observations: same as Truth.Control.Observations
  Simulation Ensemble24
    Clock: StartDate=1996-01-01; EndDate=1996-12-30
    Summary SummaryFile
    Weather: FileName=../Met/Weather_Ensemble24.met
    Zone Field: Area=1; Slope=0
      Report: same as Truth.Field.Report
      Fertiliser
      Soil: ASCOrder=Vertosol; ASCSubOrder=Black; SoilType=Clay; Site=Norwin; NearestTown=Norwin; Region=Darling Downs and Granite Belt; State=Queensland; Country=Australia; NaturalVegetation=Qld. Bluegrass, possible Qld. Blue gum; ApsoilNumber=900; Latitude=-27.581836; Longitude=151.320206; LocationAccuracy=+/- 20m
        DataSource=CSIRO Sustainable Ecosystems, Toowoomba; Characteriesd as part of the GRDC funded project"Doing it better, doing it smarter, managing soil water in Australian agriculture' 2011
        Comments=OC, CLL for all crops estimated-based on Bongeen Mywybilla Soil No1
        Water
          Thickness  BD   AirDry     LL15       DUL       SAT       KS
          150        1.3  0.0523586  0.0723586  0.355352  0.455352  20
          150        1.3  0.0754795  0.0954795  0.350268  0.450268  20
          300        1.4  0.098537   0.118537   0.384807  0.484807  20
          300        1.4  0.0916416  0.111642   0.405765  0.505765  20
          300        1.5  0.126066   0.146066   0.356741  0.456741  20
          300        1.5  0.103191   0.123191   0.346864  0.446864  20
          300        1.5  0.118488   0.138488   0.318893  0.418893  20
          SoilCrop WheatSoil
            LL=[0.0723586, 0.0954795, 0.118537, 0.111642, 0.146066, 0.123191, 0.138488]
            KL=[0.06, 0.06, 0.06, 0.04, 0.04, 0.02, 0.01]
            XF=[1, 1, 1, 1, 1, 1, 1]
        SoilWater: same as Truth.Field.Soil.SoilWater
        SoilNitrogen: fom_type=[default, manure, mucuna, lablab, shemp, stable]; fract_carb=[0.2, 0.3, 0.54, 0.57, 0.45, 0]; fract_cell=[0.7, 0.3, 0.37, 0.37, 0.47, 0.1]; fract_lign=[0.1, 0.4, 0.09, 0.06, 0.08, 0.9]; wfpsN2N2O_x=[22, 88]; wfpsN2N2O_y=[0.1, 1]
        SoilOrganicMatter: same as Truth.Field.Soil.SoilOrganicMatter
        Analysis: Thickness=[150, 150, 300, 300, 300, 300, 300]; PH=[8, 8, 8, 8, 8, 8, 8]; PHUnits=Water; BoronUnits=HotWater
        InitialWater: PercentMethod=EvenlyDistributed; FractionFull=0.5; RelativeTo=LL15
        Sample InitialN: same as Truth.Field.Soil.InitialN
        CERESSoilTemperature
      SurfaceOrganicMatter: same as Truth.Field.SurfaceOrganicMatter
      Plant15 Wheat: AutoHarvest=true; CropType=Wheat
      MicroClimate: a_interception=0; b_interception=1; c_interception=0; d_interception=0; soil_albedo=0.3; sun_angle=15; soil_heat_flux_fraction=0.4; night_interception_fraction=0.5; refheight=2; albedo=0.15; emissivity=0.96; RadIntTotal=0
      Manager SowingFertiliser: same as Truth.Field.SowingFertiliser
      Manager SowingRule
        StartDate = 10-may
        EndDate = 10-may
        MinESW = 0
        MinRain = 0
        RainDays = 7
        CultivarName = Custom24
        SowingDepth = 30
        RowSpacing = 250
        Population = 120
        script: same as in Truth.Field.SowingRule
      SoluteManager
    Control: DAOption=OpenLoop; EnsembleSize=50; AddModelError=false; FixPhenology=false; DoYPheno=[131, 132, 136, 137, 202, 247, 255, 288, 290, 291, 0]
      OpenLoop
      InitialConditions: InitialDate=1996-01-01; InitialSWError=[0.1, 0.09, 0.08, 0.07, 0.06, 0.06, 0.06]
        InitialSW=[0.35977, 0.365125, 0.350791, 0.375329, 0.370469, 0.343197, 0.318985]
      StateVariables: same as Truth.Control.StateVariables
      Observations: same as Truth.Control.Observations
  Simulation Ensemble25
    Clock: StartDate=1996-01-01; EndDate=1996-12-30
    Summary SummaryFile
    Weather: FileName=../Met/Weather_Ensemble25.met
    Zone Field: Area=1; Slope=0
      Report: same as Truth.Field.Report
      Fertiliser
      Soil: ASCOrder=Vertosol; ASCSubOrder=Black; SoilType=Clay; Site=Norwin; NearestTown=Norwin; Region=Darling Downs and Granite Belt; State=Queensland; Country=Australia; NaturalVegetation=Qld. Bluegrass, possible Qld. Blue gum; ApsoilNumber=900; Latitude=-27.581836; Longitude=151.320206; LocationAccuracy=+/- 20m
        DataSource=CSIRO Sustainable Ecosystems, Toowoomba; Characteriesd as part of the GRDC funded project"Doing it better, doing it smarter, managing soil water in Australian agriculture' 2011
        Comments=OC, CLL for all crops estimated-based on Bongeen Mywybilla Soil No1
        Water
          Thickness  BD   AirDry     LL15       DUL       SAT       KS
          150        1.3  0.0711182  0.0911182  0.362489  0.462489  20
          150        1.3  0.09156    0.11156    0.367825  0.467825  20
          300        1.4  0.0775332  0.0975332  0.362028  0.462028  20
          300        1.4  0.0556558  0.0756558  0.32381   0.42381   20
          300        1.5  0.12308    0.14308    0.357763  0.457763  20
          300        1.5  0.0968209  0.116821   0.391935  0.491935  20
          300        1.5  0.121649   0.141649   0.350069  0.450069  20
          SoilCrop WheatSoil
            LL=[0.0911182, 0.11156, 0.0975332, 0.0756558, 0.14308, 0.116821, 0.141649]
            KL=[0.06, 0.06, 0.06, 0.04, 0.04, 0.02, 0.01]
            XF=[1, 1, 1, 1, 1, 1, 1]
        SoilWater: same as Truth.Field.Soil.SoilWater
        SoilNitrogen: fom_type=[default, manure, mucuna, lablab, shemp, stable]; fract_carb=[0.2, 0.3, 0.54, 0.57, 0.45, 0]; fract_cell=[0.7, 0.3, 0.37, 0.37, 0.47, 0.1]; fract_lign=[0.1, 0.4, 0.09, 0.06, 0.08, 0.9]; wfpsN2N2O_x=[22, 88]; wfpsN2N2O_y=[0.1, 1]
        SoilOrganicMatter: same as Truth.Field.Soil.SoilOrganicMatter
        Analysis: Thickness=[150, 150, 300, 300, 300, 300, 300]; PH=[8, 8, 8, 8, 8, 8, 8]; PHUnits=Water; BoronUnits=HotWater
        InitialWater: PercentMethod=EvenlyDistributed; FractionFull=0.5; RelativeTo=LL15
        Sample InitialN: same as Truth.Field.Soil.InitialN
        CERESSoilTemperature
      SurfaceOrganicMatter: same as Truth.Field.SurfaceOrganicMatter
      Plant15 Wheat: AutoHarvest=true; CropType=Wheat
      MicroClimate: a_interception=0; b_interception=1; c_interception=0; d_interception=0; soil_albedo=0.3; sun_angle=15; soil_heat_flux_fraction=0.4; night_interception_fraction=0.5; refheight=2; albedo=0.15; emissivity=0.96; RadIntTotal=0
      Manager SowingFertiliser: same as Truth.Field.SowingFertiliser
      Manager SowingRule
        StartDate = 10-may
        EndDate = 10-may
        MinESW = 0
        MinRain = 0
        RainDays = 7
        CultivarName = Custom25
        SowingDepth = 30
        RowSpacing = 250
        Population = 120
        script: same as in Truth.Field.SowingRule
      SoluteManager
    Control: DAOption=OpenLoop; EnsembleSize=50; AddModelError=false; FixPhenology=false; DoYPheno=[131, 132, 136, 137, 202, 247, 255, 288, 290, 291, 0]
      OpenLoop
      InitialConditions: InitialDate=1996-01-01; InitialSWError=[0.1, 0.09, 0.08, 0.07, 0.06, 0.06, 0.06]
        InitialSW=[0.280159, 0.293109, 0.211954, 0.205081, 0.196303, 0.210603, 0.203463]
      StateVariables: same as Truth.Control.StateVariables
      Observations: same as Truth.Control.Observations
  Simulation Ensemble26
    Clock: StartDate=1996-01-01; EndDate=1996-12-30
    Summary SummaryFile
    Weather: FileName=../Met/Weather_Ensemble26.met
    Zone Field: Area=1; Slope=0
      Report: same as Truth.Field.Report
      Fertiliser
      Soil: ASCOrder=Vertosol; ASCSubOrder=Black; SoilType=Clay; Site=Norwin; NearestTown=Norwin; Region=Darling Downs and Granite Belt; State=Queensland; Country=Australia; NaturalVegetation=Qld. Bluegrass, possible Qld. Blue gum; ApsoilNumber=900; Latitude=-27.581836; Longitude=151.320206; LocationAccuracy=+/- 20m
        DataSource=CSIRO Sustainable Ecosystems, Toowoomba; Characteriesd as part of the GRDC funded project"Doing it better, doing it smarter, managing soil water in Australian agriculture' 2011
        Comments=OC, CLL for all crops estimated-based on Bongeen Mywybilla Soil No1
        Water
          Thickness  BD   AirDry     LL15       DUL       SAT       KS
          150        1.3  0.0175192  0.0375192  0.394063  0.494063  20
          150        1.3  0.158971   0.178971   0.355266  0.455266  20
          300        1.4  0.0960342  0.116034   0.349959  0.449959  20
          300        1.4  0.106992   0.126992   0.284182  0.384182  20
          300        1.5  0.102272   0.122272   0.335044  0.435044  20
          300        1.5  0.0714956  0.0914956  0.309867  0.409867  20
          300        1.5  0.126008   0.146008   0.351179  0.451179  20
          SoilCrop WheatSoil
            LL=[0.0375192, 0.178971, 0.116034, 0.126992, 0.122272, 0.0914956, 0.146008]
            KL=[0.06, 0.06, 0.06, 0.04, 0.04, 0.02, 0.01]
            XF=[1, 1, 1, 1, 1, 1, 1]
        SoilWater: same as Truth.Field.Soil.SoilWater
        SoilNitrogen: fom_type=[default, manure, mucuna, lablab, shemp, stable]; fract_carb=[0.2, 0.3, 0.54, 0.57, 0.45, 0]; fract_cell=[0.7, 0.3, 0.37, 0.37, 0.47, 0.1]; fract_lign=[0.1, 0.4, 0.09, 0.06, 0.08, 0.9]; wfpsN2N2O_x=[22, 88]; wfpsN2N2O_y=[0.1, 1]
        SoilOrganicMatter: same as Truth.Field.Soil.SoilOrganicMatter
        Analysis: Thickness=[150, 150, 300, 300, 300, 300, 300]; PH=[8, 8, 8, 8, 8, 8, 8]; PHUnits=Water; BoronUnits=HotWater
        InitialWater: PercentMethod=EvenlyDistributed; FractionFull=0.5; RelativeTo=LL15
        Sample InitialN: same as Truth.Field.Soil.InitialN
        CERESSoilTemperature
      SurfaceOrganicMatter: same as Truth.Field.SurfaceOrganicMatter
      Plant15 Wheat: AutoHarvest=true; CropType=Wheat
      MicroClimate: a_interception=0; b_interception=1; c_interception=0; d_interception=0; soil_albedo=0.3; sun_angle=15; soil_heat_flux_fraction=0.4; night_interception_fraction=0.5; refheight=2; albedo=0.15; emissivity=0.96; RadIntTotal=0
      Manager SowingFertiliser: same as Truth.Field.SowingFertiliser
      Manager SowingRule
        StartDate = 10-may
        EndDate = 10-may
        MinESW = 0
        MinRain = 0
        RainDays = 7
        CultivarName = Custom26
        SowingDepth = 30
        RowSpacing = 250
        Population = 120
        script: same as in Truth.Field.SowingRule
      SoluteManager
    Control: DAOption=OpenLoop; EnsembleSize=50; AddModelError=false; FixPhenology=false; DoYPheno=[131, 132, 136, 137, 202, 247, 255, 288, 290, 291, 0]
      OpenLoop
      InitialConditions: InitialDate=1996-01-01; InitialSWError=[0.1, 0.09, 0.08, 0.07, 0.06, 0.06, 0.06]
        InitialSW=[0.494063, 0.455266, 0.449959, 0.384182, 0.401439, 0.407148, 0.415549]
      StateVariables: same as Truth.Control.StateVariables
      Observations: same as Truth.Control.Observations
  Simulation Ensemble27
    Clock: StartDate=1996-01-01; EndDate=1996-12-30
    Summary SummaryFile
    Weather: FileName=../Met/Weather_Ensemble27.met
    Zone Field: Area=1; Slope=0
      Report: same as Truth.Field.Report
      Fertiliser
      Soil: ASCOrder=Vertosol; ASCSubOrder=Black; SoilType=Clay; Site=Norwin; NearestTown=Norwin; Region=Darling Downs and Granite Belt; State=Queensland; Country=Australia; NaturalVegetation=Qld. Bluegrass, possible Qld. Blue gum; ApsoilNumber=900; Latitude=-27.581836; Longitude=151.320206; LocationAccuracy=+/- 20m
        DataSource=CSIRO Sustainable Ecosystems, Toowoomba; Characteriesd as part of the GRDC funded project"Doing it better, doing it smarter, managing soil water in Australian agriculture' 2011
        Comments=OC, CLL for all crops estimated-based on Bongeen Mywybilla Soil No1
        Water
          Thickness  BD   AirDry     LL15       DUL       SAT       KS
          150        1.3  0.0536598  0.0736598  0.428969  0.528969  20
          150        1.3  0.0873629  0.107363   0.444252  0.544252  20
          300        1.4  0.0498515  0.0698515  0.378962  0.478962  20
          300        1.4  0.143048   0.163048   0.341925  0.441925  20
          300        1.5  0.119517   0.139517   0.336173  0.436173  20
          300        1.5  0.107153   0.127153   0.284515  0.384515  20
          300        1.5  0.106297   0.126297   0.330042  0.430042  20
          SoilCrop WheatSoil
            LL=[0.0736598, 0.107363, 0.0698515, 0.163048, 0.139517, 0.127153, 0.126297]
            KL=[0.06, 0.06, 0.06, 0.04, 0.04, 0.02, 0.01]
            XF=[1, 1, 1, 1, 1, 1, 1]
        SoilWater: same as Truth.Field.Soil.SoilWater
        SoilNitrogen: fom_type=[default, manure, mucuna, lablab, shemp, stable]; fract_carb=[0.2, 0.3, 0.54, 0.57, 0.45, 0]; fract_cell=[0.7, 0.3, 0.37, 0.37, 0.47, 0.1]; fract_lign=[0.1, 0.4, 0.09, 0.06, 0.08, 0.9]; wfpsN2N2O_x=[22, 88]; wfpsN2N2O_y=[0.1, 1]
        SoilOrganicMatter: same as Truth.Field.Soil.SoilOrganicMatter
        Analysis: Thickness=[150, 150, 300, 300, 300, 300, 300]; PH=[8, 8, 8, 8, 8, 8, 8]; PHUnits=Water; BoronUnits=HotWater
        InitialWater: PercentMethod=EvenlyDistributed; FractionFull=0.5; RelativeTo=LL15
        Sample InitialN: same as Truth.Field.Soil.InitialN
        CERESSoilTemperature
      SurfaceOrganicMatter: same as Truth.Field.SurfaceOrganicMatter
      Plant15 Wheat: AutoHarvest=true; CropType=Wheat
      MicroClimate: a_interception=0; b_interception=1; c_interception=0; d_interception=0; soil_albedo=0.3; sun_angle=15; soil_heat_flux_fraction=0.4; night_interception_fraction=0.5; refheight=2; albedo=0.15; emissivity=0.96; RadIntTotal=0
      Manager SowingFertiliser: same as Truth.Field.SowingFertiliser
      Manager SowingRule
        StartDate = 10-may
        EndDate = 10-may
        MinESW = 0
        MinRain = 0
        RainDays = 7
        CultivarName = Custom27
        SowingDepth = 30
        RowSpacing = 250
        Population = 120
        script: same as in Truth.Field.SowingRule
      SoluteManager
    Control: DAOption=OpenLoop; EnsembleSize=50; AddModelError=false; FixPhenology=false; DoYPheno=[131, 132, 136, 137, 202, 247, 255, 288, 290, 291, 0]
      OpenLoop
      InitialConditions: InitialDate=1996-01-01; InitialSWError=[0.1, 0.09, 0.08, 0.07, 0.06, 0.06, 0.06]
        InitialSW=[0.180206, 0.190704, 0.306779, 0.353279, 0.302674, 0.256094, 0.276735]
      StateVariables: same as Truth.Control.StateVariables
      Observations: same as Truth.Control.Observations
  Simulation Ensemble28
    Clock: StartDate=1996-01-01; EndDate=1996-12-30
    Summary SummaryFile
    Weather: FileName=../Met/Weather_Ensemble28.met
    Zone Field: Area=1; Slope=0
      Report: same as Truth.Field.Report
      Fertiliser
      Soil: ASCOrder=Vertosol; ASCSubOrder=Black; SoilType=Clay; Site=Norwin; NearestTown=Norwin; Region=Darling Downs and Granite Belt; State=Queensland; Country=Australia; NaturalVegetation=Qld. Bluegrass, possible Qld. Blue gum; ApsoilNumber=900; Latitude=-27.581836; Longitude=151.320206; LocationAccuracy=+/- 20m
        DataSource=CSIRO Sustainable Ecosystems, Toowoomba; Characteriesd as part of the GRDC funded project"Doing it better, doing it smarter, managing soil water in Australian agriculture' 2011
        Comments=OC, CLL for all crops estimated-based on Bongeen Mywybilla Soil No1
        Water
          Thickness  BD   AirDry     LL15       DUL       SAT       KS
          150        1.3  0.0359051  0.0559051  0.348206  0.448206  20
          150        1.3  0.0758272  0.0958272  0.37551   0.47551   20
          300        1.4  0.0720286  0.0920286  0.404965  0.504965  20
          300        1.4  0.103452   0.123452   0.353219  0.453219  20
          300        1.5  0.137296   0.157296   0.361642  0.461642  20
          300        1.5  0.144232   0.164232   0.294456  0.394456  20
          300        1.5  0.121559   0.141559   0.304571  0.404571  20
          SoilCrop WheatSoil
            LL=[0.0559051, 0.0958272, 0.0920286, 0.123452, 0.157296, 0.164232, 0.141559]
            KL=[0.06, 0.06, 0.06, 0.04, 0.04, 0.02, 0.01]
            XF=[1, 1, 1, 1, 1, 1, 1]
        SoilWater: same as Truth.Field.Soil.SoilWater
        SoilNitrogen: fom_type=[default, manure, mucuna, lablab, shemp, stable]; fract_carb=[0.2, 0.3, 0.54, 0.57, 0.45, 0]; fract_cell=[0.7, 0.3, 0.37, 0.37, 0.47, 0.1]; fract_lign=[0.1, 0.4, 0.09, 0.06, 0.08, 0.9]; wfpsN2N2O_x=[22, 88]; wfpsN2N2O_y=[0.1, 1]
        SoilOrganicMatter: same as Truth.Field.Soil.SoilOrganicMatter
        Analysis: Thickness=[150, 150, 300, 300, 300, 300, 300]; PH=[8, 8, 8, 8, 8, 8, 8]; PHUnits=Water; BoronUnits=HotWater
        InitialWater: PercentMethod=EvenlyDistributed; FractionFull=0.5; RelativeTo=LL15
        Sample InitialN: same as Truth.Field.Soil.InitialN
        CERESSoilTemperature
      SurfaceOrganicMatter: same as Truth.Field.SurfaceOrganicMatter
      Plant15 Wheat: AutoHarvest=true; CropType=Wheat
      MicroClimate: a_interception=0; b_interception=1; c_interception=0; d_interception=0; soil_albedo=0.3; sun_angle=15; soil_heat_flux_fraction=0.4; night_interception_fraction=0.5; refheight=2; albedo=0.15; emissivity=0.96; RadIntTotal=0
      Manager SowingFertiliser: same as Truth.Field.SowingFertiliser
      Manager SowingRule
        StartDate = 10-may
        EndDate = 10-may
        MinESW = 0
        MinRain = 0
        RainDays = 7
        CultivarName = Custom28
        SowingDepth = 30
        RowSpacing = 250
        Population = 120
        script: same as in Truth.Field.SowingRule
      SoluteManager
    Control: DAOption=OpenLoop; EnsembleSize=50; AddModelError=false; FixPhenology=false; DoYPheno=[131, 132, 136, 137, 202, 247, 255, 288, 290, 291, 0]
      OpenLoop
      InitialConditions: InitialDate=1996-01-01; InitialSWError=[0.1, 0.09, 0.08, 0.07, 0.06, 0.06, 0.06]
        InitialSW=[0.401609, 0.348179, 0.313799, 0.319903, 0.328923, 0.323853, 0.329236]
      StateVariables: same as Truth.Control.StateVariables
      Observations: same as Truth.Control.Observations
  Simulation Ensemble29
    Clock: StartDate=1996-01-01; EndDate=1996-12-30
    Summary SummaryFile
    Weather: FileName=../Met/Weather_Ensemble29.met
    Zone Field: Area=1; Slope=0
      Report: same as Truth.Field.Report
      Fertiliser
      Soil: ASCOrder=Vertosol; ASCSubOrder=Black; SoilType=Clay; Site=Norwin; NearestTown=Norwin; Region=Darling Downs and Granite Belt; State=Queensland; Country=Australia; NaturalVegetation=Qld. Bluegrass, possible Qld. Blue gum; ApsoilNumber=900; Latitude=-27.581836; Longitude=151.320206; LocationAccuracy=+/- 20m
        DataSource=CSIRO Sustainable Ecosystems, Toowoomba; Characteriesd as part of the GRDC funded project"Doing it better, doing it smarter, managing soil water in Australian agriculture' 2011
        Comments=OC, CLL for all crops estimated-based on Bongeen Mywybilla Soil No1
        Water
          Thickness  BD   AirDry     LL15       DUL       SAT       KS
          150        1.3  0.0414931  0.0614931  0.33345   0.43345   20
          150        1.3  0.0792828  0.0992828  0.35715   0.45715   20
          300        1.4  0.0604972  0.0804972  0.399747  0.499747  20
          300        1.4  0.0938361  0.113836   0.376179  0.476179  20
          300        1.5  0.136852   0.156852   0.379806  0.479806  20
          300        1.5  0.124898   0.144898   0.345686  0.445686  20
          300        1.5  0.134674   0.154674   0.301878  0.401878  20
          SoilCrop WheatSoil
            LL=[0.0614931, 0.0992828, 0.0804972, 0.113836, 0.156852, 0.144898, 0.154674]
            KL=[0.06, 0.06, 0.06, 0.04, 0.04, 0.02, 0.01]
            XF=[1, 1, 1, 1, 1, 1, 1]
        SoilWater: same as Truth.Field.Soil.SoilWater
        SoilNitrogen: fom_type=[default, manure, mucuna, lablab, shemp, stable]; fract_carb=[0.2, 0.3, 0.54, 0.57, 0.45, 0]; fract_cell=[0.7, 0.3, 0.37, 0.37, 0.47, 0.1]; fract_lign=[0.1, 0.4, 0.09, 0.06, 0.08, 0.9]; wfpsN2N2O_x=[22, 88]; wfpsN2N2O_y=[0.1, 1]
        SoilOrganicMatter: same as Truth.Field.Soil.SoilOrganicMatter
        Analysis: Thickness=[150, 150, 300, 300, 300, 300, 300]; PH=[8, 8, 8, 8, 8, 8, 8]; PHUnits=Water; BoronUnits=HotWater
        InitialWater: PercentMethod=EvenlyDistributed; FractionFull=0.5; RelativeTo=LL15
        Sample InitialN: same as Truth.Field.Soil.InitialN
        CERESSoilTemperature
      SurfaceOrganicMatter: same as Truth.Field.SurfaceOrganicMatter
      Plant15 Wheat: AutoHarvest=true; CropType=Wheat
      MicroClimate: a_interception=0; b_interception=1; c_interception=0; d_interception=0; soil_albedo=0.3; sun_angle=15; soil_heat_flux_fraction=0.4; night_interception_fraction=0.5; refheight=2; albedo=0.15; emissivity=0.96; RadIntTotal=0
      Manager SowingFertiliser: same as Truth.Field.SowingFertiliser
      Manager SowingRule
        StartDate = 10-may
        EndDate = 10-may
        MinESW = 0
        MinRain = 0
        RainDays = 7
        CultivarName = Custom29
        SowingDepth = 30
        RowSpacing = 250
        Population = 120
        script: same as in Truth.Field.SowingRule
      SoluteManager
    Control: DAOption=OpenLoop; EnsembleSize=50; AddModelError=false; FixPhenology=false; DoYPheno=[131, 132, 136, 137, 202, 247, 255, 288, 290, 291, 0]
      OpenLoop
      InitialConditions: InitialDate=1996-01-01; InitialSWError=[0.1, 0.09, 0.08, 0.07, 0.06, 0.06, 0.06]
        InitialSW=[0.369609, 0.401208, 0.37603, 0.391703, 0.384927, 0.360524, 0.330426]
      StateVariables: same as Truth.Control.StateVariables
      Observations: same as Truth.Control.Observations
  Simulation Ensemble30
    Clock: StartDate=1996-01-01; EndDate=1996-12-30
    Summary SummaryFile
    Weather: FileName=../Met/Weather_Ensemble30.met
    Zone Field: Area=1; Slope=0
      Report: same as Truth.Field.Report
      Fertiliser
      Soil: ASCOrder=Vertosol; ASCSubOrder=Black; SoilType=Clay; Site=Norwin; NearestTown=Norwin; Region=Darling Downs and Granite Belt; State=Queensland; Country=Australia; NaturalVegetation=Qld. Bluegrass, possible Qld. Blue gum; ApsoilNumber=900; Latitude=-27.581836; Longitude=151.320206; LocationAccuracy=+/- 20m
        DataSource=CSIRO Sustainable Ecosystems, Toowoomba; Characteriesd as part of the GRDC funded project"Doing it better, doing it smarter, managing soil water in Australian agriculture' 2011
        Comments=OC, CLL for all crops estimated-based on Bongeen Mywybilla Soil No1
        Water
          Thickness  BD   AirDry     LL15       DUL       SAT       KS
          150        1.3  0.0720239  0.0920239  0.357517  0.457517  20
          150        1.3  0.0921532  0.112153   0.337601  0.437601  20
          300        1.4  0.0726893  0.0926893  0.342325  0.442325  20
          300        1.4  0.0805794  0.100579   0.336525  0.436525  20
          300        1.5  0.0854198  0.10542    0.366678  0.466678  20
          300        1.5  0.103446   0.123446   0.364276  0.464276  20
          300        1.5  0.129178   0.149178   0.314358  0.414358  20
          SoilCrop WheatSoil
            LL=[0.0920239, 0.112153, 0.0926893, 0.100579, 0.10542, 0.123446, 0.149178]
            KL=[0.06, 0.06, 0.06, 0.04, 0.04, 0.02, 0.01]
            XF=[1, 1, 1, 1, 1, 1, 1]
        SoilWater: same as Truth.Field.Soil.SoilWater
        SoilNitrogen: fom_type=[default, manure, mucuna, lablab, shemp, stable]; fract_carb=[0.2, 0.3, 0.54, 0.57, 0.45, 0]; fract_cell=[0.7, 0.3, 0.37, 0.37, 0.47, 0.1]; fract_lign=[0.1, 0.4, 0.09, 0.06, 0.08, 0.9]; wfpsN2N2O_x=[22, 88]; wfpsN2N2O_y=[0.1, 1]
        SoilOrganicMatter: same as Truth.Field.Soil.SoilOrganicMatter
        Analysis: Thickness=[150, 150, 300, 300, 300, 300, 300]; PH=[8, 8, 8, 8, 8, 8, 8]; PHUnits=Water; BoronUnits=HotWater
        InitialWater: PercentMethod=EvenlyDistributed; FractionFull=0.5; RelativeTo=LL15
        Sample InitialN: same as Truth.Field.Soil.InitialN
        CERESSoilTemperature
      SurfaceOrganicMatter: same as Truth.Field.SurfaceOrganicMatter
      Plant15 Wheat: AutoHarvest=true; CropType=Wheat
      MicroClimate: a_interception=0; b_interception=1; c_interception=0; d_interception=0; soil_albedo=0.3; sun_angle=15; soil_heat_flux_fraction=0.4; night_interception_fraction=0.5; refheight=2; albedo=0.15; emissivity=0.96; RadIntTotal=0
      Manager SowingFertiliser: same as Truth.Field.SowingFertiliser
      Manager SowingRule
        StartDate = 10-may
        EndDate = 10-may
        MinESW = 0
        MinRain = 0
        RainDays = 7
        CultivarName = Custom30
        SowingDepth = 30
        RowSpacing = 250
        Population = 120
        script: same as in Truth.Field.SowingRule
      SoluteManager
    Control: DAOption=OpenLoop; EnsembleSize=50; AddModelError=false; FixPhenology=false; DoYPheno=[131, 132, 136, 137, 202, 247, 255, 288, 290, 291, 0]
      OpenLoop
      InitialConditions: InitialDate=1996-01-01; InitialSWError=[0.1, 0.09, 0.08, 0.07, 0.06, 0.06, 0.06]
        InitialSW=[0.457517, 0.404619, 0.311492, 0.258434, 0.284528, 0.327348, 0.341817]
      StateVariables: same as Truth.Control.StateVariables
      Observations: same as Truth.Control.Observations
  Simulation Ensemble31
    Clock: StartDate=1996-01-01; EndDate=1996-12-30
    Summary SummaryFile
    Weather: FileName=../Met/Weather_Ensemble31.met
    Zone Field: Area=1; Slope=0
      Report: same as Truth.Field.Report
      Fertiliser
      Soil: ASCOrder=Vertosol; ASCSubOrder=Black; SoilType=Clay; Site=Norwin; NearestTown=Norwin; Region=Darling Downs and Granite Belt; State=Queensland; Country=Australia; NaturalVegetation=Qld. Bluegrass, possible Qld. Blue gum; ApsoilNumber=900; Latitude=-27.581836; Longitude=151.320206; LocationAccuracy=+/- 20m
        DataSource=CSIRO Sustainable Ecosystems, Toowoomba; Characteriesd as part of the GRDC funded project"Doing it better, doing it smarter, managing soil water in Australian agriculture' 2011
        Comments=OC, CLL for all crops estimated-based on Bongeen Mywybilla Soil No1
        Water
          Thickness  BD   AirDry     LL15      DUL       SAT       KS
          150        1.3  0.0837739  0.103774  0.385123  0.485123  20
          150        1.3  0.101247   0.121247  0.34163   0.44163   20
          300        1.4  0.118589   0.138589  0.390142  0.490142  20
          300        1.4  0.080597   0.100597  0.322019  0.422019  20
          300        1.5  0.101123   0.121123  0.31755   0.41755   20
          300        1.5  0.0931261  0.113126  0.363208  0.463208  20
          300        1.5  0.100699   0.120699  0.355632  0.455632  20
          SoilCrop WheatSoil
            LL=[0.103774, 0.121247, 0.138589, 0.100597, 0.121123, 0.113126, 0.120699]
            KL=[0.06, 0.06, 0.06, 0.04, 0.04, 0.02, 0.01]
            XF=[1, 1, 1, 1, 1, 1, 1]
        SoilWater: same as Truth.Field.Soil.SoilWater
        SoilNitrogen: fom_type=[default, manure, mucuna, lablab, shemp, stable]; fract_carb=[0.2, 0.3, 0.54, 0.57, 0.45, 0]; fract_cell=[0.7, 0.3, 0.37, 0.37, 0.47, 0.1]; fract_lign=[0.1, 0.4, 0.09, 0.06, 0.08, 0.9]; wfpsN2N2O_x=[22, 88]; wfpsN2N2O_y=[0.1, 1]
        SoilOrganicMatter: same as Truth.Field.Soil.SoilOrganicMatter
        Analysis: Thickness=[150, 150, 300, 300, 300, 300, 300]; PH=[8, 8, 8, 8, 8, 8, 8]; PHUnits=Water; BoronUnits=HotWater
        InitialWater: PercentMethod=EvenlyDistributed; FractionFull=0.5; RelativeTo=LL15
        Sample InitialN: same as Truth.Field.Soil.InitialN
        CERESSoilTemperature
      SurfaceOrganicMatter: same as Truth.Field.SurfaceOrganicMatter
      Plant15 Wheat: AutoHarvest=true; CropType=Wheat
      MicroClimate: a_interception=0; b_interception=1; c_interception=0; d_interception=0; soil_albedo=0.3; sun_angle=15; soil_heat_flux_fraction=0.4; night_interception_fraction=0.5; refheight=2; albedo=0.15; emissivity=0.96; RadIntTotal=0
      Manager SowingFertiliser: same as Truth.Field.SowingFertiliser
      Manager SowingRule
        StartDate = 10-may
        EndDate = 10-may
        MinESW = 0
        MinRain = 0
        RainDays = 7
        CultivarName = Custom31
        SowingDepth = 30
        RowSpacing = 250
        Population = 120
        script: same as in Truth.Field.SowingRule
      SoluteManager
    Control: DAOption=OpenLoop; EnsembleSize=50; AddModelError=false; FixPhenology=false; DoYPheno=[131, 132, 136, 137, 202, 247, 255, 288, 290, 291, 0]
      OpenLoop
      InitialConditions: InitialDate=1996-01-01; InitialSWError=[0.1, 0.09, 0.08, 0.07, 0.06, 0.06, 0.06]
        InitialSW=[0.485123, 0.44163, 0.490142, 0.422019, 0.41755, 0.406108, 0.387685]
      StateVariables: same as Truth.Control.StateVariables
      Observations: same as Truth.Control.Observations
  Simulation Ensemble32
    Clock: StartDate=1996-01-01; EndDate=1996-12-30
    Summary SummaryFile
    Weather: FileName=../Met/Weather_Ensemble32.met
    Zone Field: Area=1; Slope=0
      Report: same as Truth.Field.Report
      Fertiliser
      Soil: ASCOrder=Vertosol; ASCSubOrder=Black; SoilType=Clay; Site=Norwin; NearestTown=Norwin; Region=Darling Downs and Granite Belt; State=Queensland; Country=Australia; NaturalVegetation=Qld. Bluegrass, possible Qld. Blue gum; ApsoilNumber=900; Latitude=-27.581836; Longitude=151.320206; LocationAccuracy=+/- 20m
        DataSource=CSIRO Sustainable Ecosystems, Toowoomba; Characteriesd as part of the GRDC funded project"Doing it better, doing it smarter, managing soil water in Australian agriculture' 2011
        Comments=OC, CLL for all crops estimated-based on Bongeen Mywybilla Soil No1
        Water
          Thickness  BD   AirDry     LL15       DUL       SAT       KS
          150        1.3  0.0652828  0.0852828  0.400606  0.500606  20
          150        1.3  0.0923707  0.112371   0.347743  0.447743  20
          300        1.4  0.101402   0.121402   0.41223   0.51223   20
          300        1.4  0.117256   0.137256   0.330677  0.430677  20
          300        1.5  0.136019   0.156019   0.360748  0.460748  20
          300        1.5  0.0961517  0.116152   0.317486  0.417486  20
          300        1.5  0.10794    0.12794    0.311041  0.411041  20
          SoilCrop WheatSoil
            LL=[0.0852828, 0.112371, 0.121402, 0.137256, 0.156019, 0.116152, 0.12794]
            KL=[0.06, 0.06, 0.06, 0.04, 0.04, 0.02, 0.01]
            XF=[1, 1, 1, 1, 1, 1, 1]
        SoilWater: same as Truth.Field.Soil.SoilWater
        SoilNitrogen: fom_type=[default, manure, mucuna, lablab, shemp, stable]; fract_carb=[0.2, 0.3, 0.54, 0.57, 0.45, 0]; fract_cell=[0.7, 0.3, 0.37, 0.37, 0.47, 0.1]; fract_lign=[0.1, 0.4, 0.09, 0.06, 0.08, 0.9]; wfpsN2N2O_x=[22, 88]; wfpsN2N2O_y=[0.1, 1]
        SoilOrganicMatter: same as Truth.Field.Soil.SoilOrganicMatter
        Analysis: Thickness=[150, 150, 300, 300, 300, 300, 300]; PH=[8, 8, 8, 8, 8, 8, 8]; PHUnits=Water; BoronUnits=HotWater
        InitialWater: PercentMethod=EvenlyDistributed; FractionFull=0.5; RelativeTo=LL15
        Sample InitialN: same as Truth.Field.Soil.InitialN
        CERESSoilTemperature
      SurfaceOrganicMatter: same as Truth.Field.SurfaceOrganicMatter
      Plant15 Wheat: AutoHarvest=true; CropType=Wheat
      MicroClimate: a_interception=0; b_interception=1; c_interception=0; d_interception=0; soil_albedo=0.3; sun_angle=15; soil_heat_flux_fraction=0.4; night_interception_fraction=0.5; refheight=2; albedo=0.15; emissivity=0.96; RadIntTotal=0
      Manager SowingFertiliser: same as Truth.Field.SowingFertiliser
      Manager SowingRule
        StartDate = 10-may
        EndDate = 10-may
        MinESW = 0
        MinRain = 0
        RainDays = 7
        CultivarName = Custom32
        SowingDepth = 30
        RowSpacing = 250
        Population = 120
        script: same as in Truth.Field.SowingRule
      SoluteManager
    Control: DAOption=OpenLoop; EnsembleSize=50; AddModelError=false; FixPhenology=false; DoYPheno=[131, 132, 136, 137, 202, 247, 255, 288, 290, 291, 0]
      OpenLoop
      InitialConditions: InitialDate=1996-01-01; InitialSWError=[0.1, 0.09, 0.08, 0.07, 0.06, 0.06, 0.06]
        InitialSW=[0.325753, 0.312752, 0.315679, 0.280036, 0.261104, 0.21556, 0.226586]
      StateVariables: same as Truth.Control.StateVariables
      Observations: same as Truth.Control.Observations
  Simulation Ensemble33
    Clock: StartDate=1996-01-01; EndDate=1996-12-30
    Summary SummaryFile
    Weather: FileName=../Met/Weather_Ensemble33.met
    Zone Field: Area=1; Slope=0
      Report: same as Truth.Field.Report
      Fertiliser
      Soil: ASCOrder=Vertosol; ASCSubOrder=Black; SoilType=Clay; Site=Norwin; NearestTown=Norwin; Region=Darling Downs and Granite Belt; State=Queensland; Country=Australia; NaturalVegetation=Qld. Bluegrass, possible Qld. Blue gum; ApsoilNumber=900; Latitude=-27.581836; Longitude=151.320206; LocationAccuracy=+/- 20m
        DataSource=CSIRO Sustainable Ecosystems, Toowoomba; Characteriesd as part of the GRDC funded project"Doing it better, doing it smarter, managing soil water in Australian agriculture' 2011
        Comments=OC, CLL for all crops estimated-based on Bongeen Mywybilla Soil No1
        Water
          Thickness  BD   AirDry     LL15       DUL       SAT       KS
          150        1.3  0.0565372  0.0765372  0.409674  0.509674  20
          150        1.3  0.0655292  0.0855292  0.376289  0.476289  20
          300        1.4  0.0464477  0.0664477  0.375225  0.475225  20
          300        1.4  0.106431   0.126431   0.332738  0.432738  20
          300        1.5  0.1174     0.1374     0.389443  0.489443  20
          300        1.5  0.122963   0.142963   0.328776  0.428776  20
          300        1.5  0.137436   0.157436   0.352315  0.452315  20
          SoilCrop WheatSoil
            LL=[0.0765372, 0.0855292, 0.0664477, 0.126431, 0.1374, 0.142963, 0.157436]
            KL=[0.06, 0.06, 0.06, 0.04, 0.04, 0.02, 0.01]
            XF=[1, 1, 1, 1, 1, 1, 1]
        SoilWater: same as Truth.Field.Soil.SoilWater
        SoilNitrogen: fom_type=[default, manure, mucuna, lablab, shemp, stable]; fract_carb=[0.2, 0.3, 0.54, 0.57, 0.45, 0]; fract_cell=[0.7, 0.3, 0.37, 0.37, 0.47, 0.1]; fract_lign=[0.1, 0.4, 0.09, 0.06, 0.08, 0.9]; wfpsN2N2O_x=[22, 88]; wfpsN2N2O_y=[0.1, 1]
        SoilOrganicMatter: same as Truth.Field.Soil.SoilOrganicMatter
        Analysis: Thickness=[150, 150, 300, 300, 300, 300, 300]; PH=[8, 8, 8, 8, 8, 8, 8]; PHUnits=Water; BoronUnits=HotWater
        InitialWater: PercentMethod=EvenlyDistributed; FractionFull=0.5; RelativeTo=LL15
        Sample InitialN: same as Truth.Field.Soil.InitialN
        CERESSoilTemperature
      SurfaceOrganicMatter: same as Truth.Field.SurfaceOrganicMatter
      Plant15 Wheat: AutoHarvest=true; CropType=Wheat
      MicroClimate: a_interception=0; b_interception=1; c_interception=0; d_interception=0; soil_albedo=0.3; sun_angle=15; soil_heat_flux_fraction=0.4; night_interception_fraction=0.5; refheight=2; albedo=0.15; emissivity=0.96; RadIntTotal=0
      Manager SowingFertiliser: same as Truth.Field.SowingFertiliser
      Manager SowingRule
        StartDate = 10-may
        EndDate = 10-may
        MinESW = 0
        MinRain = 0
        RainDays = 7
        CultivarName = Custom33
        SowingDepth = 30
        RowSpacing = 250
        Population = 120
        script: same as in Truth.Field.SowingRule
      SoluteManager
    Control: DAOption=OpenLoop; EnsembleSize=50; AddModelError=false; FixPhenology=false; DoYPheno=[131, 132, 136, 137, 202, 247, 255, 288, 290, 291, 0]
      OpenLoop
      InitialConditions: InitialDate=1996-01-01; InitialSWError=[0.1, 0.09, 0.08, 0.07, 0.06, 0.06, 0.06]
        InitialSW=[0.3927, 0.418974, 0.373649, 0.365839, 0.364573, 0.359876, 0.337853]
      StateVariables: same as Truth.Control.StateVariables
      Observations: same as Truth.Control.Observations
  Simulation Ensemble34
    Clock: StartDate=1996-01-01; EndDate=1996-12-30
    Summary SummaryFile
    Weather: FileName=../Met/Weather_Ensemble34.met
    Zone Field: Area=1; Slope=0
      Report: same as Truth.Field.Report
      Fertiliser
      Soil: ASCOrder=Vertosol; ASCSubOrder=Black; SoilType=Clay; Site=Norwin; NearestTown=Norwin; Region=Darling Downs and Granite Belt; State=Queensland; Country=Australia; NaturalVegetation=Qld. Bluegrass, possible Qld. Blue gum; ApsoilNumber=900; Latitude=-27.581836; Longitude=151.320206; LocationAccuracy=+/- 20m
        DataSource=CSIRO Sustainable Ecosystems, Toowoomba; Characteriesd as part of the GRDC funded project"Doing it better, doing it smarter, managing soil water in Australian agriculture' 2011
        Comments=OC, CLL for all crops estimated-based on Bongeen Mywybilla Soil No1
        Water
          Thickness  BD   AirDry     LL15       DUL       SAT       KS
          150        1.3  0.0612559  0.0812559  0.363669  0.463669  20
          150        1.3  0.0833509  0.103351   0.336974  0.436974  20
          300        1.4  0.0806929  0.100693   0.393911  0.493911  20
          300        1.4  0.0821192  0.102119   0.335694  0.435694  20
          300        1.5  0.118944   0.138944   0.347242  0.447242  20
          300        1.5  0.11148    0.13148    0.3296    0.4296    20
          300        1.5  0.163595   0.183595   0.31891   0.41891   20
          SoilCrop WheatSoil
            LL=[0.0812559, 0.103351, 0.100693, 0.102119, 0.138944, 0.13148, 0.183595]
            KL=[0.06, 0.06, 0.06, 0.04, 0.04, 0.02, 0.01]
            XF=[1, 1, 1, 1, 1, 1, 1]
        SoilWater: same as Truth.Field.Soil.SoilWater
        SoilNitrogen: fom_type=[default, manure, mucuna, lablab, shemp, stable]; fract_carb=[0.2, 0.3, 0.54, 0.57, 0.45, 0]; fract_cell=[0.7, 0.3, 0.37, 0.37, 0.47, 0.1]; fract_lign=[0.1, 0.4, 0.09, 0.06, 0.08, 0.9]; wfpsN2N2O_x=[22, 88]; wfpsN2N2O_y=[0.1, 1]
        SoilOrganicMatter: same as Truth.Field.Soil.SoilOrganicMatter
        Analysis: Thickness=[150, 150, 300, 300, 300, 300, 300]; PH=[8, 8, 8, 8, 8, 8, 8]; PHUnits=Water; BoronUnits=HotWater
        InitialWater: PercentMethod=EvenlyDistributed; FractionFull=0.5; RelativeTo=LL15
        Sample InitialN: same as Truth.Field.Soil.InitialN
        CERESSoilTemperature
      SurfaceOrganicMatter: same as Truth.Field.SurfaceOrganicMatter
      Plant15 Wheat: AutoHarvest=true; CropType=Wheat
      MicroClimate: a_interception=0; b_interception=1; c_interception=0; d_interception=0; soil_albedo=0.3; sun_angle=15; soil_heat_flux_fraction=0.4; night_interception_fraction=0.5; refheight=2; albedo=0.15; emissivity=0.96; RadIntTotal=0
      Manager SowingFertiliser: same as Truth.Field.SowingFertiliser
      Manager SowingRule
        StartDate = 10-may
        EndDate = 10-may
        MinESW = 0
        MinRain = 0
        RainDays = 7
        CultivarName = Custom34
        SowingDepth = 30
        RowSpacing = 250
        Population = 120
        script: same as in Truth.Field.SowingRule
      SoluteManager
    Control: DAOption=OpenLoop; EnsembleSize=50; AddModelError=false; FixPhenology=false; DoYPheno=[131, 132, 136, 137, 202, 247, 255, 288, 290, 291, 0]
      OpenLoop
      InitialConditions: InitialDate=1996-01-01; InitialSWError=[0.1, 0.09, 0.08, 0.07, 0.06, 0.06, 0.06]
        InitialSW=[0.154198, 0.227531, 0.223793, 0.257593, 0.28533, 0.326463, 0.308336]
      StateVariables: same as Truth.Control.StateVariables
      Observations: same as Truth.Control.Observations
  Simulation Ensemble35
    Clock: StartDate=1996-01-01; EndDate=1996-12-30
    Summary SummaryFile
    Weather: FileName=../Met/Weather_Ensemble35.met
    Zone Field: Area=1; Slope=0
      Report: same as Truth.Field.Report
      Fertiliser
      Soil: ASCOrder=Vertosol; ASCSubOrder=Black; SoilType=Clay; Site=Norwin; NearestTown=Norwin; Region=Darling Downs and Granite Belt; State=Queensland; Country=Australia; NaturalVegetation=Qld. Bluegrass, possible Qld. Blue gum; ApsoilNumber=900; Latitude=-27.581836; Longitude=151.320206; LocationAccuracy=+/- 20m
        DataSource=CSIRO Sustainable Ecosystems, Toowoomba; Characteriesd as part of the GRDC funded project"Doing it better, doing it smarter, managing soil water in Australian agriculture' 2011
        Comments=OC, CLL for all crops estimated-based on Bongeen Mywybilla Soil No1
        Water
          Thickness  BD   AirDry     LL15       DUL       SAT       KS
          150        1.3  0.0804719  0.100472   0.375616  0.475616  20
          150        1.3  0.107765   0.127765   0.375125  0.475125  20
          300        1.4  0.0856587  0.105659   0.427238  0.527238  20
          300        1.4  0.0621769  0.0821769  0.315192  0.415192  20
          300        1.5  0.10603    0.12603    0.375885  0.475885  20
          300        1.5  0.0902873  0.110287   0.332073  0.432073  20
          300        1.5  0.114925   0.134925   0.402774  0.502774  20
          SoilCrop WheatSoil
            LL=[0.100472, 0.127765, 0.105659, 0.0821769, 0.12603, 0.110287, 0.134925]
            KL=[0.06, 0.06, 0.06, 0.04, 0.04, 0.02, 0.01]
            XF=[1, 1, 1, 1, 1, 1, 1]
        SoilWater: same as Truth.Field.Soil.SoilWater
        SoilNitrogen: fom_type=[default, manure, mucuna, lablab, shemp, stable]; fract_carb=[0.2, 0.3, 0.54, 0.57, 0.45, 0]; fract_cell=[0.7, 0.3, 0.37, 0.37, 0.47, 0.1]; fract_lign=[0.1, 0.4, 0.09, 0.06, 0.08, 0.9]; wfpsN2N2O_x=[22, 88]; wfpsN2N2O_y=[0.1, 1]
        SoilOrganicMatter: same as Truth.Field.Soil.SoilOrganicMatter
        Analysis: Thickness=[150, 150, 300, 300, 300, 300, 300]; PH=[8, 8, 8, 8, 8, 8, 8]; PHUnits=Water; BoronUnits=HotWater
        InitialWater: PercentMethod=EvenlyDistributed; FractionFull=0.5; RelativeTo=LL15
        Sample InitialN: same as Truth.Field.Soil.InitialN
        CERESSoilTemperature
      SurfaceOrganicMatter: same as Truth.Field.SurfaceOrganicMatter
      Plant15 Wheat: AutoHarvest=true; CropType=Wheat
      MicroClimate: a_interception=0; b_interception=1; c_interception=0; d_interception=0; soil_albedo=0.3; sun_angle=15; soil_heat_flux_fraction=0.4; night_interception_fraction=0.5; refheight=2; albedo=0.15; emissivity=0.96; RadIntTotal=0
      Manager SowingFertiliser: same as Truth.Field.SowingFertiliser
      Manager SowingRule
        StartDate = 10-may
        EndDate = 10-may
        MinESW = 0
        MinRain = 0
        RainDays = 7
        CultivarName = Custom35
        SowingDepth = 30
        RowSpacing = 250
        Population = 120
        script: same as in Truth.Field.SowingRule
      SoluteManager
    Control: DAOption=OpenLoop; EnsembleSize=50; AddModelError=false; FixPhenology=false; DoYPheno=[131, 132, 136, 137, 202, 247, 255, 288, 290, 291, 0]
      OpenLoop
      InitialConditions: InitialDate=1996-01-01; InitialSWError=[0.1, 0.09, 0.08, 0.07, 0.06, 0.06, 0.06]
        InitialSW=[0.4712, 0.441025, 0.353321, 0.293156, 0.306302, 0.34601, 0.339511]
      StateVariables: same as Truth.Control.StateVariables
      Observations: same as Truth.Control.Observations
  Simulation Ensemble36
    Clock: StartDate=1996-01-01; EndDate=1996-12-30
    Summary SummaryFile
    Weather: FileName=../Met/Weather_Ensemble36.met
    Zone Field: Area=1; Slope=0
      Report: same as Truth.Field.Report
      Fertiliser
      Soil: ASCOrder=Vertosol; ASCSubOrder=Black; SoilType=Clay; Site=Norwin; NearestTown=Norwin; Region=Darling Downs and Granite Belt; State=Queensland; Country=Australia; NaturalVegetation=Qld. Bluegrass, possible Qld. Blue gum; ApsoilNumber=900; Latitude=-27.581836; Longitude=151.320206; LocationAccuracy=+/- 20m
        DataSource=CSIRO Sustainable Ecosystems, Toowoomba; Characteriesd as part of the GRDC funded project"Doing it better, doing it smarter, managing soil water in Australian agriculture' 2011
        Comments=OC, CLL for all crops estimated-based on Bongeen Mywybilla Soil No1
        Water
          Thickness  BD   AirDry     LL15       DUL       SAT       KS
          150        1.3  0.067671   0.087671   0.308624  0.408624  20
          150        1.3  0.118552   0.138552   0.345453  0.445453  20
          300        1.4  0.102868   0.122868   0.366749  0.466749  20
          300        1.4  0.0606028  0.0806028  0.349493  0.449493  20
          300        1.5  0.109085   0.129085   0.394286  0.494286  20
          300        1.5  0.0776238  0.0976238  0.354973  0.454973  20
          300        1.5  0.102854   0.122854   0.375762  0.475762  20
          SoilCrop WheatSoil
            LL=[0.087671, 0.138552, 0.122868, 0.0806028, 0.129085, 0.0976238, 0.122854]
            KL=[0.06, 0.06, 0.06, 0.04, 0.04, 0.02, 0.01]
            XF=[1, 1, 1, 1, 1, 1, 1]
        SoilWater: same as Truth.Field.Soil.SoilWater
        SoilNitrogen: fom_type=[default, manure, mucuna, lablab, shemp, stable]; fract_carb=[0.2, 0.3, 0.54, 0.57, 0.45, 0]; fract_cell=[0.7, 0.3, 0.37, 0.37, 0.47, 0.1]; fract_lign=[0.1, 0.4, 0.09, 0.06, 0.08, 0.9]; wfpsN2N2O_x=[22, 88]; wfpsN2N2O_y=[0.1, 1]
        SoilOrganicMatter: same as Truth.Field.Soil.SoilOrganicMatter
        Analysis: Thickness=[150, 150, 300, 300, 300, 300, 300]; PH=[8, 8, 8, 8, 8, 8, 8]; PHUnits=Water; BoronUnits=HotWater
        InitialWater: PercentMethod=EvenlyDistributed; FractionFull=0.5; RelativeTo=LL15
        Sample InitialN: same as Truth.Field.Soil.InitialN
        CERESSoilTemperature
      SurfaceOrganicMatter: same as Truth.Field.SurfaceOrganicMatter
      Plant15 Wheat: AutoHarvest=true; CropType=Wheat
      MicroClimate: a_interception=0; b_interception=1; c_interception=0; d_interception=0; soil_albedo=0.3; sun_angle=15; soil_heat_flux_fraction=0.4; night_interception_fraction=0.5; refheight=2; albedo=0.15; emissivity=0.96; RadIntTotal=0
      Manager SowingFertiliser: same as Truth.Field.SowingFertiliser
      Manager SowingRule
        StartDate = 10-may
        EndDate = 10-may
        MinESW = 0
        MinRain = 0
        RainDays = 7
        CultivarName = Custom36
        SowingDepth = 30
        RowSpacing = 250
        Population = 120
        script: same as in Truth.Field.SowingRule
      SoluteManager
    Control: DAOption=OpenLoop; EnsembleSize=50; AddModelError=false; FixPhenology=false; DoYPheno=[131, 132, 136, 137, 202, 247, 255, 288, 290, 291, 0]
      OpenLoop
      InitialConditions: InitialDate=1996-01-01; InitialSWError=[0.1, 0.09, 0.08, 0.07, 0.06, 0.06, 0.06]
        InitialSW=[0.323404, 0.342299, 0.351572, 0.331312, 0.304812, 0.304583, 0.285208]
      StateVariables: same as Truth.Control.StateVariables
      Observations: same as Truth.Control.Observations
  Simulation Ensemble37
    Clock: StartDate=1996-01-01; EndDate=1996-12-30
    Summary SummaryFile
    Weather: FileName=../Met/Weather_Ensemble37.met
    Zone Field: Area=1; Slope=0
      Report: same as Truth.Field.Report
      Fertiliser
      Soil: ASCOrder=Vertosol; ASCSubOrder=Black; SoilType=Clay; Site=Norwin; NearestTown=Norwin; Region=Darling Downs and Granite Belt; State=Queensland; Country=Australia; NaturalVegetation=Qld. Bluegrass, possible Qld. Blue gum; ApsoilNumber=900; Latitude=-27.581836; Longitude=151.320206; LocationAccuracy=+/- 20m
        DataSource=CSIRO Sustainable Ecosystems, Toowoomba; Characteriesd as part of the GRDC funded project"Doing it better, doing it smarter, managing soil water in Australian agriculture' 2011
        Comments=OC, CLL for all crops estimated-based on Bongeen Mywybilla Soil No1
        Water
          Thickness  BD   AirDry     LL15       DUL       SAT       KS
          150        1.3  0.0499015  0.0699015  0.377134  0.477134  20
          150        1.3  0.0816388  0.101639   0.324426  0.424426  20
          300        1.4  0.117051   0.137051   0.311733  0.411733  20
          300        1.4  0.129636   0.149636   0.324188  0.424188  20
          300        1.5  0.123818   0.143818   0.3738    0.4738    20
          300        1.5  0.0903369  0.110337   0.335775  0.435775  20
          300        1.5  0.111177   0.131177   0.383671  0.483671  20
          SoilCrop WheatSoil
            LL=[0.0699015, 0.101639, 0.137051, 0.149636, 0.143818, 0.110337, 0.131177]
            KL=[0.06, 0.06, 0.06, 0.04, 0.04, 0.02, 0.01]
            XF=[1, 1, 1, 1, 1, 1, 1]
        SoilWater: same as Truth.Field.Soil.SoilWater
        SoilNitrogen: fom_type=[default, manure, mucuna, lablab, shemp, stable]; fract_carb=[0.2, 0.3, 0.54, 0.57, 0.45, 0]; fract_cell=[0.7, 0.3, 0.37, 0.37, 0.47, 0.1]; fract_lign=[0.1, 0.4, 0.09, 0.06, 0.08, 0.9]; wfpsN2N2O_x=[22, 88]; wfpsN2N2O_y=[0.1, 1]
        SoilOrganicMatter: same as Truth.Field.Soil.SoilOrganicMatter
        Analysis: Thickness=[150, 150, 300, 300, 300, 300, 300]; PH=[8, 8, 8, 8, 8, 8, 8]; PHUnits=Water; BoronUnits=HotWater
        InitialWater: PercentMethod=EvenlyDistributed; FractionFull=0.5; RelativeTo=LL15
        Sample InitialN: same as Truth.Field.Soil.InitialN
        CERESSoilTemperature
      SurfaceOrganicMatter: same as Truth.Field.SurfaceOrganicMatter
      Plant15 Wheat: AutoHarvest=true; CropType=Wheat
      MicroClimate: a_interception=0; b_interception=1; c_interception=0; d_interception=0; soil_albedo=0.3; sun_angle=15; soil_heat_flux_fraction=0.4; night_interception_fraction=0.5; refheight=2; albedo=0.15; emissivity=0.96; RadIntTotal=0
      Manager SowingFertiliser: same as Truth.Field.SowingFertiliser
      Manager SowingRule
        StartDate = 10-may
        EndDate = 10-may
        MinESW = 0
        MinRain = 0
        RainDays = 7
        CultivarName = Custom37
        SowingDepth = 30
        RowSpacing = 250
        Population = 120
        script: same as in Truth.Field.SowingRule
      SoluteManager
    Control: DAOption=OpenLoop; EnsembleSize=50; AddModelError=false; FixPhenology=false; DoYPheno=[131, 132, 136, 137, 202, 247, 255, 288, 290, 291, 0]
      OpenLoop
      InitialConditions: InitialDate=1996-01-01; InitialSWError=[0.1, 0.09, 0.08, 0.07, 0.06, 0.06, 0.06]
        InitialSW=[0.320845, 0.272685, 0.288218, 0.261619, 0.24606, 0.26229, 0.288535]
      StateVariables: same as Truth.Control.StateVariables
      Observations: same as Truth.Control.Observations
  Simulation Ensemble38
    Clock: StartDate=1996-01-01; EndDate=1996-12-30
    Summary SummaryFile
    Weather: FileName=../Met/Weather_Ensemble38.met
    Zone Field: Area=1; Slope=0
      Report: same as Truth.Field.Report
      Fertiliser
      Soil: ASCOrder=Vertosol; ASCSubOrder=Black; SoilType=Clay; Site=Norwin; NearestTown=Norwin; Region=Darling Downs and Granite Belt; State=Queensland; Country=Australia; NaturalVegetation=Qld. Bluegrass, possible Qld. Blue gum; ApsoilNumber=900; Latitude=-27.581836; Longitude=151.320206; LocationAccuracy=+/- 20m
        DataSource=CSIRO Sustainable Ecosystems, Toowoomba; Characteriesd as part of the GRDC funded project"Doing it better, doing it smarter, managing soil water in Australian agriculture' 2011
        Comments=OC, CLL for all crops estimated-based on Bongeen Mywybilla Soil No1
        Water
          Thickness  BD   AirDry     LL15       DUL       SAT       KS
          150        1.3  0.0430822  0.0630822  0.396718  0.496718  20
          150        1.3  0.0718784  0.0918784  0.403771  0.503771  20
          300        1.4  0.070822   0.090822   0.360185  0.460185  20
          300        1.4  0.10353    0.12353    0.311135  0.411135  20
          300        1.5  0.133448   0.153448   0.306142  0.406142  20
          300        1.5  0.132022   0.152022   0.314965  0.414965  20
          300        1.5  0.123354   0.143354   0.351515  0.451515  20
          SoilCrop WheatSoil
            LL=[0.0630822, 0.0918784, 0.090822, 0.12353, 0.153448, 0.152022, 0.143354]
            KL=[0.06, 0.06, 0.06, 0.04, 0.04, 0.02, 0.01]
            XF=[1, 1, 1, 1, 1, 1, 1]
        SoilWater: same as Truth.Field.Soil.SoilWater
        SoilNitrogen: fom_type=[default, manure, mucuna, lablab, shemp, stable]; fract_carb=[0.2, 0.3, 0.54, 0.57, 0.45, 0]; fract_cell=[0.7, 0.3, 0.37, 0.37, 0.47, 0.1]; fract_lign=[0.1, 0.4, 0.09, 0.06, 0.08, 0.9]; wfpsN2N2O_x=[22, 88]; wfpsN2N2O_y=[0.1, 1]
        SoilOrganicMatter: same as Truth.Field.Soil.SoilOrganicMatter
        Analysis: Thickness=[150, 150, 300, 300, 300, 300, 300]; PH=[8, 8, 8, 8, 8, 8, 8]; PHUnits=Water; BoronUnits=HotWater
        InitialWater: PercentMethod=EvenlyDistributed; FractionFull=0.5; RelativeTo=LL15
        Sample InitialN: same as Truth.Field.Soil.InitialN
        CERESSoilTemperature
      SurfaceOrganicMatter: same as Truth.Field.SurfaceOrganicMatter
      Plant15 Wheat: AutoHarvest=true; CropType=Wheat
      MicroClimate: a_interception=0; b_interception=1; c_interception=0; d_interception=0; soil_albedo=0.3; sun_angle=15; soil_heat_flux_fraction=0.4; night_interception_fraction=0.5; refheight=2; albedo=0.15; emissivity=0.96; RadIntTotal=0
      Manager SowingFertiliser: same as Truth.Field.SowingFertiliser
      Manager SowingRule
        StartDate = 10-may
        EndDate = 10-may
        MinESW = 0
        MinRain = 0
        RainDays = 7
        CultivarName = Custom38
        SowingDepth = 30
        RowSpacing = 250
        Population = 120
        script: same as in Truth.Field.SowingRule
      SoluteManager
    Control: DAOption=OpenLoop; EnsembleSize=50; AddModelError=false; FixPhenology=false; DoYPheno=[131, 132, 136, 137, 202, 247, 255, 288, 290, 291, 0]
      OpenLoop
      InitialConditions: InitialDate=1996-01-01; InitialSWError=[0.1, 0.09, 0.08, 0.07, 0.06, 0.06, 0.06]
        InitialSW=[0.250448, 0.300133, 0.346962, 0.377141, 0.343455, 0.347102, 0.334843]
      StateVariables: same as Truth.Control.StateVariables
      Observations: same as Truth.Control.Observations
  Simulation Ensemble39
    Clock: StartDate=1996-01-01; EndDate=1996-12-30
    Summary SummaryFile
    Weather: FileName=../Met/Weather_Ensemble39.met
    Zone Field: Area=1; Slope=0
      Report: same as Truth.Field.Report
      Fertiliser
      Soil: ASCOrder=Vertosol; ASCSubOrder=Black; SoilType=Clay; Site=Norwin; NearestTown=Norwin; Region=Darling Downs and Granite Belt; State=Queensland; Country=Australia; NaturalVegetation=Qld. Bluegrass, possible Qld. Blue gum; ApsoilNumber=900; Latitude=-27.581836; Longitude=151.320206; LocationAccuracy=+/- 20m
        DataSource=CSIRO Sustainable Ecosystems, Toowoomba; Characteriesd as part of the GRDC funded project"Doing it better, doing it smarter, managing soil water in Australian agriculture' 2011
        Comments=OC, CLL for all crops estimated-based on Bongeen Mywybilla Soil No1
        Water
          Thickness  BD   AirDry     LL15       DUL       SAT       KS
          150        1.3  0.0601745  0.0801745  0.412876  0.512876  20
          150        1.3  0.0609051  0.0809051  0.403773  0.503773  20
          300        1.4  0.0686182  0.0886182  0.376227  0.476227  20
          300        1.4  0.0926141  0.112614   0.331243  0.431243  20
          300        1.5  0.123555   0.143555   0.356253  0.456253  20
          300        1.5  0.104817   0.124817   0.308372  0.408372  20
          300        1.5  0.129296   0.149296   0.33296   0.43296   20
          SoilCrop WheatSoil
            LL=[0.0801745, 0.0809051, 0.0886182, 0.112614, 0.143555, 0.124817, 0.149296]
            KL=[0.06, 0.06, 0.06, 0.04, 0.04, 0.02, 0.01]
            XF=[1, 1, 1, 1, 1, 1, 1]
        SoilWater: same as Truth.Field.Soil.SoilWater
        SoilNitrogen: fom_type=[default, manure, mucuna, lablab, shemp, stable]; fract_carb=[0.2, 0.3, 0.54, 0.57, 0.45, 0]; fract_cell=[0.7, 0.3, 0.37, 0.37, 0.47, 0.1]; fract_lign=[0.1, 0.4, 0.09, 0.06, 0.08, 0.9]; wfpsN2N2O_x=[22, 88]; wfpsN2N2O_y=[0.1, 1]
        SoilOrganicMatter: same as Truth.Field.Soil.SoilOrganicMatter
        Analysis: Thickness=[150, 150, 300, 300, 300, 300, 300]; PH=[8, 8, 8, 8, 8, 8, 8]; PHUnits=Water; BoronUnits=HotWater
        InitialWater: PercentMethod=EvenlyDistributed; FractionFull=0.5; RelativeTo=LL15
        Sample InitialN: same as Truth.Field.Soil.InitialN
        CERESSoilTemperature
      SurfaceOrganicMatter: same as Truth.Field.SurfaceOrganicMatter
      Plant15 Wheat: AutoHarvest=true; CropType=Wheat
      MicroClimate: a_interception=0; b_interception=1; c_interception=0; d_interception=0; soil_albedo=0.3; sun_angle=15; soil_heat_flux_fraction=0.4; night_interception_fraction=0.5; refheight=2; albedo=0.15; emissivity=0.96; RadIntTotal=0
      Manager SowingFertiliser: same as Truth.Field.SowingFertiliser
      Manager SowingRule
        StartDate = 10-may
        EndDate = 10-may
        MinESW = 0
        MinRain = 0
        RainDays = 7
        CultivarName = Custom39
        SowingDepth = 30
        RowSpacing = 250
        Population = 120
        script: same as in Truth.Field.SowingRule
      SoluteManager
    Control: DAOption=OpenLoop; EnsembleSize=50; AddModelError=false; FixPhenology=false; DoYPheno=[131, 132, 136, 137, 202, 247, 255, 288, 290, 291, 0]
      OpenLoop
      InitialConditions: InitialDate=1996-01-01; InitialSWError=[0.1, 0.09, 0.08, 0.07, 0.06, 0.06, 0.06]
        InitialSW=[0.371599, 0.330972, 0.307973, 0.261353, 0.254807, 0.285883, 0.307255]
      StateVariables: same as Truth.Control.StateVariables
      Observations: same as Truth.Control.Observations
  Simulation Ensemble40
    Clock: StartDate=1996-01-01; EndDate=1996-12-30
    Summary SummaryFile
    Weather: FileName=../Met/Weather_Ensemble40.met
    Zone Field: Area=1; Slope=0
      Report: same as Truth.Field.Report
      Fertiliser
      Soil: ASCOrder=Vertosol; ASCSubOrder=Black; SoilType=Clay; Site=Norwin; NearestTown=Norwin; Region=Darling Downs and Granite Belt; State=Queensland; Country=Australia; NaturalVegetation=Qld. Bluegrass, possible Qld. Blue gum; ApsoilNumber=900; Latitude=-27.581836; Longitude=151.320206; LocationAccuracy=+/- 20m
        DataSource=CSIRO Sustainable Ecosystems, Toowoomba; Characteriesd as part of the GRDC funded project"Doing it better, doing it smarter, managing soil water in Australian agriculture' 2011
        Comments=OC, CLL for all crops estimated-based on Bongeen Mywybilla Soil No1
        Water
          Thickness  BD   AirDry     LL15      DUL       SAT       KS
          150        1.3  0.10206    0.12206   0.357621  0.457621  20
          150        1.3  0.0914749  0.111475  0.368862  0.468862  20
          300        1.4  0.0877294  0.107729  0.387401  0.487401  20
          300        1.4  0.0842121  0.104212  0.374441  0.474441  20
          300        1.5  0.126895   0.146895  0.353255  0.453255  20
          300        1.5  0.106129   0.126129  0.332038  0.432038  20
          300        1.5  0.117068   0.137068  0.318914  0.418914  20
          SoilCrop WheatSoil
            LL=[0.12206, 0.111475, 0.107729, 0.104212, 0.146895, 0.126129, 0.137068]
            KL=[0.06, 0.06, 0.06, 0.04, 0.04, 0.02, 0.01]
            XF=[1, 1, 1, 1, 1, 1, 1]
        SoilWater: same as Truth.Field.Soil.SoilWater
        SoilNitrogen: fom_type=[default, manure, mucuna, lablab, shemp, stable]; fract_carb=[0.2, 0.3, 0.54, 0.57, 0.45, 0]; fract_cell=[0.7, 0.3, 0.37, 0.37, 0.47, 0.1]; fract_lign=[0.1, 0.4, 0.09, 0.06, 0.08, 0.9]; wfpsN2N2O_x=[22, 88]; wfpsN2N2O_y=[0.1, 1]
        SoilOrganicMatter: same as Truth.Field.Soil.SoilOrganicMatter
        Analysis: Thickness=[150, 150, 300, 300, 300, 300, 300]; PH=[8, 8, 8, 8, 8, 8, 8]; PHUnits=Water; BoronUnits=HotWater
        InitialWater: PercentMethod=EvenlyDistributed; FractionFull=0.5; RelativeTo=LL15
        Sample InitialN: same as Truth.Field.Soil.InitialN
        CERESSoilTemperature
      SurfaceOrganicMatter: same as Truth.Field.SurfaceOrganicMatter
      Plant15 Wheat: AutoHarvest=true; CropType=Wheat
      MicroClimate: a_interception=0; b_interception=1; c_interception=0; d_interception=0; soil_albedo=0.3; sun_angle=15; soil_heat_flux_fraction=0.4; night_interception_fraction=0.5; refheight=2; albedo=0.15; emissivity=0.96; RadIntTotal=0
      Manager SowingFertiliser: same as Truth.Field.SowingFertiliser
      Manager SowingRule
        StartDate = 10-may
        EndDate = 10-may
        MinESW = 0
        MinRain = 0
        RainDays = 7
        CultivarName = Custom40
        SowingDepth = 30
        RowSpacing = 250
        Population = 120
        script: same as in Truth.Field.SowingRule
      SoluteManager
    Control: DAOption=OpenLoop; EnsembleSize=50; AddModelError=false; FixPhenology=false; DoYPheno=[131, 132, 136, 137, 202, 247, 255, 288, 290, 291, 0]
      OpenLoop
      InitialConditions: InitialDate=1996-01-01; InitialSWError=[0.1, 0.09, 0.08, 0.07, 0.06, 0.06, 0.06]
        InitialSW=[0.377591, 0.383423, 0.353685, 0.358422, 0.35623, 0.393747, 0.39216]
      StateVariables: same as Truth.Control.StateVariables
      Observations: same as Truth.Control.Observations
  Simulation Ensemble41
    Clock: StartDate=1996-01-01; EndDate=1996-12-30
    Summary SummaryFile
    Weather: FileName=../Met/Weather_Ensemble41.met
    Zone Field: Area=1; Slope=0
      Report: same as Truth.Field.Report
      Fertiliser
      Soil: ASCOrder=Vertosol; ASCSubOrder=Black; SoilType=Clay; Site=Norwin; NearestTown=Norwin; Region=Darling Downs and Granite Belt; State=Queensland; Country=Australia; NaturalVegetation=Qld. Bluegrass, possible Qld. Blue gum; ApsoilNumber=900; Latitude=-27.581836; Longitude=151.320206; LocationAccuracy=+/- 20m
        DataSource=CSIRO Sustainable Ecosystems, Toowoomba; Characteriesd as part of the GRDC funded project"Doing it better, doing it smarter, managing soil water in Australian agriculture' 2011
        Comments=OC, CLL for all crops estimated-based on Bongeen Mywybilla Soil No1
        Water
          Thickness  BD   AirDry     LL15       DUL       SAT       KS
          150        1.3  0.0621656  0.0821656  0.355808  0.455808  20
          150        1.3  0.0948508  0.114851   0.306382  0.406382  20
          300        1.4  0.120843   0.140843   0.373584  0.473584  20
          300        1.4  0.0675005  0.0875005  0.339494  0.439494  20
          300        1.5  0.113659   0.133659   0.361246  0.461246  20
          300        1.5  0.0981423  0.118142   0.377555  0.477555  20
          300        1.5  0.12304    0.14304    0.346081  0.446081  20
          SoilCrop WheatSoil
            LL=[0.0821656, 0.114851, 0.140843, 0.0875005, 0.133659, 0.118142, 0.14304]
            KL=[0.06, 0.06, 0.06, 0.04, 0.04, 0.02, 0.01]
            XF=[1, 1, 1, 1, 1, 1, 1]
        SoilWater: same as Truth.Field.Soil.SoilWater
        SoilNitrogen: fom_type=[default, manure, mucuna, lablab, shemp, stable]; fract_carb=[0.2, 0.3, 0.54, 0.57, 0.45, 0]; fract_cell=[0.7, 0.3, 0.37, 0.37, 0.47, 0.1]; fract_lign=[0.1, 0.4, 0.09, 0.06, 0.08, 0.9]; wfpsN2N2O_x=[22, 88]; wfpsN2N2O_y=[0.1, 1]
        SoilOrganicMatter: same as Truth.Field.Soil.SoilOrganicMatter
        Analysis: Thickness=[150, 150, 300, 300, 300, 300, 300]; PH=[8, 8, 8, 8, 8, 8, 8]; PHUnits=Water; BoronUnits=HotWater
        InitialWater: PercentMethod=EvenlyDistributed; FractionFull=0.5; RelativeTo=LL15
        Sample InitialN: same as Truth.Field.Soil.InitialN
        CERESSoilTemperature
      SurfaceOrganicMatter: same as Truth.Field.SurfaceOrganicMatter
      Plant15 Wheat: AutoHarvest=true; CropType=Wheat
      MicroClimate: a_interception=0; b_interception=1; c_interception=0; d_interception=0; soil_albedo=0.3; sun_angle=15; soil_heat_flux_fraction=0.4; night_interception_fraction=0.5; refheight=2; albedo=0.15; emissivity=0.96; RadIntTotal=0
      Manager SowingFertiliser: same as Truth.Field.SowingFertiliser
      Manager SowingRule
        StartDate = 10-may
        EndDate = 10-may
        MinESW = 0
        MinRain = 0
        RainDays = 7
        CultivarName = Custom41
        SowingDepth = 30
        RowSpacing = 250
        Population = 120
        script: same as in Truth.Field.SowingRule
      SoluteManager
    Control: DAOption=OpenLoop; EnsembleSize=50; AddModelError=false; FixPhenology=false; DoYPheno=[131, 132, 136, 137, 202, 247, 255, 288, 290, 291, 0]
      OpenLoop
      InitialConditions: InitialDate=1996-01-01; InitialSWError=[0.1, 0.09, 0.08, 0.07, 0.06, 0.06, 0.06]
        InitialSW=[0.0680272, 0.0948508, 0.136956, 0.166868, 0.184149, 0.200227, 0.227205]
      StateVariables: same as Truth.Control.StateVariables
      Observations: same as Truth.Control.Observations
  Simulation Ensemble42
    Clock: StartDate=1996-01-01; EndDate=1996-12-30
    Summary SummaryFile
    Weather: FileName=../Met/Weather_Ensemble42.met
    Zone Field: Area=1; Slope=0
      Report: same as Truth.Field.Report
      Fertiliser
      Soil: ASCOrder=Vertosol; ASCSubOrder=Black; SoilType=Clay; Site=Norwin; NearestTown=Norwin; Region=Darling Downs and Granite Belt; State=Queensland; Country=Australia; NaturalVegetation=Qld. Bluegrass, possible Qld. Blue gum; ApsoilNumber=900; Latitude=-27.581836; Longitude=151.320206; LocationAccuracy=+/- 20m
        DataSource=CSIRO Sustainable Ecosystems, Toowoomba; Characteriesd as part of the GRDC funded project"Doing it better, doing it smarter, managing soil water in Australian agriculture' 2011
        Comments=OC, CLL for all crops estimated-based on Bongeen Mywybilla Soil No1
        Water
          Thickness  BD   AirDry     LL15       DUL       SAT       KS
          150        1.3  0.0258013  0.0458013  0.380815  0.480815  20
          150        1.3  0.0816458  0.101646   0.354802  0.454802  20
          300        1.4  0.0878615  0.107861   0.336923  0.436923  20
          300        1.4  0.0922765  0.112277   0.294148  0.394148  20
          300        1.5  0.140593   0.160593   0.345727  0.445727  20
          300        1.5  0.078173   0.098173   0.427868  0.527868  20
          300        1.5  0.115553   0.135553   0.354797  0.454797  20
          SoilCrop WheatSoil
            LL=[0.0458013, 0.101646, 0.107861, 0.112277, 0.160593, 0.098173, 0.135553]
            KL=[0.06, 0.06, 0.06, 0.04, 0.04, 0.02, 0.01]
            XF=[1, 1, 1, 1, 1, 1, 1]
        SoilWater: same as Truth.Field.Soil.SoilWater
        SoilNitrogen: fom_type=[default, manure, mucuna, lablab, shemp, stable]; fract_carb=[0.2, 0.3, 0.54, 0.57, 0.45, 0]; fract_cell=[0.7, 0.3, 0.37, 0.37, 0.47, 0.1]; fract_lign=[0.1, 0.4, 0.09, 0.06, 0.08, 0.9]; wfpsN2N2O_x=[22, 88]; wfpsN2N2O_y=[0.1, 1]
        SoilOrganicMatter: same as Truth.Field.Soil.SoilOrganicMatter
        Analysis: Thickness=[150, 150, 300, 300, 300, 300, 300]; PH=[8, 8, 8, 8, 8, 8, 8]; PHUnits=Water; BoronUnits=HotWater
        InitialWater: PercentMethod=EvenlyDistributed; FractionFull=0.5; RelativeTo=LL15
        Sample InitialN: same as Truth.Field.Soil.InitialN
        CERESSoilTemperature
      SurfaceOrganicMatter: same as Truth.Field.SurfaceOrganicMatter
      Plant15 Wheat: AutoHarvest=true; CropType=Wheat
      MicroClimate: a_interception=0; b_interception=1; c_interception=0; d_interception=0; soil_albedo=0.3; sun_angle=15; soil_heat_flux_fraction=0.4; night_interception_fraction=0.5; refheight=2; albedo=0.15; emissivity=0.96; RadIntTotal=0
      Manager SowingFertiliser: same as Truth.Field.SowingFertiliser
      Manager SowingRule
        StartDate = 10-may
        EndDate = 10-may
        MinESW = 0
        MinRain = 0
        RainDays = 7
        CultivarName = Custom42
        SowingDepth = 30
        RowSpacing = 250
        Population = 120
        script: same as in Truth.Field.SowingRule
      SoluteManager
    Control: DAOption=OpenLoop; EnsembleSize=50; AddModelError=false; FixPhenology=false; DoYPheno=[131, 132, 136, 137, 202, 247, 255, 288, 290, 291, 0]
      OpenLoop
      InitialConditions: InitialDate=1996-01-01; InitialSWError=[0.1, 0.09, 0.08, 0.07, 0.06, 0.06, 0.06]
        InitialSW=[0.339743, 0.348808, 0.346136, 0.368718, 0.358524, 0.33213, 0.305521]
      StateVariables: same as Truth.Control.StateVariables
      Observations: same as Truth.Control.Observations
  Simulation Ensemble43
    Clock: StartDate=1996-01-01; EndDate=1996-12-30
    Summary SummaryFile
    Weather: FileName=../Met/Weather_Ensemble43.met
    Zone Field: Area=1; Slope=0
      Report: same as Truth.Field.Report
      Fertiliser
      Soil: ASCOrder=Vertosol; ASCSubOrder=Black; SoilType=Clay; Site=Norwin; NearestTown=Norwin; Region=Darling Downs and Granite Belt; State=Queensland; Country=Australia; NaturalVegetation=Qld. Bluegrass, possible Qld. Blue gum; ApsoilNumber=900; Latitude=-27.581836; Longitude=151.320206; LocationAccuracy=+/- 20m
        DataSource=CSIRO Sustainable Ecosystems, Toowoomba; Characteriesd as part of the GRDC funded project"Doing it better, doing it smarter, managing soil water in Australian agriculture' 2011
        Comments=OC, CLL for all crops estimated-based on Bongeen Mywybilla Soil No1
        Water
          Thickness  BD   AirDry     LL15       DUL       SAT       KS
          150        1.3  0.0625734  0.0825734  0.41935   0.51935   20
          150        1.3  0.0887493  0.108749   0.360764  0.460764  20
          300        1.4  0.112177   0.132177   0.367599  0.467599  20
          300        1.4  0.0973931  0.117393   0.342488  0.442488  20
          300        1.5  0.112379   0.132379   0.313092  0.413092  20
          300        1.5  0.05661    0.07661    0.288601  0.388601  20
          300        1.5  0.13943    0.15943    0.339433  0.439433  20
          SoilCrop WheatSoil
            LL=[0.0825734, 0.108749, 0.132177, 0.117393, 0.132379, 0.07661, 0.15943]
            KL=[0.06, 0.06, 0.06, 0.04, 0.04, 0.02, 0.01]
            XF=[1, 1, 1, 1, 1, 1, 1]
        SoilWater: same as Truth.Field.Soil.SoilWater
        SoilNitrogen: fom_type=[default, manure, mucuna, lablab, shemp, stable]; fract_carb=[0.2, 0.3, 0.54, 0.57, 0.45, 0]; fract_cell=[0.7, 0.3, 0.37, 0.37, 0.47, 0.1]; fract_lign=[0.1, 0.4, 0.09, 0.06, 0.08, 0.9]; wfpsN2N2O_x=[22, 88]; wfpsN2N2O_y=[0.1, 1]
        SoilOrganicMatter: same as Truth.Field.Soil.SoilOrganicMatter
        Analysis: Thickness=[150, 150, 300, 300, 300, 300, 300]; PH=[8, 8, 8, 8, 8, 8, 8]; PHUnits=Water; BoronUnits=HotWater
        InitialWater: PercentMethod=EvenlyDistributed; FractionFull=0.5; RelativeTo=LL15
        Sample InitialN: same as Truth.Field.Soil.InitialN
        CERESSoilTemperature
      SurfaceOrganicMatter: same as Truth.Field.SurfaceOrganicMatter
      Plant15 Wheat: AutoHarvest=true; CropType=Wheat
      MicroClimate: a_interception=0; b_interception=1; c_interception=0; d_interception=0; soil_albedo=0.3; sun_angle=15; soil_heat_flux_fraction=0.4; night_interception_fraction=0.5; refheight=2; albedo=0.15; emissivity=0.96; RadIntTotal=0
      Manager SowingFertiliser: same as Truth.Field.SowingFertiliser
      Manager SowingRule
        StartDate = 10-may
        EndDate = 10-may
        MinESW = 0
        MinRain = 0
        RainDays = 7
        CultivarName = Custom43
        SowingDepth = 30
        RowSpacing = 250
        Population = 120
        script: same as in Truth.Field.SowingRule
      SoluteManager
    Control: DAOption=OpenLoop; EnsembleSize=50; AddModelError=false; FixPhenology=false; DoYPheno=[131, 132, 136, 137, 202, 247, 255, 288, 290, 291, 0]
      OpenLoop
      InitialConditions: InitialDate=1996-01-01; InitialSWError=[0.1, 0.09, 0.08, 0.07, 0.06, 0.06, 0.06]
        InitialSW=[0.267659, 0.264332, 0.30873, 0.344794, 0.321861, 0.287169, 0.284203]
      StateVariables: same as Truth.Control.StateVariables
      Observations: same as Truth.Control.Observations
  Simulation Ensemble44
    Clock: StartDate=1996-01-01; EndDate=1996-12-30
    Summary SummaryFile
    Weather: FileName=../Met/Weather_Ensemble44.met
    Zone Field: Area=1; Slope=0
      Report: same as Truth.Field.Report
      Fertiliser
      Soil: ASCOrder=Vertosol; ASCSubOrder=Black; SoilType=Clay; Site=Norwin; NearestTown=Norwin; Region=Darling Downs and Granite Belt; State=Queensland; Country=Australia; NaturalVegetation=Qld. Bluegrass, possible Qld. Blue gum; ApsoilNumber=900; Latitude=-27.581836; Longitude=151.320206; LocationAccuracy=+/- 20m
        DataSource=CSIRO Sustainable Ecosystems, Toowoomba; Characteriesd as part of the GRDC funded project"Doing it better, doing it smarter, managing soil water in Australian agriculture' 2011
        Comments=OC, CLL for all crops estimated-based on Bongeen Mywybilla Soil No1
        Water
          Thickness  BD   AirDry     LL15       DUL       SAT       KS
          150        1.3  0.0394247  0.0594247  0.441423  0.541423  20
          150        1.3  0.0814523  0.101452   0.378371  0.478371  20
          300        1.4  0.0887224  0.108722   0.399152  0.499152  20
          300        1.4  0.103869   0.123869   0.346412  0.446412  20
          300        1.5  0.132825   0.152825   0.352325  0.452325  20
          300        1.5  0.104435   0.124435   0.283111  0.383111  20
          300        1.5  0.115611   0.135611   0.311505  0.411505  20
          SoilCrop WheatSoil
            LL=[0.0594247, 0.101452, 0.108722, 0.123869, 0.152825, 0.124435, 0.135611]
            KL=[0.06, 0.06, 0.06, 0.04, 0.04, 0.02, 0.01]
            XF=[1, 1, 1, 1, 1, 1, 1]
        SoilWater: same as Truth.Field.Soil.SoilWater
        SoilNitrogen: fom_type=[default, manure, mucuna, lablab, shemp, stable]; fract_carb=[0.2, 0.3, 0.54, 0.57, 0.45, 0]; fract_cell=[0.7, 0.3, 0.37, 0.37, 0.47, 0.1]; fract_lign=[0.1, 0.4, 0.09, 0.06, 0.08, 0.9]; wfpsN2N2O_x=[22, 88]; wfpsN2N2O_y=[0.1, 1]
        SoilOrganicMatter: same as Truth.Field.Soil.SoilOrganicMatter
        Analysis: Thickness=[150, 150, 300, 300, 300, 300, 300]; PH=[8, 8, 8, 8, 8, 8, 8]; PHUnits=Water; BoronUnits=HotWater
        InitialWater: PercentMethod=EvenlyDistributed; FractionFull=0.5; RelativeTo=LL15
        Sample InitialN: same as Truth.Field.Soil.InitialN
        CERESSoilTemperature
      SurfaceOrganicMatter: same as Truth.Field.SurfaceOrganicMatter
      Plant15 Wheat: AutoHarvest=true; CropType=Wheat
      MicroClimate: a_interception=0; b_interception=1; c_interception=0; d_interception=0; soil_albedo=0.3; sun_angle=15; soil_heat_flux_fraction=0.4; night_interception_fraction=0.5; refheight=2; albedo=0.15; emissivity=0.96; RadIntTotal=0
      Manager SowingFertiliser: same as Truth.Field.SowingFertiliser
      Manager SowingRule
        StartDate = 10-may
        EndDate = 10-may
        MinESW = 0
        MinRain = 0
        RainDays = 7
        CultivarName = Custom44
        SowingDepth = 30
        RowSpacing = 250
        Population = 120
        script: same as in Truth.Field.SowingRule
      SoluteManager
    Control: DAOption=OpenLoop; EnsembleSize=50; AddModelError=false; FixPhenology=false; DoYPheno=[131, 132, 136, 137, 202, 247, 255, 288, 290, 291, 0]
      OpenLoop
      InitialConditions: InitialDate=1996-01-01; InitialSWError=[0.1, 0.09, 0.08, 0.07, 0.06, 0.06, 0.06]
        InitialSW=[0.541423, 0.478371, 0.440083, 0.404794, 0.376205, 0.383111, 0.396909]
      StateVariables: same as Truth.Control.StateVariables
      Observations: same as Truth.Control.Observations
  Simulation Ensemble45
    Clock: StartDate=1996-01-01; EndDate=1996-12-30
    Summary SummaryFile
    Weather: FileName=../Met/Weather_Ensemble45.met
    Zone Field: Area=1; Slope=0
      Report: same as Truth.Field.Report
      Fertiliser
      Soil: ASCOrder=Vertosol; ASCSubOrder=Black; SoilType=Clay; Site=Norwin; NearestTown=Norwin; Region=Darling Downs and Granite Belt; State=Queensland; Country=Australia; NaturalVegetation=Qld. Bluegrass, possible Qld. Blue gum; ApsoilNumber=900; Latitude=-27.581836; Longitude=151.320206; LocationAccuracy=+/- 20m
        DataSource=CSIRO Sustainable Ecosystems, Toowoomba; Characteriesd as part of the GRDC funded project"Doing it better, doing it smarter, managing soil water in Australian agriculture' 2011
        Comments=OC, CLL for all crops estimated-based on Bongeen Mywybilla Soil No1
        Water
          Thickness  BD   AirDry     LL15       DUL       SAT       KS
          150        1.3  0.0343942  0.0543942  0.333627  0.433627  20
          150        1.3  0.107244   0.127244   0.36498   0.46498   20
          300        1.4  0.0616271  0.0816271  0.408232  0.508232  20
          300        1.4  0.0985176  0.118518   0.350561  0.450561  20
          300        1.5  0.0856529  0.105653   0.377115  0.477115  20
          300        1.5  0.1372     0.1572     0.340296  0.440296  20
          300        1.5  0.13214    0.15214    0.297443  0.397443  20
          SoilCrop WheatSoil
            LL=[0.0543942, 0.127244, 0.0816271, 0.118518, 0.105653, 0.1572, 0.15214]
            KL=[0.06, 0.06, 0.06, 0.04, 0.04, 0.02, 0.01]
            XF=[1, 1, 1, 1, 1, 1, 1]
        SoilWater: same as Truth.Field.Soil.SoilWater
        SoilNitrogen: fom_type=[default, manure, mucuna, lablab, shemp, stable]; fract_carb=[0.2, 0.3, 0.54, 0.57, 0.45, 0]; fract_cell=[0.7, 0.3, 0.37, 0.37, 0.47, 0.1]; fract_lign=[0.1, 0.4, 0.09, 0.06, 0.08, 0.9]; wfpsN2N2O_x=[22, 88]; wfpsN2N2O_y=[0.1, 1]
        SoilOrganicMatter: same as Truth.Field.Soil.SoilOrganicMatter
        Analysis: Thickness=[150, 150, 300, 300, 300, 300, 300]; PH=[8, 8, 8, 8, 8, 8, 8]; PHUnits=Water; BoronUnits=HotWater
        InitialWater: PercentMethod=EvenlyDistributed; FractionFull=0.5; RelativeTo=LL15
        Sample InitialN: same as Truth.Field.Soil.InitialN
        CERESSoilTemperature
      SurfaceOrganicMatter: same as Truth.Field.SurfaceOrganicMatter
      Plant15 Wheat: AutoHarvest=true; CropType=Wheat
      MicroClimate: a_interception=0; b_interception=1; c_interception=0; d_interception=0; soil_albedo=0.3; sun_angle=15; soil_heat_flux_fraction=0.4; night_interception_fraction=0.5; refheight=2; albedo=0.15; emissivity=0.96; RadIntTotal=0
      Manager SowingFertiliser: same as Truth.Field.SowingFertiliser
      Manager SowingRule
        StartDate = 10-may
        EndDate = 10-may
        MinESW = 0
        MinRain = 0
        RainDays = 7
        CultivarName = Custom45
        SowingDepth = 30
        RowSpacing = 250
        Population = 120
        script: same as in Truth.Field.SowingRule
      SoluteManager
    Control: DAOption=OpenLoop; EnsembleSize=50; AddModelError=false; FixPhenology=false; DoYPheno=[131, 132, 136, 137, 202, 247, 255, 288, 290, 291, 0]
      OpenLoop
      InitialConditions: InitialDate=1996-01-01; InitialSWError=[0.1, 0.09, 0.08, 0.07, 0.06, 0.06, 0.06]
        InitialSW=[0.376101, 0.400528, 0.452954, 0.445817, 0.370659, 0.326434, 0.342119]
      StateVariables: same as Truth.Control.StateVariables
      Observations: same as Truth.Control.Observations
  Simulation Ensemble46
    Clock: StartDate=1996-01-01; EndDate=1996-12-30
    Summary SummaryFile
    Weather: FileName=../Met/Weather_Ensemble46.met
    Zone Field: Area=1; Slope=0
      Report: same as Truth.Field.Report
      Fertiliser
      Soil: ASCOrder=Vertosol; ASCSubOrder=Black; SoilType=Clay; Site=Norwin; NearestTown=Norwin; Region=Darling Downs and Granite Belt; State=Queensland; Country=Australia; NaturalVegetation=Qld. Bluegrass, possible Qld. Blue gum; ApsoilNumber=900; Latitude=-27.581836; Longitude=151.320206; LocationAccuracy=+/- 20m
        DataSource=CSIRO Sustainable Ecosystems, Toowoomba; Characteriesd as part of the GRDC funded project"Doing it better, doing it smarter, managing soil water in Australian agriculture' 2011
        Comments=OC, CLL for all crops estimated-based on Bongeen Mywybilla Soil No1
        Water
          Thickness  BD   AirDry     LL15       DUL       SAT       KS
          150        1.3  0.0694153  0.0894153  0.342199  0.442199  20
          150        1.3  0.0874355  0.107435   0.341979  0.441979  20
          300        1.4  0.0641477  0.0841477  0.374001  0.474001  20
          300        1.4  0.0839492  0.103949   0.342708  0.442708  20
          300        1.5  0.0847158  0.104716   0.377022  0.477022  20
          300        1.5  0.107089   0.127089   0.359093  0.459093  20
          300        1.5  0.134731   0.154731   0.373498  0.473498  20
          SoilCrop WheatSoil
            LL=[0.0894153, 0.107435, 0.0841477, 0.103949, 0.104716, 0.127089, 0.154731]
            KL=[0.06, 0.06, 0.06, 0.04, 0.04, 0.02, 0.01]
            XF=[1, 1, 1, 1, 1, 1, 1]
        SoilWater: same as Truth.Field.Soil.SoilWater
        SoilNitrogen: fom_type=[default, manure, mucuna, lablab, shemp, stable]; fract_carb=[0.2, 0.3, 0.54, 0.57, 0.45, 0]; fract_cell=[0.7, 0.3, 0.37, 0.37, 0.47, 0.1]; fract_lign=[0.1, 0.4, 0.09, 0.06, 0.08, 0.9]; wfpsN2N2O_x=[22, 88]; wfpsN2N2O_y=[0.1, 1]
        SoilOrganicMatter: same as Truth.Field.Soil.SoilOrganicMatter
        Analysis: Thickness=[150, 150, 300, 300, 300, 300, 300]; PH=[8, 8, 8, 8, 8, 8, 8]; PHUnits=Water; BoronUnits=HotWater
        InitialWater: PercentMethod=EvenlyDistributed; FractionFull=0.5; RelativeTo=LL15
        Sample InitialN: same as Truth.Field.Soil.InitialN
        CERESSoilTemperature
      SurfaceOrganicMatter: same as Truth.Field.SurfaceOrganicMatter
      Plant15 Wheat: AutoHarvest=true; CropType=Wheat
      MicroClimate: a_interception=0; b_interception=1; c_interception=0; d_interception=0; soil_albedo=0.3; sun_angle=15; soil_heat_flux_fraction=0.4; night_interception_fraction=0.5; refheight=2; albedo=0.15; emissivity=0.96; RadIntTotal=0
      Manager SowingFertiliser: same as Truth.Field.SowingFertiliser
      Manager SowingRule
        StartDate = 10-may
        EndDate = 10-may
        MinESW = 0
        MinRain = 0
        RainDays = 7
        CultivarName = Custom46
        SowingDepth = 30
        RowSpacing = 250
        Population = 120
        script: same as in Truth.Field.SowingRule
      SoluteManager
    Control: DAOption=OpenLoop; EnsembleSize=50; AddModelError=false; FixPhenology=false; DoYPheno=[131, 132, 136, 137, 202, 247, 255, 288, 290, 291, 0]
      OpenLoop
      InitialConditions: InitialDate=1996-01-01; InitialSWError=[0.1, 0.09, 0.08, 0.07, 0.06, 0.06, 0.06]
        InitialSW=[0.349895, 0.309446, 0.272869, 0.236203, 0.234119, 0.236844, 0.244506]
      StateVariables: same as Truth.Control.StateVariables
      Observations: same as Truth.Control.Observations
  Simulation Ensemble47
    Clock: StartDate=1996-01-01; EndDate=1996-12-30
    Summary SummaryFile
    Weather: FileName=../Met/Weather_Ensemble47.met
    Zone Field: Area=1; Slope=0
      Report: same as Truth.Field.Report
      Fertiliser
      Soil: ASCOrder=Vertosol; ASCSubOrder=Black; SoilType=Clay; Site=Norwin; NearestTown=Norwin; Region=Darling Downs and Granite Belt; State=Queensland; Country=Australia; NaturalVegetation=Qld. Bluegrass, possible Qld. Blue gum; ApsoilNumber=900; Latitude=-27.581836; Longitude=151.320206; LocationAccuracy=+/- 20m
        DataSource=CSIRO Sustainable Ecosystems, Toowoomba; Characteriesd as part of the GRDC funded project"Doing it better, doing it smarter, managing soil water in Australian agriculture' 2011
        Comments=OC, CLL for all crops estimated-based on Bongeen Mywybilla Soil No1
        Water
          Thickness  BD   AirDry     LL15      DUL       SAT       KS
          150        1.3  0.0852519  0.105252  0.381265  0.481265  20
          150        1.3  0.10029    0.12029   0.335268  0.435268  20
          300        1.4  0.0957489  0.115749  0.335854  0.435854  20
          300        1.4  0.107688   0.127688  0.324308  0.424308  20
          300        1.5  0.0921912  0.112191  0.338748  0.438748  20
          300        1.5  0.0952011  0.115201  0.333297  0.433297  20
          300        1.5  0.0885056  0.108506  0.366787  0.466787  20
          SoilCrop WheatSoil
            LL=[0.105252, 0.12029, 0.115749, 0.127688, 0.112191, 0.115201, 0.108506]
            KL=[0.06, 0.06, 0.06, 0.04, 0.04, 0.02, 0.01]
            XF=[1, 1, 1, 1, 1, 1, 1]
        SoilWater: same as Truth.Field.Soil.SoilWater
        SoilNitrogen: fom_type=[default, manure, mucuna, lablab, shemp, stable]; fract_carb=[0.2, 0.3, 0.54, 0.57, 0.45, 0]; fract_cell=[0.7, 0.3, 0.37, 0.37, 0.47, 0.1]; fract_lign=[0.1, 0.4, 0.09, 0.06, 0.08, 0.9]; wfpsN2N2O_x=[22, 88]; wfpsN2N2O_y=[0.1, 1]
        SoilOrganicMatter: same as Truth.Field.Soil.SoilOrganicMatter
        Analysis: Thickness=[150, 150, 300, 300, 300, 300, 300]; PH=[8, 8, 8, 8, 8, 8, 8]; PHUnits=Water; BoronUnits=HotWater
        InitialWater: PercentMethod=EvenlyDistributed; FractionFull=0.5; RelativeTo=LL15
        Sample InitialN: same as Truth.Field.Soil.InitialN
        CERESSoilTemperature
      SurfaceOrganicMatter: same as Truth.Field.SurfaceOrganicMatter
      Plant15 Wheat: AutoHarvest=true; CropType=Wheat
      MicroClimate: a_interception=0; b_interception=1; c_interception=0; d_interception=0; soil_albedo=0.3; sun_angle=15; soil_heat_flux_fraction=0.4; night_interception_fraction=0.5; refheight=2; albedo=0.15; emissivity=0.96; RadIntTotal=0
      Manager SowingFertiliser: same as Truth.Field.SowingFertiliser
      Manager SowingRule
        StartDate = 10-may
        EndDate = 10-may
        MinESW = 0
        MinRain = 0
        RainDays = 7
        CultivarName = Custom47
        SowingDepth = 30
        RowSpacing = 250
        Population = 120
        script: same as in Truth.Field.SowingRule
      SoluteManager
    Control: DAOption=OpenLoop; EnsembleSize=50; AddModelError=false; FixPhenology=false; DoYPheno=[131, 132, 136, 137, 202, 247, 255, 288, 290, 291, 0]
      OpenLoop
      InitialConditions: InitialDate=1996-01-01; InitialSWError=[0.1, 0.09, 0.08, 0.07, 0.06, 0.06, 0.06]
        InitialSW=[0.481265, 0.409554, 0.386321, 0.392993, 0.374889, 0.345591, 0.317851]
      StateVariables: same as Truth.Control.StateVariables
      Observations: same as Truth.Control.Observations
  Simulation Ensemble48
    Clock: StartDate=1996-01-01; EndDate=1996-12-30
    Summary SummaryFile
    Weather: FileName=../Met/Weather_Ensemble48.met
    Zone Field: Area=1; Slope=0
      Report: same as Truth.Field.Report
      Fertiliser
      Soil: ASCOrder=Vertosol; ASCSubOrder=Black; SoilType=Clay; Site=Norwin; NearestTown=Norwin; Region=Darling Downs and Granite Belt; State=Queensland; Country=Australia; NaturalVegetation=Qld. Bluegrass, possible Qld. Blue gum; ApsoilNumber=900; Latitude=-27.581836; Longitude=151.320206; LocationAccuracy=+/- 20m
        DataSource=CSIRO Sustainable Ecosystems, Toowoomba; Characteriesd as part of the GRDC funded project"Doing it better, doing it smarter, managing soil water in Australian agriculture' 2011
        Comments=OC, CLL for all crops estimated-based on Bongeen Mywybilla Soil No1
        Water
          Thickness  BD   AirDry     LL15       DUL       SAT       KS
          150        1.3  0.0682918  0.0882918  0.397056  0.497056  20
          150        1.3  0.0986288  0.118629   0.361248  0.461248  20
          300        1.4  0.0987583  0.118758   0.388196  0.488196  20
          300        1.4  0.117473   0.137473   0.323211  0.423211  20
          300        1.5  0.122501   0.142501   0.333495  0.433495  20
          300        1.5  0.0922424  0.112242   0.318273  0.418273  20
          300        1.5  0.0991752  0.119175   0.328451  0.428451  20
          SoilCrop WheatSoil
            LL=[0.0882918, 0.118629, 0.118758, 0.137473, 0.142501, 0.112242, 0.119175]
            KL=[0.06, 0.06, 0.06, 0.04, 0.04, 0.02, 0.01]
            XF=[1, 1, 1, 1, 1, 1, 1]
        SoilWater: same as Truth.Field.Soil.SoilWater
        SoilNitrogen: fom_type=[default, manure, mucuna, lablab, shemp, stable]; fract_carb=[0.2, 0.3, 0.54, 0.57, 0.45, 0]; fract_cell=[0.7, 0.3, 0.37, 0.37, 0.47, 0.1]; fract_lign=[0.1, 0.4, 0.09, 0.06, 0.08, 0.9]; wfpsN2N2O_x=[22, 88]; wfpsN2N2O_y=[0.1, 1]
        SoilOrganicMatter: same as Truth.Field.Soil.SoilOrganicMatter
        Analysis: Thickness=[150, 150, 300, 300, 300, 300, 300]; PH=[8, 8, 8, 8, 8, 8, 8]; PHUnits=Water; BoronUnits=HotWater
        InitialWater: PercentMethod=EvenlyDistributed; FractionFull=0.5; RelativeTo=LL15
        Sample InitialN: same as Truth.Field.Soil.InitialN
        CERESSoilTemperature
      SurfaceOrganicMatter: same as Truth.Field.SurfaceOrganicMatter
      Plant15 Wheat: AutoHarvest=true; CropType=Wheat
      MicroClimate: a_interception=0; b_interception=1; c_interception=0; d_interception=0; soil_albedo=0.3; sun_angle=15; soil_heat_flux_fraction=0.4; night_interception_fraction=0.5; refheight=2; albedo=0.15; emissivity=0.96; RadIntTotal=0
      Manager SowingFertiliser: same as Truth.Field.SowingFertiliser
      Manager SowingRule
        StartDate = 10-may
        EndDate = 10-may
        MinESW = 0
        MinRain = 0
        RainDays = 7
        CultivarName = Custom48
        SowingDepth = 30
        RowSpacing = 250
        Population = 120
        script: same as in Truth.Field.SowingRule
      SoluteManager
    Control: DAOption=OpenLoop; EnsembleSize=50; AddModelError=false; FixPhenology=false; DoYPheno=[131, 132, 136, 137, 202, 247, 255, 288, 290, 291, 0]
      OpenLoop
      InitialConditions: InitialDate=1996-01-01; InitialSWError=[0.1, 0.09, 0.08, 0.07, 0.06, 0.06, 0.06]
        InitialSW=[0.339409, 0.331343, 0.261874, 0.237935, 0.276195, 0.315429, 0.33297]
      StateVariables: same as Truth.Control.StateVariables
      Observations: same as Truth.Control.Observations
  Simulation Ensemble49
    Clock: StartDate=1996-01-01; EndDate=1996-12-30
    Summary SummaryFile
    Weather: FileName=../Met/Weather_Ensemble49.met
    Zone Field: Area=1; Slope=0
      Report: same as Truth.Field.Report
      Fertiliser
      Soil: ASCOrder=Vertosol; ASCSubOrder=Black; SoilType=Clay; Site=Norwin; NearestTown=Norwin; Region=Darling Downs and Granite Belt; State=Queensland; Country=Australia; NaturalVegetation=Qld. Bluegrass, possible Qld. Blue gum; ApsoilNumber=900; Latitude=-27.581836; Longitude=151.320206; LocationAccuracy=+/- 20m
        DataSource=CSIRO Sustainable Ecosystems, Toowoomba; Characteriesd as part of the GRDC funded project"Doing it better, doing it smarter, managing soil water in Australian agriculture' 2011
        Comments=OC, CLL for all crops estimated-based on Bongeen Mywybilla Soil No1
        Water
          Thickness  BD   AirDry     LL15       DUL       SAT       KS
          150        1.3  0.057711   0.077711   0.404247  0.504247  20
          150        1.3  0.0763784  0.0963784  0.387475  0.487475  20
          300        1.4  0.0601873  0.0801873  0.372527  0.472527  20
          300        1.4  0.112884   0.132884   0.350875  0.450875  20
          300        1.5  0.114834   0.134834   0.373373  0.473373  20
          300        1.5  0.123896   0.143896   0.320932  0.420932  20
          300        1.5  0.127161   0.147161   0.274467  0.374467  20
          SoilCrop WheatSoil
            LL=[0.077711, 0.0963784, 0.0801873, 0.132884, 0.134834, 0.143896, 0.147161]
            KL=[0.06, 0.06, 0.06, 0.04, 0.04, 0.02, 0.01]
            XF=[1, 1, 1, 1, 1, 1, 1]
        SoilWater: same as Truth.Field.Soil.SoilWater
        SoilNitrogen: fom_type=[default, manure, mucuna, lablab, shemp, stable]; fract_carb=[0.2, 0.3, 0.54, 0.57, 0.45, 0]; fract_cell=[0.7, 0.3, 0.37, 0.37, 0.47, 0.1]; fract_lign=[0.1, 0.4, 0.09, 0.06, 0.08, 0.9]; wfpsN2N2O_x=[22, 88]; wfpsN2N2O_y=[0.1, 1]
        SoilOrganicMatter: same as Truth.Field.Soil.SoilOrganicMatter
        Analysis: Thickness=[150, 150, 300, 300, 300, 300, 300]; PH=[8, 8, 8, 8, 8, 8, 8]; PHUnits=Water; BoronUnits=HotWater
        InitialWater: PercentMethod=EvenlyDistributed; FractionFull=0.5; RelativeTo=LL15
        Sample InitialN: same as Truth.Field.Soil.InitialN
        CERESSoilTemperature
      SurfaceOrganicMatter: same as Truth.Field.SurfaceOrganicMatter
      Plant15 Wheat: AutoHarvest=true; CropType=Wheat
      MicroClimate: a_interception=0; b_interception=1; c_interception=0; d_interception=0; soil_albedo=0.3; sun_angle=15; soil_heat_flux_fraction=0.4; night_interception_fraction=0.5; refheight=2; albedo=0.15; emissivity=0.96; RadIntTotal=0
      Manager SowingFertiliser: same as Truth.Field.SowingFertiliser
      Manager SowingRule
        StartDate = 10-may
        EndDate = 10-may
        MinESW = 0
        MinRain = 0
        RainDays = 7
        CultivarName = Custom49
        SowingDepth = 30
        RowSpacing = 250
        Population = 120
        script: same as in Truth.Field.SowingRule
      SoluteManager
    Control: DAOption=OpenLoop; EnsembleSize=50; AddModelError=false; FixPhenology=false; DoYPheno=[131, 132, 136, 137, 202, 247, 255, 288, 290, 291, 0]
      OpenLoop
      InitialConditions: InitialDate=1996-01-01; InitialSWError=[0.1, 0.09, 0.08, 0.07, 0.06, 0.06, 0.06]
        InitialSW=[0.343804, 0.330019, 0.319, 0.319183, 0.375356, 0.396706, 0.345563]
      StateVariables: same as Truth.Control.StateVariables
      Observations: same as Truth.Control.Observations
  Simulation OpenLoop
    Clock: StartDate=1996-01-01; EndDate=1996-12-30
    Summary SummaryFile
    Weather: FileName=../Met/OpenLoop.met
    Zone Field: Area=1; Slope=0
      Report: same as Truth.Field.Report
      Fertiliser
      Soil: ASCOrder=Vertosol; ASCSubOrder=Black; SoilType=Clay; Site=Norwin; NearestTown=Norwin; Region=Darling Downs and Granite Belt; State=Queensland; Country=Australia; NaturalVegetation=Qld. Bluegrass, possible Qld. Blue gum; ApsoilNumber=900; Latitude=-27.581836; Longitude=151.320206; LocationAccuracy=+/- 20m
        DataSource=CSIRO Sustainable Ecosystems, Toowoomba; Characteriesd as part of the GRDC funded project"Doing it better, doing it smarter, managing soil water in Australian agriculture' 2011
        Comments=OC, CLL for all crops estimated-based on Bongeen Mywybilla Soil No1
        Water
          Thickness  BD   AirDry  LL15  DUL   SAT   KS
          150        1.3  0.07    0.09  0.38  0.48  20
          150        1.3  0.08    0.1   0.37  0.47  20
          300        1.4  0.09    0.11  0.36  0.46  20
          300        1.4  0.1     0.12  0.35  0.45  20
          300        1.5  0.11    0.13  0.34  0.44  20
          300        1.5  0.11    0.13  0.34  0.44  20
          300        1.5  0.11    0.13  0.34  0.44  20
          SoilCrop WheatSoil: LL=[0.09, 0.1, 0.11, 0.12, 0.13, 0.13, 0.13]; KL=[0.06, 0.06, 0.06, 0.04, 0.04, 0.02, 0.01]; XF=[1, 1, 1, 1, 1, 1, 1]
        SoilWater: same as Truth.Field.Soil.SoilWater
        SoilNitrogen: fom_type=[default, manure, mucuna, lablab, shemp, stable]; fract_carb=[0.2, 0.3, 0.54, 0.57, 0.45, 0]; fract_cell=[0.7, 0.3, 0.37, 0.37, 0.47, 0.1]; fract_lign=[0.1, 0.4, 0.09, 0.06, 0.08, 0.9]; wfpsN2N2O_x=[22, 88]; wfpsN2N2O_y=[0.1, 1]
        SoilOrganicMatter: same as Truth.Field.Soil.SoilOrganicMatter
        Analysis: Thickness=[150, 150, 300, 300, 300, 300, 300]; PH=[8, 8, 8, 8, 8, 8, 8]; PHUnits=Water; BoronUnits=HotWater
        InitialWater: PercentMethod=EvenlyDistributed; FractionFull=0.5; RelativeTo=LL15
        Sample InitialN: same as Truth.Field.Soil.InitialN
        CERESSoilTemperature
      SurfaceOrganicMatter: same as Truth.Field.SurfaceOrganicMatter
      Plant15 Wheat: AutoHarvest=true; CropType=Wheat
      MicroClimate: a_interception=0; b_interception=1; c_interception=0; d_interception=0; soil_albedo=0.3; sun_angle=15; soil_heat_flux_fraction=0.4; night_interception_fraction=0.5; refheight=2; albedo=0.15; emissivity=0.96; RadIntTotal=0
      Manager SowingFertiliser: same as Truth.Field.SowingFertiliser
      Manager SowingRule
        StartDate = 10-may
        EndDate = 10-may
        MinESW = 0
        MinRain = 0
        RainDays = 7
        CultivarName = OpenLoop
        SowingDepth = 30
        RowSpacing = 250
        Population = 120
        script: same as in Truth.Field.SowingRule
      SoluteManager
    Control: DAOption=OpenLoop; EnsembleSize=50; AddModelError=false; FixPhenology=false; DoYPheno=[131, 132, 136, 137, 202, 247, 255, 288, 290, 291, 0]
      OpenLoop
      InitialConditions: InitialDate=1996-01-01; InitialSW=[0.35, 0.34, 0.33, 0.32, 0.31, 0.31, 0.31]; InitialSWError=[0.1, 0.09, 0.08, 0.07, 0.06, 0.06, 0.06]
      StateVariables: same as Truth.Control.StateVariables
      Observations: same as Truth.Control.Observations
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